<?xml version='1.0' encoding='UTF-8'?>
<neuroml xmlns="http://www.neuroml.org/schema/neuroml2" xmlns:xsi="http://www.w3.org/2001/XMLSchema-instance" xsi:schemaLocation="http://www.neuroml.org/schema/neuroml2 https://raw.githubusercontent.com/NeuroML/NeuroML2/development/Schemas/NeuroML2/NeuroML_v2beta4.xsd" id="gvft_network_bio_prior_lamW_0.144_DF_0.013_t70.net">
  <notes>NeuroML2 network generated from GVFT simulation on 2025-05-04 00:12:29
</notes>
  <include href="M3R.cell.nml"/>
  <include href="M1.cell.nml"/>
  <include href="I2L.cell.nml"/>
  <include href="MCL.cell.nml"/>
  <include href="I6.cell.nml"/>
  <include href="I5.cell.nml"/>
  <include href="M4.cell.nml"/>
  <include href="I1R.cell.nml"/>
  <include href="MCR.cell.nml"/>
  <include href="I3.cell.nml"/>
  <include href="M3L.cell.nml"/>
  <include href="NSML.cell.nml"/>
  <include href="M2L.cell.nml"/>
  <include href="M5.cell.nml"/>
  <include href="I4.cell.nml"/>
  <include href="MI.cell.nml"/>
  <include href="NSMR.cell.nml"/>
  <include href="I2R.cell.nml"/>
  <include href="M2R.cell.nml"/>
  <include href="I1L.cell.nml"/>
  <include href="Serotonin_Glutamate.synapse.nml"/>
  <include href="Acetylcholine.synapse.nml"/>
  <include href="Generic_GJ.synapse.nml"/>
  <include href="Glutamate.synapse.nml"/>
  <network id="gvft_network_bio_prior_lamW_0.144_DF_0.013_t70.net" type="networkWithTemperature" temperature="20.0 degC">
    <population id="M1" component="M1" type="populationList" size="1">
      <instance id="0">
        <location x="-0.638191" y="0.04522614" z="0.0"/>
      </instance>
    </population>
    <population id="M2L" component="M2L" type="populationList" size="1">
      <instance id="0">
        <location x="-0.9296482" y="0.6482412" z="0.0"/>
      </instance>
    </population>
    <population id="M2R" component="M2R" type="populationList" size="1">
      <instance id="0">
        <location x="-0.69849247" y="-0.3467337" z="0.0"/>
      </instance>
    </population>
    <population id="M3L" component="M3L" type="populationList" size="1">
      <instance id="0">
        <location x="-0.2964824" y="-0.38693467" z="0.0"/>
      </instance>
    </population>
    <population id="M3R" component="M3R" type="populationList" size="1">
      <instance id="0">
        <location x="-0.94974875" y="0.83919597" z="0.0"/>
      </instance>
    </population>
    <population id="M4" component="M4" type="populationList" size="1">
      <instance id="0">
        <location x="-0.39698493" y="-0.025125638" z="0.0"/>
      </instance>
    </population>
    <population id="M5" component="M5" type="populationList" size="1">
      <instance id="0">
        <location x="-0.46733668" y="0.26633167" z="0.0"/>
      </instance>
    </population>
    <population id="I1L" component="I1L" type="populationList" size="1">
      <instance id="0">
        <location x="0.26633167" y="0.7889447" z="0.0"/>
      </instance>
    </population>
    <population id="I1R" component="I1R" type="populationList" size="1">
      <instance id="0">
        <location x="0.80904526" y="-0.76884425" z="0.0"/>
      </instance>
    </population>
    <population id="I2L" component="I2L" type="populationList" size="1">
      <instance id="0">
        <location x="-0.919598" y="0.8592965" z="0.0"/>
      </instance>
    </population>
    <population id="I2R" component="I2R" type="populationList" size="1">
      <instance id="0">
        <location x="0.6683417" y="-0.61809045" z="0.0"/>
      </instance>
    </population>
    <population id="I3" component="I3" type="populationList" size="1">
      <instance id="0">
        <location x="0.14572865" y="-0.2763819" z="0.0"/>
      </instance>
    </population>
    <population id="I4" component="I4" type="populationList" size="1">
      <instance id="0">
        <location x="0.8291457" y="0.61809045" z="0.0"/>
      </instance>
    </population>
    <population id="I5" component="I5" type="populationList" size="1">
      <instance id="0">
        <location x="-0.08542714" y="0.65829146" z="0.0"/>
      </instance>
    </population>
    <population id="I6" component="I6" type="populationList" size="1">
      <instance id="0">
        <location x="-0.41708544" y="-0.8592965" z="0.0"/>
      </instance>
    </population>
    <population id="MCL" component="MCL" type="populationList" size="1">
      <instance id="0">
        <location x="-0.86934674" y="0.0753769" z="0.0"/>
      </instance>
    </population>
    <population id="MCR" component="MCR" type="populationList" size="1">
      <instance id="0">
        <location x="-0.0753769" y="0.39698493" z="0.0"/>
      </instance>
    </population>
    <population id="MI" component="MI" type="populationList" size="1">
      <instance id="0">
        <location x="-0.095477395" y="0.33668342" z="0.0"/>
      </instance>
    </population>
    <population id="NSML" component="NSML" type="populationList" size="1">
      <instance id="0">
        <location x="-0.44723618" y="-0.8291457" z="0.0"/>
      </instance>
    </population>
    <population id="NSMR" component="NSMR" type="populationList" size="1">
      <instance id="0">
        <location x="-1.0" y="0.6080402" z="0.0"/>
      </instance>
    </population>
    <projection id="NCXLS_M1_I3" presynapticPopulation="M1" postsynapticPopulation="I3" synapse="Acetylcholine">
      <connection id="0" preCellId="../M1/0/M1" postCellId="../I3/0/I3" preSegmentId="8" postSegmentId="9" preFractionAlong="0.007029203813619156" postFractionAlong="0.057280251077623356"/>
    </projection>
    <projection id="NCXLS_M1_I4" presynapticPopulation="M1" postsynapticPopulation="I4" synapse="Acetylcholine">
      <connection id="1" preCellId="../M1/0/M1" postCellId="../I4/0/I4" preSegmentId="9" postSegmentId="4" preFractionAlong="0.6569551562671395" postFractionAlong="0.956614621083458"/>
    </projection>
    <projection id="NCXLS_M1_I1L" presynapticPopulation="M1" postsynapticPopulation="I1L" synapse="Acetylcholine">
      <connection id="2" preCellId="../M1/0/M1" postCellId="../I1L/0/I1L" preSegmentId="8" postSegmentId="6" preFractionAlong="0.26170568373590597" postFractionAlong="0.24697879907199982"/>
    </projection>
    <projection id="NCXLS_M1_I6" presynapticPopulation="M1" postsynapticPopulation="I6" synapse="Acetylcholine">
      <connection id="3" preCellId="../M1/0/M1" postCellId="../I6/0/I6" preSegmentId="8" postSegmentId="6" preFractionAlong="0.4288868788610386" postFractionAlong="0.8447894362860214"/>
    </projection>
    <projection id="NCXLS_M1_M4" presynapticPopulation="M1" postsynapticPopulation="M4" synapse="Acetylcholine">
      <connection id="4" preCellId="../M1/0/M1" postCellId="../M4/0/M4" preSegmentId="6" postSegmentId="9" preFractionAlong="0.4875711936733843" postFractionAlong="0.03361360018328263"/>
    </projection>
    <projection id="NCXLS_M1_NSML" presynapticPopulation="M1" postsynapticPopulation="NSML" synapse="Acetylcholine">
      <connection id="5" preCellId="../M1/0/M1" postCellId="../NSML/0/NSML" preSegmentId="4" postSegmentId="2" preFractionAlong="0.906437453344411" postFractionAlong="0.13924537111759516"/>
    </projection>
    <projection id="NCXLS_M1_I1R" presynapticPopulation="M1" postsynapticPopulation="I1R" synapse="Acetylcholine">
      <connection id="6" preCellId="../M1/0/M1" postCellId="../I1R/0/I1R" preSegmentId="4" postSegmentId="2" preFractionAlong="0.41109560260070654" postFractionAlong="0.3473433262588427"/>
    </projection>
    <projection id="NCXLS_M1_M3L" presynapticPopulation="M1" postsynapticPopulation="M3L" synapse="Glutamate">
      <connection id="7" preCellId="../M1/0/M1" postCellId="../M3L/0/M3L" preSegmentId="2" postSegmentId="8" preFractionAlong="0.5483205837264242" postFractionAlong="0.1279882085335864"/>
    </projection>
    <projection id="NCXLS_M1_MI" presynapticPopulation="M1" postsynapticPopulation="MI" synapse="Acetylcholine">
      <connection id="8" preCellId="../M1/0/M1" postCellId="../MI/0/MI" preSegmentId="7" postSegmentId="5" preFractionAlong="0.05225787928602377" postFractionAlong="0.4187933190741614"/>
    </projection>
    <projection id="NCXLS_M1_I2R" presynapticPopulation="M1" postsynapticPopulation="I2R" synapse="Acetylcholine">
      <connection id="9" preCellId="../M1/0/M1" postCellId="../I2R/0/I2R" preSegmentId="9" postSegmentId="5" preFractionAlong="0.9812970904972467" postFractionAlong="0.2565300624442478"/>
    </projection>
    <electricalProjection id="NCXLS_M1_M2R_GJ" presynapticPopulation="M1" postsynapticPopulation="M2R">
      <electricalConnection id="10" preCell="0" postCell="0" synapse="Generic_GJ" preSegment="3" postSegment="7" preFractionAlong="0.19809763275974013" postFractionAlong="0.5653302545716099"/>
    </electricalProjection>
    <projection id="NCXLS_M1_MCR" presynapticPopulation="M1" postsynapticPopulation="MCR" synapse="Acetylcholine">
      <connection id="11" preCellId="../M1/0/M1" postCellId="../MCR/0/MCR" preSegmentId="3" postSegmentId="3" preFractionAlong="0.9720053296315371" postFractionAlong="0.6085272726964666"/>
    </projection>
    <projection id="NCXLS_M2L_M1" presynapticPopulation="M2L" postsynapticPopulation="M1" synapse="Acetylcholine">
      <connection id="12" preCellId="../M2L/0/M2L" postCellId="../M1/0/M1" preSegmentId="9" postSegmentId="9" preFractionAlong="0.022035160297504186" postFractionAlong="0.7200080396631131"/>
    </projection>
    <projection id="NCXLS_M2L_MCL" presynapticPopulation="M2L" postsynapticPopulation="MCL" synapse="Acetylcholine">
      <connection id="13" preCellId="../M2L/0/M2L" postCellId="../MCL/0/MCL" preSegmentId="9" postSegmentId="7" preFractionAlong="0.6837541055770425" postFractionAlong="0.5451055282606997"/>
    </projection>
    <projection id="NCXLS_M2L_I3" presynapticPopulation="M2L" postsynapticPopulation="I3" synapse="Acetylcholine">
      <connection id="14" preCellId="../M2L/0/M2L" postCellId="../I3/0/I3" preSegmentId="8" postSegmentId="2" preFractionAlong="0.40397787632654825" postFractionAlong="0.5425458033954229"/>
    </projection>
    <projection id="NCXLS_M2L_I4" presynapticPopulation="M2L" postsynapticPopulation="I4" synapse="Acetylcholine">
      <connection id="15" preCellId="../M2L/0/M2L" postCellId="../I4/0/I4" preSegmentId="7" postSegmentId="6" preFractionAlong="0.5488386567200587" postFractionAlong="0.6129001608619492"/>
    </projection>
    <projection id="NCXLS_M2L_I1L" presynapticPopulation="M2L" postsynapticPopulation="I1L" synapse="Acetylcholine">
      <connection id="16" preCellId="../M2L/0/M2L" postCellId="../I1L/0/I1L" preSegmentId="6" postSegmentId="2" preFractionAlong="0.484696287130047" postFractionAlong="0.16577454016327575"/>
    </projection>
    <projection id="NCXLS_M2L_I6" presynapticPopulation="M2L" postsynapticPopulation="I6" synapse="Acetylcholine">
      <connection id="17" preCellId="../M2L/0/M2L" postCellId="../I6/0/I6" preSegmentId="2" postSegmentId="6" preFractionAlong="0.8499753714806619" postFractionAlong="0.6690223373291083"/>
    </projection>
    <electricalProjection id="NCXLS_M2L_M4_GJ" presynapticPopulation="M2L" postsynapticPopulation="M4">
      <electricalConnection id="18" preCell="0" postCell="0" synapse="Generic_GJ" preSegment="2" postSegment="3" preFractionAlong="0.6509734671509542" postFractionAlong="0.5454318694069055"/>
    </electricalProjection>
    <projection id="NCXLS_M2L_M5" presynapticPopulation="M2L" postsynapticPopulation="M5" synapse="Acetylcholine">
      <connection id="19" preCellId="../M2L/0/M2L" postCellId="../M5/0/M5" preSegmentId="8" postSegmentId="8" preFractionAlong="0.11193592702153032" postFractionAlong="0.3559733737948527"/>
    </projection>
    <projection id="NCXLS_M2L_NSML" presynapticPopulation="M2L" postsynapticPopulation="NSML" synapse="Acetylcholine">
      <connection id="20" preCellId="../M2L/0/M2L" postCellId="../NSML/0/NSML" preSegmentId="3" postSegmentId="3" preFractionAlong="0.7862781993840331" postFractionAlong="0.2013637821359744"/>
    </projection>
    <projection id="NCXLS_M2L_I1R" presynapticPopulation="M2L" postsynapticPopulation="I1R" synapse="Acetylcholine">
      <connection id="21" preCellId="../M2L/0/M2L" postCellId="../I1R/0/I1R" preSegmentId="7" postSegmentId="5" preFractionAlong="0.1647063534322959" postFractionAlong="0.33021506487149754"/>
    </projection>
    <electricalProjection id="NCXLS_M2L_M3L_GJ" presynapticPopulation="M2L" postsynapticPopulation="M3L">
      <electricalConnection id="22" preCell="0" postCell="0" synapse="Generic_GJ" preSegment="4" postSegment="6" preFractionAlong="0.01794567856849183" postFractionAlong="0.12625378279261346"/>
    </electricalProjection>
    <projection id="NCXLS_M2L_I5" presynapticPopulation="M2L" postsynapticPopulation="I5" synapse="Acetylcholine">
      <connection id="23" preCellId="../M2L/0/M2L" postCellId="../I5/0/I5" preSegmentId="6" postSegmentId="4" preFractionAlong="0.8705784250460069" postFractionAlong="0.23879621138153928"/>
    </projection>
    <projection id="NCXLS_M2L_MI" presynapticPopulation="M2L" postsynapticPopulation="MI" synapse="Acetylcholine">
      <connection id="24" preCellId="../M2L/0/M2L" postCellId="../MI/0/MI" preSegmentId="9" postSegmentId="8" preFractionAlong="0.9849896561408751" postFractionAlong="0.7720124763099904"/>
    </projection>
    <projection id="NCXLS_M2L_I2R" presynapticPopulation="M2L" postsynapticPopulation="I2R" synapse="Acetylcholine">
      <connection id="25" preCellId="../M2L/0/M2L" postCellId="../I2R/0/I2R" preSegmentId="2" postSegmentId="9" preFractionAlong="0.0941519101256979" postFractionAlong="0.34366319260910305"/>
    </projection>
    <electricalProjection id="NCXLS_M2L_M2R_GJ" presynapticPopulation="M2L" postsynapticPopulation="M2R">
      <electricalConnection id="26" preCell="0" postCell="0" synapse="Generic_GJ" preSegment="1" postSegment="4" preFractionAlong="0.7983441882243283" postFractionAlong="0.37193266791686486"/>
    </electricalProjection>
    <projection id="NCXLS_M2L_MCR" presynapticPopulation="M2L" postsynapticPopulation="MCR" synapse="Acetylcholine">
      <connection id="27" preCellId="../M2L/0/M2L" postCellId="../MCR/0/MCR" preSegmentId="7" postSegmentId="9" preFractionAlong="0.3973813904853165" postFractionAlong="0.0934079719752956"/>
    </projection>
    <electricalProjection id="NCXLS_I4_I1R_GJ" presynapticPopulation="I4" postsynapticPopulation="I1R">
      <electricalConnection id="28" preCell="0" postCell="0" synapse="Generic_GJ" preSegment="5" postSegment="3" preFractionAlong="0.19560927304451503" postFractionAlong="0.18672329577304148"/>
    </electricalProjection>
    <projection id="NCXLS_I4_I2R" presynapticPopulation="I4" postsynapticPopulation="I2R" synapse="Glutamate">
      <connection id="29" preCellId="../I4/0/I4" postCellId="../I2R/0/I2R" preSegmentId="8" postSegmentId="8" preFractionAlong="0.35667097414176474" postFractionAlong="0.7574818847894174"/>
    </projection>
    <electricalProjection id="NCXLS_M4_M2L_GJ" presynapticPopulation="M4" postsynapticPopulation="M2L">
      <electricalConnection id="30" preCell="0" postCell="0" synapse="Generic_GJ" preSegment="5" postSegment="5" preFractionAlong="0.31234910188551357" postFractionAlong="0.6426746576724236"/>
    </electricalProjection>
    <projection id="NCXLS_M4_I4" presynapticPopulation="M4" postsynapticPopulation="I4" synapse="Acetylcholine">
      <connection id="31" preCellId="../M4/0/M4" postCellId="../I4/0/I4" preSegmentId="8" postSegmentId="2" preFractionAlong="0.157954822835348" postFractionAlong="0.6958991181688025"/>
    </projection>
    <projection id="NCXLS_M4_I1L" presynapticPopulation="M4" postsynapticPopulation="I1L" synapse="Acetylcholine">
      <connection id="32" preCellId="../M4/0/M4" postCellId="../I1L/0/I1L" preSegmentId="2" postSegmentId="7" preFractionAlong="0.6134731386391763" postFractionAlong="0.36310073663401043"/>
    </projection>
    <projection id="NCXLS_M4_M5" presynapticPopulation="M4" postsynapticPopulation="M5" synapse="Glutamate">
      <connection id="33" preCellId="../M4/0/M4" postCellId="../M5/0/M5" preSegmentId="2" postSegmentId="8" preFractionAlong="0.507051103865441" postFractionAlong="0.598112629369018"/>
    </projection>
    <projection id="NCXLS_M4_I5" presynapticPopulation="M4" postsynapticPopulation="I5" synapse="Acetylcholine">
      <connection id="34" preCellId="../M4/0/M4" postCellId="../I5/0/I5" preSegmentId="7" postSegmentId="8" preFractionAlong="0.8939897100078704" postFractionAlong="0.6542925523249619"/>
    </projection>
    <projection id="NCXLS_M4_NSMR" presynapticPopulation="M4" postsynapticPopulation="NSMR" synapse="Acetylcholine">
      <connection id="35" preCellId="../M4/0/M4" postCellId="../NSMR/0/NSMR" preSegmentId="5" postSegmentId="4" preFractionAlong="0.7985932723827512" postFractionAlong="0.9677558771033888"/>
    </projection>
    <projection id="NCXLS_M4_I2L" presynapticPopulation="M4" postsynapticPopulation="I2L" synapse="Acetylcholine">
      <connection id="36" preCellId="../M4/0/M4" postCellId="../I2L/0/I2L" preSegmentId="3" postSegmentId="9" preFractionAlong="0.8036035354415352" postFractionAlong="0.5052067735766382"/>
    </projection>
    <projection id="NCXLS_M4_MI" presynapticPopulation="M4" postsynapticPopulation="MI" synapse="Acetylcholine">
      <connection id="37" preCellId="../M4/0/M4" postCellId="../MI/0/MI" preSegmentId="1" postSegmentId="7" preFractionAlong="0.12243389835894103" postFractionAlong="0.7251855480273908"/>
    </projection>
    <electricalProjection id="NCXLS_M4_M3R_GJ" presynapticPopulation="M4" postsynapticPopulation="M3R">
      <electricalConnection id="38" preCell="0" postCell="0" synapse="Generic_GJ" preSegment="2" postSegment="4" preFractionAlong="0.9970781570816617" postFractionAlong="0.9797824578545219"/>
    </electricalProjection>
    <projection id="NCXLS_M4_MCR" presynapticPopulation="M4" postsynapticPopulation="MCR" synapse="Acetylcholine">
      <connection id="39" preCellId="../M4/0/M4" postCellId="../MCR/0/MCR" preSegmentId="7" postSegmentId="5" preFractionAlong="0.5597556836383826" postFractionAlong="0.5273996221226763"/>
    </projection>
    <projection id="NCXLS_M5_M2L" presynapticPopulation="M5" postsynapticPopulation="M2L" synapse="Acetylcholine">
      <connection id="40" preCellId="../M5/0/M5" postCellId="../M2L/0/M2L" preSegmentId="9" postSegmentId="4" preFractionAlong="0.8902580530178021" postFractionAlong="0.07940658464302952"/>
    </projection>
    <projection id="NCXLS_M5_I5" presynapticPopulation="M5" postsynapticPopulation="I5" synapse="Acetylcholine">
      <connection id="41" preCellId="../M5/0/M5" postCellId="../I5/0/I5" preSegmentId="5" postSegmentId="3" preFractionAlong="0.18741194409758222" postFractionAlong="0.858177053157164"/>
    </projection>
    <projection id="NCXLS_M5_NSMR" presynapticPopulation="M5" postsynapticPopulation="NSMR" synapse="Acetylcholine">
      <connection id="42" preCellId="../M5/0/M5" postCellId="../NSMR/0/NSMR" preSegmentId="4" postSegmentId="6" preFractionAlong="0.5407937549855444" postFractionAlong="0.7102427986233115"/>
    </projection>
    <projection id="NCXLS_M5_I2L" presynapticPopulation="M5" postsynapticPopulation="I2L" synapse="Acetylcholine">
      <connection id="43" preCellId="../M5/0/M5" postCellId="../I2L/0/I2L" preSegmentId="9" postSegmentId="2" preFractionAlong="0.8216368977104717" postFractionAlong="0.4592651971732139"/>
    </projection>
    <projection id="NCXLS_M5_M3R" presynapticPopulation="M5" postsynapticPopulation="M3R" synapse="Acetylcholine">
      <connection id="44" preCellId="../M5/0/M5" postCellId="../M3R/0/M3R" preSegmentId="5" postSegmentId="8" preFractionAlong="0.4942124472502999" postFractionAlong="0.8282492524372184"/>
    </projection>
    <projection id="NCXLS_NSML_I6" presynapticPopulation="NSML" postsynapticPopulation="I6" synapse="Serotonin_Glutamate">
      <connection id="45" preCellId="../NSML/0/NSML" postCellId="../I6/0/I6" preSegmentId="5" postSegmentId="8" preFractionAlong="0.08717946783183117" postFractionAlong="0.7190774473538556"/>
    </projection>
    <projection id="NCXLS_M3L_I3" presynapticPopulation="M3L" postsynapticPopulation="I3" synapse="Acetylcholine">
      <connection id="46" preCellId="../M3L/0/M3L" postCellId="../I3/0/I3" preSegmentId="3" postSegmentId="4" preFractionAlong="0.9053598742778703" postFractionAlong="0.7396713007267637"/>
    </projection>
    <projection id="NCXLS_M3L_I4" presynapticPopulation="M3L" postsynapticPopulation="I4" synapse="Acetylcholine">
      <connection id="47" preCellId="../M3L/0/M3L" postCellId="../I4/0/I4" preSegmentId="2" postSegmentId="9" preFractionAlong="0.43550545439815935" postFractionAlong="0.5772497307686131"/>
    </projection>
    <projection id="NCXLS_M3L_I1L" presynapticPopulation="M3L" postsynapticPopulation="I1L" synapse="Acetylcholine">
      <connection id="48" preCellId="../M3L/0/M3L" postCellId="../I1L/0/I1L" preSegmentId="1" postSegmentId="5" preFractionAlong="0.8061958810037908" postFractionAlong="0.8437373264067243"/>
    </projection>
    <electricalProjection id="NCXLS_M3L_M4_GJ" presynapticPopulation="M3L" postsynapticPopulation="M4">
      <electricalConnection id="49" preCell="0" postCell="0" synapse="Generic_GJ" preSegment="3" postSegment="1" preFractionAlong="0.12626474156450274" postFractionAlong="0.676177562075434"/>
    </electricalProjection>
    <projection id="NCXLS_M3L_M5" presynapticPopulation="M3L" postsynapticPopulation="M5" synapse="Acetylcholine">
      <connection id="50" preCellId="../M3L/0/M3L" postCellId="../M5/0/M5" preSegmentId="2" postSegmentId="3" preFractionAlong="0.6863271966860974" postFractionAlong="0.06964114816240574"/>
    </projection>
    <projection id="NCXLS_M3L_I1R" presynapticPopulation="M3L" postsynapticPopulation="I1R" synapse="Acetylcholine">
      <connection id="51" preCellId="../M3L/0/M3L" postCellId="../I1R/0/I1R" preSegmentId="7" postSegmentId="6" preFractionAlong="0.8557372589057863" postFractionAlong="0.2271795570235149"/>
    </projection>
    <projection id="NCXLS_M3L_I5" presynapticPopulation="M3L" postsynapticPopulation="I5" synapse="Acetylcholine">
      <connection id="52" preCellId="../M3L/0/M3L" postCellId="../I5/0/I5" preSegmentId="8" postSegmentId="7" preFractionAlong="0.27927608845441043" postFractionAlong="0.6428819100587077"/>
    </projection>
    <projection id="NCXLS_M3L_MI" presynapticPopulation="M3L" postsynapticPopulation="MI" synapse="Acetylcholine">
      <connection id="53" preCellId="../M3L/0/M3L" postCellId="../MI/0/MI" preSegmentId="4" postSegmentId="9" preFractionAlong="0.21552986879133185" postFractionAlong="0.36037781993034756"/>
    </projection>
    <projection id="NCXLS_M3L_I2R" presynapticPopulation="M3L" postsynapticPopulation="I2R" synapse="Acetylcholine">
      <connection id="54" preCellId="../M3L/0/M3L" postCellId="../I2R/0/I2R" preSegmentId="5" postSegmentId="3" preFractionAlong="0.7631552912588894" postFractionAlong="0.4083063427594511"/>
    </projection>
    <projection id="NCXLS_M3L_MCR" presynapticPopulation="M3L" postsynapticPopulation="MCR" synapse="Acetylcholine">
      <connection id="55" preCellId="../M3L/0/M3L" postCellId="../MCR/0/MCR" preSegmentId="4" postSegmentId="4" preFractionAlong="0.871204482263052" postFractionAlong="0.7660647765353026"/>
    </projection>
    <projection id="NCXLS_I5_I1L" presynapticPopulation="I5" postsynapticPopulation="I1L" synapse="Acetylcholine">
      <connection id="56" preCellId="../I5/0/I5" postCellId="../I1L/0/I1L" preSegmentId="3" postSegmentId="2" preFractionAlong="0.6507685475587474" postFractionAlong="0.8742267241383516"/>
    </projection>
    <projection id="NCXLS_I5_I2L" presynapticPopulation="I5" postsynapticPopulation="I2L" synapse="Acetylcholine">
      <connection id="57" preCellId="../I5/0/I5" postCellId="../I2L/0/I2L" preSegmentId="7" postSegmentId="2" preFractionAlong="0.4470555438064254" postFractionAlong="0.4603582712019263"/>
    </projection>
    <projection id="NCXLS_NSMR_I2L" presynapticPopulation="NSMR" postsynapticPopulation="I2L" synapse="Serotonin_Glutamate">
      <connection id="58" preCellId="../NSMR/0/NSMR" postCellId="../I2L/0/I2L" preSegmentId="4" postSegmentId="5" preFractionAlong="0.5466482201877885" postFractionAlong="0.38040054897040965"/>
    </projection>
    <projection id="NCXLS_NSMR_M3R" presynapticPopulation="NSMR" postsynapticPopulation="M3R" synapse="Serotonin_Glutamate">
      <connection id="59" preCellId="../NSMR/0/NSMR" postCellId="../M3R/0/M3R" preSegmentId="4" postSegmentId="1" preFractionAlong="0.04202467517140529" postFractionAlong="0.7399041207669304"/>
    </projection>
    <projection id="NCXLS_MI_I4" presynapticPopulation="MI" postsynapticPopulation="I4" synapse="Glutamate">
      <connection id="60" preCellId="../MI/0/MI" postCellId="../I4/0/I4" preSegmentId="6" postSegmentId="7" preFractionAlong="0.12745395942286897" postFractionAlong="0.7076883263306187"/>
    </projection>
    <projection id="NCXLS_MI_I1L" presynapticPopulation="MI" postsynapticPopulation="I1L" synapse="Serotonin_Glutamate">
      <connection id="61" preCellId="../MI/0/MI" postCellId="../I1L/0/I1L" preSegmentId="3" postSegmentId="3" preFractionAlong="0.7539619035967839" postFractionAlong="0.8049067768414386"/>
    </projection>
    <projection id="NCXLS_MI_I5" presynapticPopulation="MI" postsynapticPopulation="I5" synapse="Glutamate">
      <connection id="62" preCellId="../MI/0/MI" postCellId="../I5/0/I5" preSegmentId="4" postSegmentId="7" preFractionAlong="0.6213444972535296" postFractionAlong="0.5591848068293265"/>
    </projection>
    <projection id="NCXLS_MI_MCR" presynapticPopulation="MI" postsynapticPopulation="MCR" synapse="Acetylcholine">
      <connection id="63" preCellId="../MI/0/MI" postCellId="../MCR/0/MCR" preSegmentId="7" postSegmentId="9" preFractionAlong="0.28152119841492995" postFractionAlong="0.872753839566128"/>
    </projection>
    <projection id="NCXLS_I2R_I1R" presynapticPopulation="I2R" postsynapticPopulation="I1R" synapse="Acetylcholine">
      <connection id="64" preCellId="../I2R/0/I2R" postCellId="../I1R/0/I1R" preSegmentId="8" postSegmentId="6" preFractionAlong="0.12024722651167563" postFractionAlong="0.0683409355322604"/>
    </projection>
    <projection id="NCXLS_M2R_I3" presynapticPopulation="M2R" postsynapticPopulation="I3" synapse="Acetylcholine">
      <connection id="65" preCellId="../M2R/0/M2R" postCellId="../I3/0/I3" preSegmentId="1" postSegmentId="9" preFractionAlong="0.01240403627731479" postFractionAlong="0.46876796546450583"/>
    </projection>
    <projection id="NCXLS_M2R_I4" presynapticPopulation="M2R" postsynapticPopulation="I4" synapse="Acetylcholine">
      <connection id="66" preCellId="../M2R/0/M2R" postCellId="../I4/0/I4" preSegmentId="9" postSegmentId="5" preFractionAlong="0.2972378077086172" postFractionAlong="0.2999191115069847"/>
    </projection>
    <projection id="NCXLS_M2R_I1L" presynapticPopulation="M2R" postsynapticPopulation="I1L" synapse="Acetylcholine">
      <connection id="67" preCellId="../M2R/0/M2R" postCellId="../I1L/0/I1L" preSegmentId="9" postSegmentId="4" preFractionAlong="0.06449127124916754" postFractionAlong="0.8772394571622004"/>
    </projection>
    <projection id="NCXLS_M2R_I6" presynapticPopulation="M2R" postsynapticPopulation="I6" synapse="Acetylcholine">
      <connection id="68" preCellId="../M2R/0/M2R" postCellId="../I6/0/I6" preSegmentId="2" postSegmentId="9" preFractionAlong="0.33040800387577385" postFractionAlong="0.3404058433495647"/>
    </projection>
    <projection id="NCXLS_M2R_M4" presynapticPopulation="M2R" postsynapticPopulation="M4" synapse="Acetylcholine">
      <connection id="69" preCellId="../M2R/0/M2R" postCellId="../M4/0/M4" preSegmentId="8" postSegmentId="7" preFractionAlong="0.5313165205680591" postFractionAlong="0.8381521835519244"/>
    </projection>
    <projection id="NCXLS_M2R_NSML" presynapticPopulation="M2R" postsynapticPopulation="NSML" synapse="Acetylcholine">
      <connection id="70" preCellId="../M2R/0/M2R" postCellId="../NSML/0/NSML" preSegmentId="3" postSegmentId="2" preFractionAlong="0.573349345635218" postFractionAlong="0.6588250701400705"/>
    </projection>
    <projection id="NCXLS_M2R_I1R" presynapticPopulation="M2R" postsynapticPopulation="I1R" synapse="Acetylcholine">
      <connection id="71" preCellId="../M2R/0/M2R" postCellId="../I1R/0/I1R" preSegmentId="4" postSegmentId="5" preFractionAlong="0.5989785081772105" postFractionAlong="0.11493299705956683"/>
    </projection>
    <projection id="NCXLS_M2R_M3L" presynapticPopulation="M2R" postsynapticPopulation="M3L" synapse="Acetylcholine">
      <connection id="72" preCellId="../M2R/0/M2R" postCellId="../M3L/0/M3L" preSegmentId="9" postSegmentId="9" preFractionAlong="0.6692002629380784" postFractionAlong="0.8292867993167555"/>
    </projection>
    <projection id="NCXLS_M2R_MI" presynapticPopulation="M2R" postsynapticPopulation="MI" synapse="Acetylcholine">
      <connection id="73" preCellId="../M2R/0/M2R" postCellId="../MI/0/MI" preSegmentId="8" postSegmentId="1" preFractionAlong="0.025141958277272725" postFractionAlong="0.6944504561307088"/>
    </projection>
    <projection id="NCXLS_M2R_I2R" presynapticPopulation="M2R" postsynapticPopulation="I2R" synapse="Acetylcholine">
      <connection id="74" preCellId="../M2R/0/M2R" postCellId="../I2R/0/I2R" preSegmentId="8" postSegmentId="6" preFractionAlong="0.43459596085871177" postFractionAlong="0.7738796557301564"/>
    </projection>
    <projection id="NCXLS_M2R_MCR" presynapticPopulation="M2R" postsynapticPopulation="MCR" synapse="Acetylcholine">
      <connection id="75" preCellId="../M2R/0/M2R" postCellId="../MCR/0/MCR" preSegmentId="9" postSegmentId="3" preFractionAlong="0.8925232899548461" postFractionAlong="0.4433800143791877"/>
    </projection>
    <projection id="NCXLS_M3R_I3" presynapticPopulation="M3R" postsynapticPopulation="I3" synapse="Acetylcholine">
      <connection id="76" preCellId="../M3R/0/M3R" postCellId="../I3/0/I3" preSegmentId="8" postSegmentId="5" preFractionAlong="0.6313075530919887" postFractionAlong="0.5916971623063255"/>
    </projection>
    <projection id="NCXLS_M3R_I4" presynapticPopulation="M3R" postsynapticPopulation="I4" synapse="Acetylcholine">
      <connection id="77" preCellId="../M3R/0/M3R" postCellId="../I4/0/I4" preSegmentId="3" postSegmentId="4" preFractionAlong="0.6764263623383923" postFractionAlong="0.13169343847203852"/>
    </projection>
    <projection id="NCXLS_M3R_I1L" presynapticPopulation="M3R" postsynapticPopulation="I1L" synapse="Acetylcholine">
      <connection id="78" preCellId="../M3R/0/M3R" postCellId="../I1L/0/I1L" preSegmentId="4" postSegmentId="6" preFractionAlong="0.7867503351544369" postFractionAlong="0.970766206474783"/>
    </projection>
    <projection id="NCXLS_M3R_M4" presynapticPopulation="M3R" postsynapticPopulation="M4" synapse="Acetylcholine">
      <connection id="79" preCellId="../M3R/0/M3R" postCellId="../M4/0/M4" preSegmentId="2" postSegmentId="8" preFractionAlong="0.6006510665483559" postFractionAlong="0.7435939161765598"/>
    </projection>
    <projection id="NCXLS_M3R_M5" presynapticPopulation="M3R" postsynapticPopulation="M5" synapse="Glutamate">
      <connection id="80" preCellId="../M3R/0/M3R" postCellId="../M5/0/M5" preSegmentId="1" postSegmentId="8" preFractionAlong="0.6341040313763313" postFractionAlong="0.07093221613377343"/>
    </projection>
    <projection id="NCXLS_M3R_I1R" presynapticPopulation="M3R" postsynapticPopulation="I1R" synapse="Acetylcholine">
      <connection id="81" preCellId="../M3R/0/M3R" postCellId="../I1R/0/I1R" preSegmentId="9" postSegmentId="2" preFractionAlong="0.3618530932051387" postFractionAlong="0.47249335500651357"/>
    </projection>
    <projection id="NCXLS_M3R_I5" presynapticPopulation="M3R" postsynapticPopulation="I5" synapse="Acetylcholine">
      <connection id="82" preCellId="../M3R/0/M3R" postCellId="../I5/0/I5" preSegmentId="8" postSegmentId="3" preFractionAlong="0.2768143077913058" postFractionAlong="0.9715326909010507"/>
    </projection>
    <projection id="NCXLS_M3R_I2L" presynapticPopulation="M3R" postsynapticPopulation="I2L" synapse="Acetylcholine">
      <connection id="83" preCellId="../M3R/0/M3R" postCellId="../I2L/0/I2L" preSegmentId="1" postSegmentId="3" preFractionAlong="0.19609771273839294" postFractionAlong="0.6107800710757683"/>
    </projection>
    <projection id="NCXLS_M3R_MI" presynapticPopulation="M3R" postsynapticPopulation="MI" synapse="Acetylcholine">
      <connection id="84" preCellId="../M3R/0/M3R" postCellId="../MI/0/MI" preSegmentId="4" postSegmentId="8" preFractionAlong="0.5908674412710415" postFractionAlong="0.5370074883513584"/>
    </projection>
    <projection id="NCXLS_M3R_I2R" presynapticPopulation="M3R" postsynapticPopulation="I2R" synapse="Acetylcholine">
      <connection id="85" preCellId="../M3R/0/M3R" postCellId="../I2R/0/I2R" preSegmentId="1" postSegmentId="1" preFractionAlong="0.21906880910185778" postFractionAlong="0.03672136250082114"/>
    </projection>
    <projection id="NCXLS_M3R_MCR" presynapticPopulation="M3R" postsynapticPopulation="MCR" synapse="Acetylcholine">
      <connection id="86" preCellId="../M3R/0/M3R" postCellId="../MCR/0/MCR" preSegmentId="1" postSegmentId="7" preFractionAlong="0.8025856795798129" postFractionAlong="0.5720486433693008"/>
    </projection>
    <projection id="NCXLS_MCR_M2L" presynapticPopulation="MCR" postsynapticPopulation="M2L" synapse="Acetylcholine">
      <connection id="87" preCellId="../MCR/0/MCR" postCellId="../M2L/0/M2L" preSegmentId="6" postSegmentId="9" preFractionAlong="0.39701504123719167" postFractionAlong="0.08709276679577149"/>
    </projection>
    <projection id="NCXLS_MCR_I1L" presynapticPopulation="MCR" postsynapticPopulation="I1L" synapse="Acetylcholine">
      <connection id="88" preCellId="../MCR/0/MCR" postCellId="../I1L/0/I1L" preSegmentId="9" postSegmentId="1" preFractionAlong="0.11383839347660141" postFractionAlong="0.3452231428016921"/>
    </projection>
    <projection id="NCXLS_MCR_I5" presynapticPopulation="MCR" postsynapticPopulation="I5" synapse="Acetylcholine">
      <connection id="89" preCellId="../MCR/0/MCR" postCellId="../I5/0/I5" preSegmentId="7" postSegmentId="7" preFractionAlong="0.8742225246851758" postFractionAlong="0.49354658034011867"/>
    </projection>
    <projection id="NCXLS_MCR_NSMR" presynapticPopulation="MCR" postsynapticPopulation="NSMR" synapse="Acetylcholine">
      <connection id="90" preCellId="../MCR/0/MCR" postCellId="../NSMR/0/NSMR" preSegmentId="3" postSegmentId="1" preFractionAlong="0.3898723529415441" postFractionAlong="0.7298603088484784"/>
    </projection>
    <projection id="NCXLS_MCR_I2L" presynapticPopulation="MCR" postsynapticPopulation="I2L" synapse="Acetylcholine">
      <connection id="91" preCellId="../MCR/0/MCR" postCellId="../I2L/0/I2L" preSegmentId="8" postSegmentId="8" preFractionAlong="0.6709430047425079" postFractionAlong="0.2581732541911692"/>
    </projection>
    <projection id="NCXLS_MCR_M3R" presynapticPopulation="MCR" postsynapticPopulation="M3R" synapse="Acetylcholine">
      <connection id="92" preCellId="../MCR/0/MCR" postCellId="../M3R/0/M3R" preSegmentId="1" postSegmentId="7" preFractionAlong="0.9540331275850406" postFractionAlong="0.7213934511062883"/>
    </projection>
  </network>
</neuroml>
