<?xml version='1.0' encoding='UTF-8'?>
<neuroml xmlns="http://www.neuroml.org/schema/neuroml2" xmlns:xsi="http://www.w3.org/2001/XMLSchema-instance" xsi:schemaLocation="http://www.neuroml.org/schema/neuroml2 https://raw.githubusercontent.com/NeuroML/NeuroML2/development/Schemas/NeuroML2/NeuroML_v2beta4.xsd" id="gvft_network_bio_prior_lamW_0_144_DF_0_019_t100_net">
  <notes>NeuroML2 network generated from GVFT simulation on 2025-05-05 09:25:24
</notes>
  <include href="AVAL.cell.nml"/>
  <include href="AVAR.cell.nml"/>
  <include href="AVKL.cell.nml"/>
  <include href="AVKR.cell.nml"/>
  <include href="RIS.cell.nml"/>
  <include href="RMDDL.cell.nml"/>
  <include href="RMDDR.cell.nml"/>
  <include href="RMDVL.cell.nml"/>
  <include href="RMDVR.cell.nml"/>
  <include href="SMBVL.cell.nml"/>
  <include href="SMBVR.cell.nml"/>
  <include href="URXL.cell.nml"/>
  <include href="URXR.cell.nml"/>
  <include href="MCL.cell.nml"/>
  <include href="I4.cell.nml"/>
  <include href="M5.cell.nml"/>
  <include href="I1L.cell.nml"/>
  <include href="NSMR.cell.nml"/>
  <include href="NSML.cell.nml"/>
  <include href="I2R.cell.nml"/>
  <include href="M4.cell.nml"/>
  <include href="MCR.cell.nml"/>
  <include href="M3R.cell.nml"/>
  <include href="I6.cell.nml"/>
  <include href="MI.cell.nml"/>
  <include href="I2L.cell.nml"/>
  <include href="I3.cell.nml"/>
  <include href="M2R.cell.nml"/>
  <include href="M3L.cell.nml"/>
  <include href="I1R.cell.nml"/>
  <include href="M1.cell.nml"/>
  <include href="I5.cell.nml"/>
  <include href="M2L.cell.nml"/>
  <include href="Glutamate.synapse.nml"/>
  <include href="Acetylcholine.synapse.nml"/>
  <include href="Serotonin_Glutamate.synapse.nml"/>
  <include href="Generic_GJ.nml"/>
  <network id="gvft_network_bio_prior_lamW_0_144_DF_0_019_t100_net" type="networkWithTemperature" temperature="20.0 degC">
    <population id="M1" component="M1" type="populationList" size="1">
      <instance id="0">
        <location x="0.47738695" y="-0.9798995" z="0.0"/>
      </instance>
    </population>
    <population id="M2L" component="M2L" type="populationList" size="1">
      <instance id="0">
        <location x="0.9698492" y="-0.94974875" z="0.0"/>
      </instance>
    </population>
    <population id="M2R" component="M2R" type="populationList" size="1">
      <instance id="0">
        <location x="1.0" y="-0.42713568" z="0.0"/>
      </instance>
    </population>
    <population id="M3L" component="M3L" type="populationList" size="1">
      <instance id="0">
        <location x="-0.6281407" y="-0.5075377" z="0.0"/>
      </instance>
    </population>
    <population id="M3R" component="M3R" type="populationList" size="1">
      <instance id="0">
        <location x="0.5477387" y="0.0050251363" z="0.0"/>
      </instance>
    </population>
    <population id="M4" component="M4" type="populationList" size="1">
      <instance id="0">
        <location x="0.1557789" y="-0.04522614" z="0.0"/>
      </instance>
    </population>
    <population id="M5" component="M5" type="populationList" size="1">
      <instance id="0">
        <location x="0.53768843" y="0.46733668" z="0.0"/>
      </instance>
    </population>
    <population id="I1L" component="I1L" type="populationList" size="1">
      <instance id="0">
        <location x="-0.76884425" y="0.7788945" z="0.0"/>
      </instance>
    </population>
    <population id="I1R" component="I1R" type="populationList" size="1">
      <instance id="0">
        <location x="-0.67839193" y="0.67839193" z="0.0"/>
      </instance>
    </population>
    <population id="I2L" component="I2L" type="populationList" size="1">
      <instance id="0">
        <location x="0.33668342" y="0.80904526" z="0.0"/>
      </instance>
    </population>
    <population id="I2R" component="I2R" type="populationList" size="1">
      <instance id="0">
        <location x="0.53768843" y="0.7788945" z="0.0"/>
      </instance>
    </population>
    <population id="I3" component="I3" type="populationList" size="1">
      <instance id="0">
        <location x="0.7788945" y="0.9296482" z="0.0"/>
      </instance>
    </population>
    <population id="I4" component="I4" type="populationList" size="1">
      <instance id="0">
        <location x="-0.83919597" y="0.37688443" z="0.0"/>
      </instance>
    </population>
    <population id="I5" component="I5" type="populationList" size="1">
      <instance id="0">
        <location x="-0.959799" y="-0.7085427" z="0.0"/>
      </instance>
    </population>
    <population id="I6" component="I6" type="populationList" size="1">
      <instance id="0">
        <location x="-0.14572865" y="0.18592966" z="0.0"/>
      </instance>
    </population>
    <population id="MCL" component="MCL" type="populationList" size="1">
      <instance id="0">
        <location x="-0.79899496" y="0.055276394" z="0.0"/>
      </instance>
    </population>
    <population id="MCR" component="MCR" type="populationList" size="1">
      <instance id="0">
        <location x="0.90954775" y="0.44723618" z="0.0"/>
      </instance>
    </population>
    <population id="MI" component="MI" type="populationList" size="1">
      <instance id="0">
        <location x="-0.4874372" y="-0.31658292" z="0.0"/>
      </instance>
    </population>
    <population id="NSML" component="NSML" type="populationList" size="1">
      <instance id="0">
        <location x="-0.04522614" y="-0.67839193" z="0.0"/>
      </instance>
    </population>
    <population id="NSMR" component="NSMR" type="populationList" size="1">
      <instance id="0">
        <location x="0.41708544" y="-0.86934674" z="0.0"/>
      </instance>
    </population>
    <population id="AVAL" component="AVAL" type="populationList" size="1">
      <instance id="0">
        <location x="5.0" y="0.0" z="0.0"/>
      </instance>
    </population>
    <population id="AVAR" component="AVAR" type="populationList" size="1">
      <instance id="0">
        <location x="5.0" y="0.0" z="0.0"/>
      </instance>
    </population>
    <population id="AVKL" component="AVKL" type="populationList" size="1">
      <instance id="0">
        <location x="5.0" y="0.0" z="0.0"/>
      </instance>
    </population>
    <population id="AVKR" component="AVKR" type="populationList" size="1">
      <instance id="0">
        <location x="5.0" y="0.0" z="0.0"/>
      </instance>
    </population>
    <population id="RIS" component="RIS" type="populationList" size="1">
      <instance id="0">
        <location x="5.0" y="0.0" z="0.0"/>
      </instance>
    </population>
    <population id="RMDDL" component="RMDDL" type="populationList" size="1">
      <instance id="0">
        <location x="5.0" y="0.0" z="0.0"/>
      </instance>
    </population>
    <population id="RMDDR" component="RMDDR" type="populationList" size="1">
      <instance id="0">
        <location x="5.0" y="0.0" z="0.0"/>
      </instance>
    </population>
    <population id="RMDVL" component="RMDVL" type="populationList" size="1">
      <instance id="0">
        <location x="5.0" y="0.0" z="0.0"/>
      </instance>
    </population>
    <population id="RMDVR" component="RMDVR" type="populationList" size="1">
      <instance id="0">
        <location x="5.0" y="0.0" z="0.0"/>
      </instance>
    </population>
    <population id="SMBVL" component="SMBVL" type="populationList" size="1">
      <instance id="0">
        <location x="5.0" y="0.0" z="0.0"/>
      </instance>
    </population>
    <population id="SMBVR" component="SMBVR" type="populationList" size="1">
      <instance id="0">
        <location x="5.0" y="0.0" z="0.0"/>
      </instance>
    </population>
    <population id="URXL" component="URXL" type="populationList" size="1">
      <instance id="0">
        <location x="5.0" y="0.0" z="0.0"/>
      </instance>
    </population>
    <population id="URXR" component="URXR" type="populationList" size="1">
      <instance id="0">
        <location x="5.0" y="0.0" z="0.0"/>
      </instance>
    </population>
    <projection id="NCXLS_I4_I1R" presynapticPopulation="I4" postsynapticPopulation="I1R" synapse="Acetylcholine">
      <connection id="0" preCellId="../I4/0/I4" postCellId="../I1R/0/I1R" preSegmentId="7" postSegmentId="2" preFractionAlong="0.7604243116824717" postFractionAlong="0.5129221647747657"/>
    </projection>
    <projection id="NCXLS_I4_I3" presynapticPopulation="I4" postsynapticPopulation="I3" synapse="Acetylcholine">
      <connection id="1" preCellId="../I4/0/I4" postCellId="../I3/0/I3" preSegmentId="7" postSegmentId="2" preFractionAlong="0.3978657030174272" postFractionAlong="0.827553052274047"/>
    </projection>
    <projection id="NCXLS_I4_I1L" presynapticPopulation="I4" postsynapticPopulation="I1L" synapse="Acetylcholine">
      <connection id="2" preCellId="../I4/0/I4" postCellId="../I1L/0/I1L" preSegmentId="5" postSegmentId="5" preFractionAlong="0.04545250043579596" postFractionAlong="0.6466004439486619"/>
    </projection>
    <projection id="NCXLS_I4_I2L" presynapticPopulation="I4" postsynapticPopulation="I2L" synapse="Acetylcholine">
      <connection id="3" preCellId="../I4/0/I4" postCellId="../I2L/0/I2L" preSegmentId="3" postSegmentId="4" preFractionAlong="0.6700325378075668" postFractionAlong="0.4683301859338135"/>
    </projection>
    <projection id="NCXLS_M2R_NSML" presynapticPopulation="M2R" postsynapticPopulation="NSML" synapse="Acetylcholine">
      <connection id="4" preCellId="../M2R/0/M2R" postCellId="../NSML/0/NSML" preSegmentId="5" postSegmentId="7" preFractionAlong="0.6263223516561951" postFractionAlong="0.2784707289275523"/>
    </projection>
    <projection id="NCXLS_M2R_I4" presynapticPopulation="M2R" postsynapticPopulation="I4" synapse="Acetylcholine">
      <connection id="5" preCellId="../M2R/0/M2R" postCellId="../I4/0/I4" preSegmentId="9" postSegmentId="4" preFractionAlong="0.9283835056363074" postFractionAlong="0.9963982936790554"/>
    </projection>
    <projection id="NCXLS_M2R_I1R" presynapticPopulation="M2R" postsynapticPopulation="I1R" synapse="Acetylcholine">
      <connection id="6" preCellId="../M2R/0/M2R" postCellId="../I1R/0/I1R" preSegmentId="3" postSegmentId="2" preFractionAlong="0.21550075886755105" postFractionAlong="0.33600705899010874"/>
    </projection>
    <projection id="NCXLS_M2R_I6" presynapticPopulation="M2R" postsynapticPopulation="I6" synapse="Acetylcholine">
      <connection id="7" preCellId="../M2R/0/M2R" postCellId="../I6/0/I6" preSegmentId="1" postSegmentId="9" preFractionAlong="0.6083195000077717" postFractionAlong="0.28104975016688916"/>
    </projection>
    <projection id="NCXLS_M2R_MCL" presynapticPopulation="M2R" postsynapticPopulation="MCL" synapse="Acetylcholine">
      <connection id="8" preCellId="../M2R/0/M2R" postCellId="../MCL/0/MCL" preSegmentId="1" postSegmentId="8" preFractionAlong="0.19984127128193951" postFractionAlong="0.055525032809150554"/>
    </projection>
    <projection id="NCXLS_M2R_I5" presynapticPopulation="M2R" postsynapticPopulation="I5" synapse="Acetylcholine">
      <connection id="9" preCellId="../M2R/0/M2R" postCellId="../I5/0/I5" preSegmentId="7" postSegmentId="1" preFractionAlong="0.21078144935468823" postFractionAlong="0.5564562058254564"/>
    </projection>
    <projection id="NCXLS_M2R_M3L" presynapticPopulation="M2R" postsynapticPopulation="M3L" synapse="Glutamate">
      <connection id="10" preCellId="../M2R/0/M2R" postCellId="../M3L/0/M3L" preSegmentId="5" postSegmentId="5" preFractionAlong="0.83506594545502" postFractionAlong="0.9273551805862972"/>
    </projection>
    <projection id="NCXLS_M2R_M5" presynapticPopulation="M2R" postsynapticPopulation="M5" synapse="Acetylcholine">
      <connection id="11" preCellId="../M2R/0/M2R" postCellId="../M5/0/M5" preSegmentId="6" postSegmentId="2" preFractionAlong="0.3180495725509187" postFractionAlong="0.7494260059808087"/>
    </projection>
    <projection id="NCXLS_M2R_M1" presynapticPopulation="M2R" postsynapticPopulation="M1" synapse="Acetylcholine">
      <connection id="12" preCellId="../M2R/0/M2R" postCellId="../M1/0/M1" preSegmentId="3" postSegmentId="6" preFractionAlong="0.08754866402778061" postFractionAlong="0.2828011306704997"/>
    </projection>
    <projection id="NCXLS_M2R_NSMR" presynapticPopulation="M2R" postsynapticPopulation="NSMR" synapse="Acetylcholine">
      <connection id="13" preCellId="../M2R/0/M2R" postCellId="../NSMR/0/NSMR" preSegmentId="3" postSegmentId="8" preFractionAlong="0.03010387221131894" postFractionAlong="0.9614923245741122"/>
    </projection>
    <projection id="NCXLS_M2R_MI" presynapticPopulation="M2R" postsynapticPopulation="MI" synapse="Acetylcholine">
      <connection id="14" preCellId="../M2R/0/M2R" postCellId="../MI/0/MI" preSegmentId="8" postSegmentId="3" preFractionAlong="0.6370947008244425" postFractionAlong="0.5972924203534693"/>
    </projection>
    <projection id="NCXLS_M2R_M4" presynapticPopulation="M2R" postsynapticPopulation="M4" synapse="Acetylcholine">
      <connection id="15" preCellId="../M2R/0/M2R" postCellId="../M4/0/M4" preSegmentId="6" postSegmentId="3" preFractionAlong="0.19230989603362747" postFractionAlong="0.2956545416124853"/>
    </projection>
    <projection id="NCXLS_M2R_M2L" presynapticPopulation="M2R" postsynapticPopulation="M2L" synapse="Acetylcholine">
      <connection id="16" preCellId="../M2R/0/M2R" postCellId="../M2L/0/M2L" preSegmentId="6" postSegmentId="7" preFractionAlong="0.5996275684599214" postFractionAlong="0.5063303093542678"/>
    </projection>
    <projection id="NCXLS_M2R_M3R" presynapticPopulation="M2R" postsynapticPopulation="M3R" synapse="Acetylcholine">
      <connection id="17" preCellId="../M2R/0/M2R" postCellId="../M3R/0/M3R" preSegmentId="6" postSegmentId="1" preFractionAlong="0.28161604210563174" postFractionAlong="0.9633603204460379"/>
    </projection>
    <projection id="NCXLS_M2R_I1L" presynapticPopulation="M2R" postsynapticPopulation="I1L" synapse="Acetylcholine">
      <connection id="18" preCellId="../M2R/0/M2R" postCellId="../I1L/0/I1L" preSegmentId="4" postSegmentId="1" preFractionAlong="0.7062461625552622" postFractionAlong="0.6226895409497974"/>
    </projection>
    <projection id="NCXLS_M2R_I2L" presynapticPopulation="M2R" postsynapticPopulation="I2L" synapse="Acetylcholine">
      <connection id="19" preCellId="../M2R/0/M2R" postCellId="../I2L/0/I2L" preSegmentId="3" postSegmentId="3" preFractionAlong="0.14225523977681542" postFractionAlong="0.3131632018297771"/>
    </projection>
    <projection id="NCXLS_I1R_I1L" presynapticPopulation="I1R" postsynapticPopulation="I1L" synapse="Glutamate">
      <connection id="20" preCellId="../I1R/0/I1R" postCellId="../I1L/0/I1L" preSegmentId="1" postSegmentId="2" preFractionAlong="0.9916960733724518" postFractionAlong="0.5410028989276625"/>
    </projection>
    <projection id="NCXLS_I6_I1R" presynapticPopulation="I6" postsynapticPopulation="I1R" synapse="Acetylcholine">
      <connection id="21" preCellId="../I6/0/I6" postCellId="../I1R/0/I1R" preSegmentId="8" postSegmentId="8" preFractionAlong="0.37250893155346587" postFractionAlong="0.9286305621153941"/>
    </projection>
    <projection id="NCXLS_I6_MCL" presynapticPopulation="I6" postsynapticPopulation="MCL" synapse="Acetylcholine">
      <connection id="22" preCellId="../I6/0/I6" postCellId="../MCL/0/MCL" preSegmentId="9" postSegmentId="8" preFractionAlong="0.5952128341268748" postFractionAlong="0.15047227100599747"/>
    </projection>
    <projection id="NCXLS_I6_I1L" presynapticPopulation="I6" postsynapticPopulation="I1L" synapse="Acetylcholine">
      <connection id="23" preCellId="../I6/0/I6" postCellId="../I1L/0/I1L" preSegmentId="9" postSegmentId="2" preFractionAlong="0.1893934178848461" postFractionAlong="0.005026552609803114"/>
    </projection>
    <projection id="NCXLS_I6_I2L" presynapticPopulation="I6" postsynapticPopulation="I2L" synapse="Acetylcholine">
      <connection id="24" preCellId="../I6/0/I6" postCellId="../I2L/0/I2L" preSegmentId="6" postSegmentId="9" preFractionAlong="0.7511771369540428" postFractionAlong="0.753868082709913"/>
    </projection>
    <projection id="NCXLS_MCL_I2R" presynapticPopulation="MCL" postsynapticPopulation="I2R" synapse="Acetylcholine">
      <connection id="25" preCellId="../MCL/0/MCL" postCellId="../I2R/0/I2R" preSegmentId="3" postSegmentId="3" preFractionAlong="0.29426673663711433" postFractionAlong="0.1147969272512801"/>
    </projection>
    <projection id="NCXLS_MCL_I4" presynapticPopulation="MCL" postsynapticPopulation="I4" synapse="Acetylcholine">
      <connection id="26" preCellId="../MCL/0/MCL" postCellId="../I4/0/I4" preSegmentId="1" postSegmentId="3" preFractionAlong="0.21244727719547296" postFractionAlong="0.6635235939134523"/>
    </projection>
    <projection id="NCXLS_MCL_I1R" presynapticPopulation="MCL" postsynapticPopulation="I1R" synapse="Acetylcholine">
      <connection id="27" preCellId="../MCL/0/MCL" postCellId="../I1R/0/I1R" preSegmentId="2" postSegmentId="7" preFractionAlong="0.8845868882296137" postFractionAlong="0.8955628481318387"/>
    </projection>
    <projection id="NCXLS_MCL_M5" presynapticPopulation="MCL" postsynapticPopulation="M5" synapse="Acetylcholine">
      <connection id="28" preCellId="../MCL/0/MCL" postCellId="../M5/0/M5" preSegmentId="7" postSegmentId="4" preFractionAlong="0.3138780765150273" postFractionAlong="0.6910558127392618"/>
    </projection>
    <projection id="NCXLS_MCL_I3" presynapticPopulation="MCL" postsynapticPopulation="I3" synapse="Acetylcholine">
      <connection id="29" preCellId="../MCL/0/MCL" postCellId="../I3/0/I3" preSegmentId="1" postSegmentId="6" preFractionAlong="0.19060983307444979" postFractionAlong="0.18463245734736922"/>
    </projection>
    <projection id="NCXLS_MCL_I1L" presynapticPopulation="MCL" postsynapticPopulation="I1L" synapse="Acetylcholine">
      <connection id="30" preCellId="../MCL/0/MCL" postCellId="../I1L/0/I1L" preSegmentId="5" postSegmentId="9" preFractionAlong="0.863135537735739" postFractionAlong="0.8224946492902271"/>
    </projection>
    <projection id="NCXLS_MCL_I2L" presynapticPopulation="MCL" postsynapticPopulation="I2L" synapse="Acetylcholine">
      <connection id="31" preCellId="../MCL/0/MCL" postCellId="../I2L/0/I2L" preSegmentId="5" postSegmentId="1" preFractionAlong="0.11692353552539148" postFractionAlong="0.682153161561635"/>
    </projection>
    <projection id="NCXLS_MCR_I2R" presynapticPopulation="MCR" postsynapticPopulation="I2R" synapse="Acetylcholine">
      <connection id="32" preCellId="../MCR/0/MCR" postCellId="../I2R/0/I2R" preSegmentId="4" postSegmentId="9" preFractionAlong="0.16440552907887873" postFractionAlong="0.11658307455569672"/>
    </projection>
    <projection id="NCXLS_MCR_I3" presynapticPopulation="MCR" postsynapticPopulation="I3" synapse="Acetylcholine">
      <connection id="33" preCellId="../MCR/0/MCR" postCellId="../I3/0/I3" preSegmentId="5" postSegmentId="6" preFractionAlong="0.9024130332861034" postFractionAlong="0.34395768655768555"/>
    </projection>
    <projection id="NCXLS_MCR_I2L" presynapticPopulation="MCR" postsynapticPopulation="I2L" synapse="Acetylcholine">
      <connection id="34" preCellId="../MCR/0/MCR" postCellId="../I2L/0/I2L" preSegmentId="7" postSegmentId="4" preFractionAlong="0.5814171055820205" postFractionAlong="0.10585323587790885"/>
    </projection>
    <projection id="NCXLS_M3L_I2R" presynapticPopulation="M3L" postsynapticPopulation="I2R" synapse="Acetylcholine">
      <connection id="35" preCellId="../M3L/0/M3L" postCellId="../I2R/0/I2R" preSegmentId="3" postSegmentId="6" preFractionAlong="0.5231430206971652" postFractionAlong="0.6996899090587084"/>
    </projection>
    <projection id="NCXLS_M3L_I4" presynapticPopulation="M3L" postsynapticPopulation="I4" synapse="Acetylcholine">
      <connection id="36" preCellId="../M3L/0/M3L" postCellId="../I4/0/I4" preSegmentId="8" postSegmentId="2" preFractionAlong="0.5605798090010486" postFractionAlong="0.9426591769666305"/>
    </projection>
    <projection id="NCXLS_M3L_M2R" presynapticPopulation="M3L" postsynapticPopulation="M2R" synapse="Acetylcholine">
      <connection id="37" preCellId="../M3L/0/M3L" postCellId="../M2R/0/M2R" preSegmentId="8" postSegmentId="7" preFractionAlong="0.25393777192369615" postFractionAlong="0.7799883269105443"/>
    </projection>
    <projection id="NCXLS_M3L_I1R" presynapticPopulation="M3L" postsynapticPopulation="I1R" synapse="Acetylcholine">
      <connection id="38" preCellId="../M3L/0/M3L" postCellId="../I1R/0/I1R" preSegmentId="5" postSegmentId="7" preFractionAlong="0.36154139875403857" postFractionAlong="0.09216795847243231"/>
    </projection>
    <projection id="NCXLS_M3L_I6" presynapticPopulation="M3L" postsynapticPopulation="I6" synapse="Acetylcholine">
      <connection id="39" preCellId="../M3L/0/M3L" postCellId="../I6/0/I6" preSegmentId="6" postSegmentId="5" preFractionAlong="0.06723418009056115" postFractionAlong="0.5948473795019096"/>
    </projection>
    <projection id="NCXLS_M3L_MCL" presynapticPopulation="M3L" postsynapticPopulation="MCL" synapse="Acetylcholine">
      <connection id="40" preCellId="../M3L/0/M3L" postCellId="../MCL/0/MCL" preSegmentId="1" postSegmentId="8" preFractionAlong="0.03244344604718696" postFractionAlong="0.6587176387270222"/>
    </projection>
    <projection id="NCXLS_M3L_MCR" presynapticPopulation="M3L" postsynapticPopulation="MCR" synapse="Acetylcholine">
      <connection id="41" preCellId="../M3L/0/M3L" postCellId="../MCR/0/MCR" preSegmentId="7" postSegmentId="8" preFractionAlong="0.2963576135132884" postFractionAlong="0.9383157286513161"/>
    </projection>
    <projection id="NCXLS_M3L_M5" presynapticPopulation="M3L" postsynapticPopulation="M5" synapse="Acetylcholine">
      <connection id="42" preCellId="../M3L/0/M3L" postCellId="../M5/0/M5" preSegmentId="6" postSegmentId="9" preFractionAlong="0.031778484357324444" postFractionAlong="0.7820507692637583"/>
    </projection>
    <projection id="NCXLS_M3L_I3" presynapticPopulation="M3L" postsynapticPopulation="I3" synapse="Acetylcholine">
      <connection id="43" preCellId="../M3L/0/M3L" postCellId="../I3/0/I3" preSegmentId="8" postSegmentId="2" preFractionAlong="0.05034952696935324" postFractionAlong="0.05276525785960262"/>
    </projection>
    <projection id="NCXLS_M3L_MI" presynapticPopulation="M3L" postsynapticPopulation="MI" synapse="Acetylcholine">
      <connection id="44" preCellId="../M3L/0/M3L" postCellId="../MI/0/MI" preSegmentId="1" postSegmentId="7" preFractionAlong="0.21825987269372948" postFractionAlong="0.9894317657796315"/>
    </projection>
    <projection id="NCXLS_M3L_M4" presynapticPopulation="M3L" postsynapticPopulation="M4" synapse="Glutamate">
      <connection id="45" preCellId="../M3L/0/M3L" postCellId="../M4/0/M4" preSegmentId="1" postSegmentId="1" preFractionAlong="0.13788526935601042" postFractionAlong="0.6887625408113653"/>
    </projection>
    <projection id="NCXLS_M3L_M3R" presynapticPopulation="M3L" postsynapticPopulation="M3R" synapse="Glutamate">
      <connection id="46" preCellId="../M3L/0/M3L" postCellId="../M3R/0/M3R" preSegmentId="5" postSegmentId="1" preFractionAlong="0.07643986103944767" postFractionAlong="0.8958841811926596"/>
    </projection>
    <projection id="NCXLS_M3L_I1L" presynapticPopulation="M3L" postsynapticPopulation="I1L" synapse="Acetylcholine">
      <connection id="47" preCellId="../M3L/0/M3L" postCellId="../I1L/0/I1L" preSegmentId="8" postSegmentId="1" preFractionAlong="0.328179482797612" postFractionAlong="0.20905937370684602"/>
    </projection>
    <projection id="NCXLS_M3L_I2L" presynapticPopulation="M3L" postsynapticPopulation="I2L" synapse="Acetylcholine">
      <connection id="48" preCellId="../M3L/0/M3L" postCellId="../I2L/0/I2L" preSegmentId="1" postSegmentId="6" preFractionAlong="0.4666931208844084" postFractionAlong="0.4821320989198419"/>
    </projection>
    <projection id="NCXLS_M5_I2R" presynapticPopulation="M5" postsynapticPopulation="I2R" synapse="Acetylcholine">
      <connection id="49" preCellId="../M5/0/M5" postCellId="../I2R/0/I2R" preSegmentId="6" postSegmentId="3" preFractionAlong="0.22123869644606398" postFractionAlong="0.3809912736683999"/>
    </projection>
    <projection id="NCXLS_M5_I4" presynapticPopulation="M5" postsynapticPopulation="I4" synapse="Acetylcholine">
      <connection id="50" preCellId="../M5/0/M5" postCellId="../I4/0/I4" preSegmentId="6" postSegmentId="1" preFractionAlong="0.2757574044412813" postFractionAlong="0.20424675891216748"/>
    </projection>
    <projection id="NCXLS_M5_I1R" presynapticPopulation="M5" postsynapticPopulation="I1R" synapse="Acetylcholine">
      <connection id="51" preCellId="../M5/0/M5" postCellId="../I1R/0/I1R" preSegmentId="6" postSegmentId="5" preFractionAlong="0.93374942300147" postFractionAlong="0.6838664518353432"/>
    </projection>
    <projection id="NCXLS_M5_I6" presynapticPopulation="M5" postsynapticPopulation="I6" synapse="Acetylcholine">
      <connection id="52" preCellId="../M5/0/M5" postCellId="../I6/0/I6" preSegmentId="9" postSegmentId="2" preFractionAlong="0.032659060784495875" postFractionAlong="0.4755961918220083"/>
    </projection>
    <projection id="NCXLS_M5_MCL" presynapticPopulation="M5" postsynapticPopulation="MCL" synapse="Acetylcholine">
      <connection id="53" preCellId="../M5/0/M5" postCellId="../MCL/0/MCL" preSegmentId="4" postSegmentId="6" preFractionAlong="0.16121881197512256" postFractionAlong="0.6564096035006569"/>
    </projection>
    <projection id="NCXLS_M5_I3" presynapticPopulation="M5" postsynapticPopulation="I3" synapse="Acetylcholine">
      <connection id="54" preCellId="../M5/0/M5" postCellId="../I3/0/I3" preSegmentId="2" postSegmentId="4" preFractionAlong="0.5621888110645251" postFractionAlong="0.7147532764439458"/>
    </projection>
    <projection id="NCXLS_M5_I1L" presynapticPopulation="M5" postsynapticPopulation="I1L" synapse="Acetylcholine">
      <connection id="55" preCellId="../M5/0/M5" postCellId="../I1L/0/I1L" preSegmentId="7" postSegmentId="7" preFractionAlong="0.5123003468870806" postFractionAlong="0.7735721017307203"/>
    </projection>
    <projection id="NCXLS_M5_I2L" presynapticPopulation="M5" postsynapticPopulation="I2L" synapse="Acetylcholine">
      <connection id="56" preCellId="../M5/0/M5" postCellId="../I2L/0/I2L" preSegmentId="3" postSegmentId="1" preFractionAlong="0.648235897382097" postFractionAlong="0.23148009591298824"/>
    </projection>
    <projection id="NCXLS_M1_NSML" presynapticPopulation="M1" postsynapticPopulation="NSML" synapse="Acetylcholine">
      <connection id="57" preCellId="../M1/0/M1" postCellId="../NSML/0/NSML" preSegmentId="3" postSegmentId="8" preFractionAlong="0.31965205529206253" postFractionAlong="0.43817671666635527"/>
    </projection>
    <projection id="NCXLS_M1_I4" presynapticPopulation="M1" postsynapticPopulation="I4" synapse="Acetylcholine">
      <connection id="58" preCellId="../M1/0/M1" postCellId="../I4/0/I4" preSegmentId="7" postSegmentId="2" preFractionAlong="0.10587431821312931" postFractionAlong="0.35489768348655404"/>
    </projection>
    <projection id="NCXLS_M1_I1R" presynapticPopulation="M1" postsynapticPopulation="I1R" synapse="Acetylcholine">
      <connection id="59" preCellId="../M1/0/M1" postCellId="../I1R/0/I1R" preSegmentId="6" postSegmentId="5" preFractionAlong="0.07010813964125695" postFractionAlong="0.3952593154311578"/>
    </projection>
    <projection id="NCXLS_M1_I6" presynapticPopulation="M1" postsynapticPopulation="I6" synapse="Acetylcholine">
      <connection id="60" preCellId="../M1/0/M1" postCellId="../I6/0/I6" preSegmentId="4" postSegmentId="8" preFractionAlong="0.1568127053168057" postFractionAlong="0.8273021497372459"/>
    </projection>
    <projection id="NCXLS_M1_MCL" presynapticPopulation="M1" postsynapticPopulation="MCL" synapse="Acetylcholine">
      <connection id="61" preCellId="../M1/0/M1" postCellId="../MCL/0/MCL" preSegmentId="4" postSegmentId="2" preFractionAlong="0.5570405132750351" postFractionAlong="0.23138063637684803"/>
    </projection>
    <projection id="NCXLS_M1_I5" presynapticPopulation="M1" postsynapticPopulation="I5" synapse="Acetylcholine">
      <connection id="62" preCellId="../M1/0/M1" postCellId="../I5/0/I5" preSegmentId="8" postSegmentId="9" preFractionAlong="0.3130501450631469" postFractionAlong="0.8364984906180335"/>
    </projection>
    <projection id="NCXLS_M1_M3L" presynapticPopulation="M1" postsynapticPopulation="M3L" synapse="Acetylcholine">
      <connection id="63" preCellId="../M1/0/M1" postCellId="../M3L/0/M3L" preSegmentId="7" postSegmentId="8" preFractionAlong="0.46461316880897086" postFractionAlong="0.37961676445167025"/>
    </projection>
    <projection id="NCXLS_M1_NSMR" presynapticPopulation="M1" postsynapticPopulation="NSMR" synapse="Acetylcholine">
      <connection id="64" preCellId="../M1/0/M1" postCellId="../NSMR/0/NSMR" preSegmentId="9" postSegmentId="3" preFractionAlong="0.0913741048604092" postFractionAlong="0.3148258293516488"/>
    </projection>
    <projection id="NCXLS_M1_MI" presynapticPopulation="M1" postsynapticPopulation="MI" synapse="Acetylcholine">
      <connection id="65" preCellId="../M1/0/M1" postCellId="../MI/0/MI" preSegmentId="2" postSegmentId="5" preFractionAlong="0.7809638636444353" postFractionAlong="0.39822779395801167"/>
    </projection>
    <projection id="NCXLS_M1_M4" presynapticPopulation="M1" postsynapticPopulation="M4" synapse="Acetylcholine">
      <connection id="66" preCellId="../M1/0/M1" postCellId="../M4/0/M4" preSegmentId="2" postSegmentId="7" preFractionAlong="0.832929715574228" postFractionAlong="0.5402965317903072"/>
    </projection>
    <projection id="NCXLS_M1_I1L" presynapticPopulation="M1" postsynapticPopulation="I1L" synapse="Acetylcholine">
      <connection id="67" preCellId="../M1/0/M1" postCellId="../I1L/0/I1L" preSegmentId="4" postSegmentId="7" preFractionAlong="0.5004773158667182" postFractionAlong="0.43377056601801756"/>
    </projection>
    <projection id="NCXLS_I3_M2R" presynapticPopulation="I3" postsynapticPopulation="M2R" synapse="Acetylcholine">
      <connection id="68" preCellId="../I3/0/I3" postCellId="../M2R/0/M2R" preSegmentId="8" postSegmentId="9" preFractionAlong="0.308468281489484" postFractionAlong="0.5730422006190157"/>
    </projection>
    <projection id="NCXLS_I3_MCR" presynapticPopulation="I3" postsynapticPopulation="MCR" synapse="Acetylcholine">
      <connection id="69" preCellId="../I3/0/I3" postCellId="../MCR/0/MCR" preSegmentId="8" postSegmentId="3" preFractionAlong="0.828488133895241" postFractionAlong="0.712845995860955"/>
    </projection>
    <projection id="NCXLS_I3_M2L" presynapticPopulation="I3" postsynapticPopulation="M2L" synapse="Glutamate">
      <connection id="70" preCellId="../I3/0/I3" postCellId="../M2L/0/M2L" preSegmentId="4" postSegmentId="4" preFractionAlong="0.23389693147220347" postFractionAlong="0.21088622768078813"/>
    </projection>
    <projection id="NCXLS_MI_I5" presynapticPopulation="MI" postsynapticPopulation="I5" synapse="Glutamate">
      <connection id="71" preCellId="../MI/0/MI" postCellId="../I5/0/I5" preSegmentId="6" postSegmentId="8" preFractionAlong="0.8054300430459791" postFractionAlong="0.9467562446922407"/>
    </projection>
    <projection id="NCXLS_MI_M3L" presynapticPopulation="MI" postsynapticPopulation="M3L" synapse="Glutamate">
      <connection id="72" preCellId="../MI/0/MI" postCellId="../M3L/0/M3L" preSegmentId="4" postSegmentId="6" preFractionAlong="0.7832979829560477" postFractionAlong="0.2659284506321188"/>
    </projection>
    <projection id="NCXLS_M4_I2R" presynapticPopulation="M4" postsynapticPopulation="I2R" synapse="Acetylcholine">
      <connection id="73" preCellId="../M4/0/M4" postCellId="../I2R/0/I2R" preSegmentId="3" postSegmentId="9" preFractionAlong="0.603528806501121" postFractionAlong="0.6595059816513271"/>
    </projection>
    <projection id="NCXLS_M4_I4" presynapticPopulation="M4" postsynapticPopulation="I4" synapse="Acetylcholine">
      <connection id="74" preCellId="../M4/0/M4" postCellId="../I4/0/I4" preSegmentId="1" postSegmentId="2" preFractionAlong="0.12038757878908901" postFractionAlong="0.9385297834731304"/>
    </projection>
    <projection id="NCXLS_M4_I1R" presynapticPopulation="M4" postsynapticPopulation="I1R" synapse="Acetylcholine">
      <connection id="75" preCellId="../M4/0/M4" postCellId="../I1R/0/I1R" preSegmentId="7" postSegmentId="3" preFractionAlong="0.8871193172236984" postFractionAlong="0.4198486976863176"/>
    </projection>
    <projection id="NCXLS_M4_I6" presynapticPopulation="M4" postsynapticPopulation="I6" synapse="Acetylcholine">
      <connection id="76" preCellId="../M4/0/M4" postCellId="../I6/0/I6" preSegmentId="4" postSegmentId="7" preFractionAlong="0.4171934185645765" postFractionAlong="0.1602256009765063"/>
    </projection>
    <projection id="NCXLS_M4_MCR" presynapticPopulation="M4" postsynapticPopulation="MCR" synapse="Acetylcholine">
      <connection id="77" preCellId="../M4/0/M4" postCellId="../MCR/0/MCR" preSegmentId="8" postSegmentId="9" preFractionAlong="0.7972110725787628" postFractionAlong="0.7242325476119492"/>
    </projection>
    <projection id="NCXLS_M4_M5" presynapticPopulation="M4" postsynapticPopulation="M5" synapse="Acetylcholine">
      <connection id="78" preCellId="../M4/0/M4" postCellId="../M5/0/M5" preSegmentId="7" postSegmentId="9" preFractionAlong="0.05239129559486122" postFractionAlong="0.15962490143216723"/>
    </projection>
    <projection id="NCXLS_M4_I3" presynapticPopulation="M4" postsynapticPopulation="I3" synapse="Acetylcholine">
      <connection id="79" preCellId="../M4/0/M4" postCellId="../I3/0/I3" preSegmentId="2" postSegmentId="3" preFractionAlong="0.2349942775346916" postFractionAlong="0.8301509829979181"/>
    </projection>
    <projection id="NCXLS_M4_M3R" presynapticPopulation="M4" postsynapticPopulation="M3R" synapse="Acetylcholine">
      <connection id="80" preCellId="../M4/0/M4" postCellId="../M3R/0/M3R" preSegmentId="6" postSegmentId="7" preFractionAlong="0.1354595367946908" postFractionAlong="0.23147521376529812"/>
    </projection>
    <projection id="NCXLS_M4_I1L" presynapticPopulation="M4" postsynapticPopulation="I1L" synapse="Acetylcholine">
      <connection id="81" preCellId="../M4/0/M4" postCellId="../I1L/0/I1L" preSegmentId="2" postSegmentId="9" preFractionAlong="0.41962738280681033" postFractionAlong="0.050622472269074126"/>
    </projection>
    <projection id="NCXLS_M4_I2L" presynapticPopulation="M4" postsynapticPopulation="I2L" synapse="Acetylcholine">
      <connection id="82" preCellId="../M4/0/M4" postCellId="../I2L/0/I2L" preSegmentId="1" postSegmentId="3" preFractionAlong="0.392895108893179" postFractionAlong="0.028652427577654516"/>
    </projection>
    <projection id="NCXLS_M2L_I2R" presynapticPopulation="M2L" postsynapticPopulation="I2R" synapse="Acetylcholine">
      <connection id="83" preCellId="../M2L/0/M2L" postCellId="../I2R/0/I2R" preSegmentId="6" postSegmentId="9" preFractionAlong="0.787371958149273" postFractionAlong="0.3064328227033716"/>
    </projection>
    <projection id="NCXLS_M2L_I4" presynapticPopulation="M2L" postsynapticPopulation="I4" synapse="Acetylcholine">
      <connection id="84" preCellId="../M2L/0/M2L" postCellId="../I4/0/I4" preSegmentId="4" postSegmentId="7" preFractionAlong="0.006257471026470229" postFractionAlong="0.06188570168047525"/>
    </projection>
    <projection id="NCXLS_M2L_M2R" presynapticPopulation="M2L" postsynapticPopulation="M2R" synapse="Glutamate">
      <connection id="85" preCellId="../M2L/0/M2L" postCellId="../M2R/0/M2R" preSegmentId="8" postSegmentId="7" preFractionAlong="0.13196531962396174" postFractionAlong="0.5131830837567788"/>
    </projection>
    <projection id="NCXLS_M2L_I1R" presynapticPopulation="M2L" postsynapticPopulation="I1R" synapse="Acetylcholine">
      <connection id="86" preCellId="../M2L/0/M2L" postCellId="../I1R/0/I1R" preSegmentId="8" postSegmentId="1" preFractionAlong="0.2217819781923186" postFractionAlong="0.31755457986950175"/>
    </projection>
    <projection id="NCXLS_M2L_I6" presynapticPopulation="M2L" postsynapticPopulation="I6" synapse="Acetylcholine">
      <connection id="87" preCellId="../M2L/0/M2L" postCellId="../I6/0/I6" preSegmentId="4" postSegmentId="5" preFractionAlong="0.0875912974059464" postFractionAlong="0.08991624485970229"/>
    </projection>
    <projection id="NCXLS_M2L_MCL" presynapticPopulation="M2L" postsynapticPopulation="MCL" synapse="Acetylcholine">
      <connection id="88" preCellId="../M2L/0/M2L" postCellId="../MCL/0/MCL" preSegmentId="4" postSegmentId="6" preFractionAlong="0.33745427896422897" postFractionAlong="0.8706884554574393"/>
    </projection>
    <projection id="NCXLS_M2L_MCR" presynapticPopulation="M2L" postsynapticPopulation="MCR" synapse="Acetylcholine">
      <connection id="89" preCellId="../M2L/0/M2L" postCellId="../MCR/0/MCR" preSegmentId="7" postSegmentId="7" preFractionAlong="0.051293848981215584" postFractionAlong="0.49253538071428926"/>
    </projection>
    <projection id="NCXLS_M2L_I3" presynapticPopulation="M2L" postsynapticPopulation="I3" synapse="Acetylcholine">
      <connection id="90" preCellId="../M2L/0/M2L" postCellId="../I3/0/I3" preSegmentId="5" postSegmentId="3" preFractionAlong="0.48439118560084926" postFractionAlong="0.6938055569674118"/>
    </projection>
    <projection id="NCXLS_M2L_MI" presynapticPopulation="M2L" postsynapticPopulation="MI" synapse="Acetylcholine">
      <connection id="91" preCellId="../M2L/0/M2L" postCellId="../MI/0/MI" preSegmentId="4" postSegmentId="3" preFractionAlong="0.2162505281865289" postFractionAlong="0.20858836774105072"/>
    </projection>
    <projection id="NCXLS_M2L_I1L" presynapticPopulation="M2L" postsynapticPopulation="I1L" synapse="Acetylcholine">
      <connection id="92" preCellId="../M2L/0/M2L" postCellId="../I1L/0/I1L" preSegmentId="5" postSegmentId="7" preFractionAlong="0.15389990469377368" postFractionAlong="0.1492494697414739"/>
    </projection>
    <projection id="NCXLS_M2L_I2L" presynapticPopulation="M2L" postsynapticPopulation="I2L" synapse="Acetylcholine">
      <connection id="93" preCellId="../M2L/0/M2L" postCellId="../I2L/0/I2L" preSegmentId="6" postSegmentId="4" preFractionAlong="0.40771577066522524" postFractionAlong="0.12556557863725137"/>
    </projection>
    <projection id="NCXLS_M3R_I2R" presynapticPopulation="M3R" postsynapticPopulation="I2R" synapse="Acetylcholine">
      <connection id="94" preCellId="../M3R/0/M3R" postCellId="../I2R/0/I2R" preSegmentId="2" postSegmentId="5" preFractionAlong="0.8273565548261456" postFractionAlong="0.5848386316888821"/>
    </projection>
    <projection id="NCXLS_M3R_I4" presynapticPopulation="M3R" postsynapticPopulation="I4" synapse="Acetylcholine">
      <connection id="95" preCellId="../M3R/0/M3R" postCellId="../I4/0/I4" preSegmentId="3" postSegmentId="7" preFractionAlong="0.802851208995546" postFractionAlong="0.24651990563798298"/>
    </projection>
    <projection id="NCXLS_M3R_I1R" presynapticPopulation="M3R" postsynapticPopulation="I1R" synapse="Acetylcholine">
      <connection id="96" preCellId="../M3R/0/M3R" postCellId="../I1R/0/I1R" preSegmentId="6" postSegmentId="4" preFractionAlong="0.8860861088135163" postFractionAlong="0.8956899442666165"/>
    </projection>
    <projection id="NCXLS_M3R_I6" presynapticPopulation="M3R" postsynapticPopulation="I6" synapse="Acetylcholine">
      <connection id="97" preCellId="../M3R/0/M3R" postCellId="../I6/0/I6" preSegmentId="4" postSegmentId="9" preFractionAlong="0.2299937539632405" postFractionAlong="0.41130397206623126"/>
    </projection>
    <projection id="NCXLS_M3R_MCL" presynapticPopulation="M3R" postsynapticPopulation="MCL" synapse="Acetylcholine">
      <connection id="98" preCellId="../M3R/0/M3R" postCellId="../MCL/0/MCL" preSegmentId="6" postSegmentId="4" preFractionAlong="0.6723838432917036" postFractionAlong="0.8260646845482855"/>
    </projection>
    <projection id="NCXLS_M3R_MCR" presynapticPopulation="M3R" postsynapticPopulation="MCR" synapse="Acetylcholine">
      <connection id="99" preCellId="../M3R/0/M3R" postCellId="../MCR/0/MCR" preSegmentId="9" postSegmentId="4" preFractionAlong="0.10559154597664" postFractionAlong="0.045294643613077445"/>
    </projection>
    <projection id="NCXLS_M3R_I5" presynapticPopulation="M3R" postsynapticPopulation="I5" synapse="Acetylcholine">
      <connection id="100" preCellId="../M3R/0/M3R" postCellId="../I5/0/I5" preSegmentId="7" postSegmentId="5" preFractionAlong="0.08202368521147085" postFractionAlong="0.034939246405988444"/>
    </projection>
    <projection id="NCXLS_M3R_M3L" presynapticPopulation="M3R" postsynapticPopulation="M3L" synapse="Acetylcholine">
      <connection id="101" preCellId="../M3R/0/M3R" postCellId="../M3L/0/M3L" preSegmentId="2" postSegmentId="9" preFractionAlong="0.15620150793059928" postFractionAlong="0.988420993963481"/>
    </projection>
    <projection id="NCXLS_M3R_M5" presynapticPopulation="M3R" postsynapticPopulation="M5" synapse="Acetylcholine">
      <connection id="102" preCellId="../M3R/0/M3R" postCellId="../M5/0/M5" preSegmentId="3" postSegmentId="3" preFractionAlong="0.5778070502510847" postFractionAlong="0.8661015453778347"/>
    </projection>
    <projection id="NCXLS_M3R_I3" presynapticPopulation="M3R" postsynapticPopulation="I3" synapse="Acetylcholine">
      <connection id="103" preCellId="../M3R/0/M3R" postCellId="../I3/0/I3" preSegmentId="3" postSegmentId="5" preFractionAlong="0.7680054353132096" postFractionAlong="0.4343614981412177"/>
    </projection>
    <projection id="NCXLS_M3R_MI" presynapticPopulation="M3R" postsynapticPopulation="MI" synapse="Acetylcholine">
      <connection id="104" preCellId="../M3R/0/M3R" postCellId="../MI/0/MI" preSegmentId="2" postSegmentId="2" preFractionAlong="0.3302846675020844" postFractionAlong="0.564231816684536"/>
    </projection>
    <projection id="NCXLS_M3R_M4" presynapticPopulation="M3R" postsynapticPopulation="M4" synapse="Acetylcholine">
      <connection id="105" preCellId="../M3R/0/M3R" postCellId="../M4/0/M4" preSegmentId="7" postSegmentId="5" preFractionAlong="0.4296228638968441" postFractionAlong="0.27893807607347676"/>
    </projection>
    <projection id="NCXLS_M3R_I1L" presynapticPopulation="M3R" postsynapticPopulation="I1L" synapse="Acetylcholine">
      <connection id="106" preCellId="../M3R/0/M3R" postCellId="../I1L/0/I1L" preSegmentId="7" postSegmentId="5" preFractionAlong="0.7795167014240635" postFractionAlong="0.01620039733946721"/>
    </projection>
    <projection id="NCXLS_M3R_I2L" presynapticPopulation="M3R" postsynapticPopulation="I2L" synapse="Acetylcholine">
      <connection id="107" preCellId="../M3R/0/M3R" postCellId="../I2L/0/I2L" preSegmentId="2" postSegmentId="1" preFractionAlong="0.8899133763628625" postFractionAlong="0.9919627472386433"/>
    </projection>
    <projection id="NCXLS_I2L_I3" presynapticPopulation="I2L" postsynapticPopulation="I3" synapse="Acetylcholine">
      <connection id="108" preCellId="../I2L/0/I2L" postCellId="../I3/0/I3" preSegmentId="1" postSegmentId="5" preFractionAlong="0.7653633638580407" postFractionAlong="0.2530263409202532"/>
    </projection>
    <projection id="NC_I1L_RMDDL" presynapticPopulation="I1L" postsynapticPopulation="RMDDL" synapse="Acetylcholine">
      <connection id="109" preCellId="../I1L/0/I1L" postCellId="../RMDDL/0/RMDDL" preSegmentId="8" postSegmentId="4" preFractionAlong="0.10284259215747671" postFractionAlong="0.12595519637935826"/>
    </projection>
    <projection id="NC_I1L_RMDVL" presynapticPopulation="I1L" postsynapticPopulation="RMDVL" synapse="Acetylcholine">
      <connection id="110" preCellId="../I1L/0/I1L" postCellId="../RMDVL/0/RMDVL" preSegmentId="8" postSegmentId="2" preFractionAlong="0.6738388982700046" postFractionAlong="0.8468872244289528"/>
    </projection>
    <projection id="NC_I1R_RMDDR" presynapticPopulation="I1R" postsynapticPopulation="RMDDR" synapse="Acetylcholine">
      <connection id="111" preCellId="../I1R/0/I1R" postCellId="../RMDDR/0/RMDDR" preSegmentId="3" postSegmentId="1" preFractionAlong="0.9439282834764579" postFractionAlong="0.7658290392349099"/>
    </projection>
    <projection id="NC_I1R_RMDVR" presynapticPopulation="I1R" postsynapticPopulation="RMDVR" synapse="Acetylcholine">
      <connection id="112" preCellId="../I1R/0/I1R" postCellId="../RMDVR/0/RMDVR" preSegmentId="2" postSegmentId="6" preFractionAlong="0.42906236930266595" postFractionAlong="0.27592269438054684"/>
    </projection>
    <projection id="NC_I2L_URXL" presynapticPopulation="I2L" postsynapticPopulation="URXL" synapse="Glutamate">
      <connection id="113" preCellId="../I2L/0/I2L" postCellId="../URXL/0/URXL" preSegmentId="9" postSegmentId="8" preFractionAlong="0.3238195749024314" postFractionAlong="0.6611406784286965"/>
    </projection>
    <projection id="NC_I2R_URXR" presynapticPopulation="I2R" postsynapticPopulation="URXR" synapse="Glutamate">
      <connection id="114" preCellId="../I2R/0/I2R" postCellId="../URXR/0/URXR" preSegmentId="6" postSegmentId="5" preFractionAlong="0.6504252488238643" postFractionAlong="0.21233397428689127"/>
    </projection>
    <projection id="NC_AVKL_I1L" presynapticPopulation="AVKL" postsynapticPopulation="I1L" synapse="Acetylcholine">
      <connection id="115" preCellId="../AVKL/0/AVKL" postCellId="../I1L/0/I1L" preSegmentId="9" postSegmentId="4" preFractionAlong="0.7013832855596901" postFractionAlong="0.11344081710391674"/>
    </projection>
    <projection id="NC_AVKR_I1R" presynapticPopulation="AVKR" postsynapticPopulation="I1R" synapse="Acetylcholine">
      <connection id="116" preCellId="../AVKR/0/AVKR" postCellId="../I1R/0/I1R" preSegmentId="2" postSegmentId="9" preFractionAlong="0.9288595498455656" postFractionAlong="0.33197150473584547"/>
    </projection>
    <projection id="NC_RIS_I1L" presynapticPopulation="RIS" postsynapticPopulation="I1L" synapse="Glutamate">
      <connection id="117" preCellId="../RIS/0/RIS" postCellId="../I1L/0/I1L" preSegmentId="9" postSegmentId="9" preFractionAlong="0.258591591134784" postFractionAlong="0.027852240821074403"/>
    </projection>
    <projection id="NC_RIS_I1R" presynapticPopulation="RIS" postsynapticPopulation="I1R" synapse="Glutamate">
      <connection id="118" preCellId="../RIS/0/RIS" postCellId="../I1R/0/I1R" preSegmentId="2" postSegmentId="1" preFractionAlong="0.6728471334885447" postFractionAlong="0.7242545274991332"/>
    </projection>
    <projection id="NC_AVAL_I2L" presynapticPopulation="AVAL" postsynapticPopulation="I2L" synapse="Acetylcholine">
      <connection id="119" preCellId="../AVAL/0/AVAL" postCellId="../I2L/0/I2L" preSegmentId="6" postSegmentId="2" preFractionAlong="0.6638244748527251" postFractionAlong="0.9653027236303998"/>
    </projection>
    <projection id="NC_AVAR_I2R" presynapticPopulation="AVAR" postsynapticPopulation="I2R" synapse="Acetylcholine">
      <connection id="120" preCellId="../AVAR/0/AVAR" postCellId="../I2R/0/I2R" preSegmentId="5" postSegmentId="4" preFractionAlong="0.5639195667556237" postFractionAlong="0.5002785352077603"/>
    </projection>
    <projection id="NC_SMBVL_I4" presynapticPopulation="SMBVL" postsynapticPopulation="I4" synapse="Acetylcholine">
      <connection id="121" preCellId="../SMBVL/0/SMBVL" postCellId="../I4/0/I4" preSegmentId="5" postSegmentId="2" preFractionAlong="0.1274856801402462" postFractionAlong="0.8002063476835791"/>
    </projection>
    <projection id="NC_SMBVR_I4" presynapticPopulation="SMBVR" postsynapticPopulation="I4" synapse="Acetylcholine">
      <connection id="122" preCellId="../SMBVR/0/SMBVR" postCellId="../I4/0/I4" preSegmentId="6" postSegmentId="8" preFractionAlong="0.851594319304219" postFractionAlong="0.991453567842792"/>
    </projection>
    <electricalProjection id="NCXLS_I4_I2R_GJ" presynapticPopulation="I4" postsynapticPopulation="I2R">
      <electricalConnection id="123" preCell="0" postCell="0" synapse="Generic_GJ" preSegment="6" postSegment="4" preFractionAlong="0.6054812505259454" postFractionAlong="0.3078863820162494"/>
    </electricalProjection>
    <electricalProjection id="NCXLS_I6_I4_GJ" presynapticPopulation="I6" postsynapticPopulation="I4">
      <electricalConnection id="124" preCell="0" postCell="0" synapse="Generic_GJ" preSegment="4" postSegment="4" preFractionAlong="0.9459246440320865" postFractionAlong="0.29582409749653604"/>
    </electricalProjection>
    <electricalProjection id="NCXLS_MI_MCL_GJ" presynapticPopulation="MI" postsynapticPopulation="MCL">
      <electricalConnection id="125" preCell="0" postCell="0" synapse="Generic_GJ" preSegment="5" postSegment="4" preFractionAlong="0.32582346077048474" postFractionAlong="0.12777465278999045"/>
    </electricalProjection>
    <electricalProjection id="NCXLS_M2L_M5_GJ" presynapticPopulation="M2L" postsynapticPopulation="M5">
      <electricalConnection id="126" preCell="0" postCell="0" synapse="Generic_GJ" preSegment="7" postSegment="6" preFractionAlong="0.6846261942649663" postFractionAlong="0.9027055104453562"/>
    </electricalProjection>
    <electricalProjection id="NCXLS_M2L_M4_GJ" presynapticPopulation="M2L" postsynapticPopulation="M4">
      <electricalConnection id="127" preCell="0" postCell="0" synapse="Generic_GJ" preSegment="7" postSegment="7" preFractionAlong="0.12627113710773186" postFractionAlong="0.8134344823242641"/>
    </electricalProjection>
    <electricalProjection id="NCXLS_M2L_M3R_GJ" presynapticPopulation="M2L" postsynapticPopulation="M3R">
      <electricalConnection id="128" preCell="0" postCell="0" synapse="Generic_GJ" preSegment="1" postSegment="9" preFractionAlong="0.46066982983348914" postFractionAlong="0.49897111691376594"/>
    </electricalProjection>
  </network>
</neuroml>
