<?xml version='1.0' encoding='UTF-8'?>
<neuroml xmlns="http://www.neuroml.org/schema/neuroml2" xmlns:xsi="http://www.w3.org/2001/XMLSchema-instance" xsi:schemaLocation="http://www.neuroml.org/schema/neuroml2 https://raw.githubusercontent.com/NeuroML/NeuroML2/development/Schemas/NeuroML2/NeuroML_v2beta4.xsd" id="gvft_network_bio_prior_lamW_0.144_DF_0.019_t60.net">
  <notes>NeuroML2 network generated from GVFT simulation on 2025-05-04 00:13:31
</notes>
  <include href="M3R.cell.nml"/>
  <include href="M1.cell.nml"/>
  <include href="I2L.cell.nml"/>
  <include href="MCL.cell.nml"/>
  <include href="I6.cell.nml"/>
  <include href="I5.cell.nml"/>
  <include href="M4.cell.nml"/>
  <include href="I1R.cell.nml"/>
  <include href="MCR.cell.nml"/>
  <include href="I3.cell.nml"/>
  <include href="M3L.cell.nml"/>
  <include href="NSML.cell.nml"/>
  <include href="M2L.cell.nml"/>
  <include href="M5.cell.nml"/>
  <include href="I4.cell.nml"/>
  <include href="MI.cell.nml"/>
  <include href="NSMR.cell.nml"/>
  <include href="I2R.cell.nml"/>
  <include href="M2R.cell.nml"/>
  <include href="I1L.cell.nml"/>
  <include href="Serotonin_Glutamate.synapse.nml"/>
  <include href="Acetylcholine.synapse.nml"/>
  <include href="Generic_GJ.synapse.nml"/>
  <include href="Glutamate.synapse.nml"/>
  <network id="gvft_network_bio_prior_lamW_0.144_DF_0.019_t60.net" type="networkWithTemperature" temperature="20.0 degC">
    <population id="M1" component="M1" type="populationList" size="1">
      <instance id="0">
        <location x="-0.43718594" y="-0.71859294" z="0.0"/>
      </instance>
    </population>
    <population id="M2L" component="M2L" type="populationList" size="1">
      <instance id="0">
        <location x="0.10552765" y="-0.43718594" z="0.0"/>
      </instance>
    </population>
    <population id="M2R" component="M2R" type="populationList" size="1">
      <instance id="0">
        <location x="0.40703517" y="0.5678392" z="0.0"/>
      </instance>
    </population>
    <population id="M3L" component="M3L" type="populationList" size="1">
      <instance id="0">
        <location x="-0.22613066" y="0.69849247" z="0.0"/>
      </instance>
    </population>
    <population id="M3R" component="M3R" type="populationList" size="1">
      <instance id="0">
        <location x="0.7085427" y="-0.9296482" z="0.0"/>
      </instance>
    </population>
    <population id="M4" component="M4" type="populationList" size="1">
      <instance id="0">
        <location x="0.08542714" y="-0.1356784" z="0.0"/>
      </instance>
    </population>
    <population id="M5" component="M5" type="populationList" size="1">
      <instance id="0">
        <location x="-0.43718594" y="0.025125638" z="0.0"/>
      </instance>
    </population>
    <population id="I1L" component="I1L" type="populationList" size="1">
      <instance id="0">
        <location x="-0.03517589" y="0.8592965" z="0.0"/>
      </instance>
    </population>
    <population id="I1R" component="I1R" type="populationList" size="1">
      <instance id="0">
        <location x="0.39698493" y="-0.0050251363" z="0.0"/>
      </instance>
    </population>
    <population id="I2L" component="I2L" type="populationList" size="1">
      <instance id="0">
        <location x="-0.6683417" y="0.71859294" z="0.0"/>
      </instance>
    </population>
    <population id="I2R" component="I2R" type="populationList" size="1">
      <instance id="0">
        <location x="0.49748746" y="-0.45728645" z="0.0"/>
      </instance>
    </population>
    <population id="I3" component="I3" type="populationList" size="1">
      <instance id="0">
        <location x="-0.03517589" y="0.75879395" z="0.0"/>
      </instance>
    </population>
    <population id="I4" component="I4" type="populationList" size="1">
      <instance id="0">
        <location x="-0.57788944" y="0.21608041" z="0.0"/>
      </instance>
    </population>
    <population id="I5" component="I5" type="populationList" size="1">
      <instance id="0">
        <location x="0.30653268" y="0.55778897" z="0.0"/>
      </instance>
    </population>
    <population id="I6" component="I6" type="populationList" size="1">
      <instance id="0">
        <location x="0.98994976" y="0.47738695" z="0.0"/>
      </instance>
    </population>
    <population id="MCL" component="MCL" type="populationList" size="1">
      <instance id="0">
        <location x="-1.0" y="-0.39698493" z="0.0"/>
      </instance>
    </population>
    <population id="MCR" component="MCR" type="populationList" size="1">
      <instance id="0">
        <location x="0.1356784" y="0.638191" z="0.0"/>
      </instance>
    </population>
    <population id="MI" component="MI" type="populationList" size="1">
      <instance id="0">
        <location x="0.12562814" y="-0.8291457" z="0.0"/>
      </instance>
    </population>
    <population id="NSML" component="NSML" type="populationList" size="1">
      <instance id="0">
        <location x="-0.1356784" y="0.015075387" z="0.0"/>
      </instance>
    </population>
    <population id="NSMR" component="NSMR" type="populationList" size="1">
      <instance id="0">
        <location x="0.47738695" y="-0.2964824" z="0.0"/>
      </instance>
    </population>
    <electricalProjection id="NCXLS_I3_I1L_GJ" presynapticPopulation="I3" postsynapticPopulation="I1L">
      <electricalConnection id="0" preCell="0" postCell="0" synapse="Generic_GJ" preSegment="2" postSegment="4" preFractionAlong="0.6288728969881755" postFractionAlong="0.640380746644241"/>
    </electricalProjection>
    <projection id="NCXLS_I4_I2L" presynapticPopulation="I4" postsynapticPopulation="I2L" synapse="Acetylcholine">
      <connection id="1" preCellId="../I4/0/I4" postCellId="../I2L/0/I2L" preSegmentId="5" postSegmentId="2" preFractionAlong="0.7408692683852178" postFractionAlong="0.5425733269659556"/>
    </projection>
    <projection id="NCXLS_M3R_I3" presynapticPopulation="M3R" postsynapticPopulation="I3" synapse="Acetylcholine">
      <connection id="2" preCellId="../M3R/0/M3R" postCellId="../I3/0/I3" preSegmentId="9" postSegmentId="7" preFractionAlong="0.2739887815430181" postFractionAlong="0.5930561899673576"/>
    </projection>
    <projection id="NCXLS_M3R_I2R" presynapticPopulation="M3R" postsynapticPopulation="I2R" synapse="Acetylcholine">
      <connection id="3" preCellId="../M3R/0/M3R" postCellId="../I2R/0/I2R" preSegmentId="9" postSegmentId="2" preFractionAlong="0.7423699370897818" postFractionAlong="0.22833125236861085"/>
    </projection>
    <projection id="NCXLS_M3R_I1L" presynapticPopulation="M3R" postsynapticPopulation="I1L" synapse="Acetylcholine">
      <connection id="4" preCellId="../M3R/0/M3R" postCellId="../I1L/0/I1L" preSegmentId="4" postSegmentId="5" preFractionAlong="0.28924390281966816" postFractionAlong="0.3693541300894323"/>
    </projection>
    <projection id="NCXLS_M3R_I5" presynapticPopulation="M3R" postsynapticPopulation="I5" synapse="Acetylcholine">
      <connection id="5" preCellId="../M3R/0/M3R" postCellId="../I5/0/I5" preSegmentId="1" postSegmentId="8" preFractionAlong="0.5833072481842045" postFractionAlong="0.8843434279712875"/>
    </projection>
    <projection id="NCXLS_M3R_NSMR" presynapticPopulation="M3R" postsynapticPopulation="NSMR" synapse="Acetylcholine">
      <connection id="6" preCellId="../M3R/0/M3R" postCellId="../NSMR/0/NSMR" preSegmentId="7" postSegmentId="1" preFractionAlong="0.3389447753484487" postFractionAlong="0.795660230661442"/>
    </projection>
    <projection id="NCXLS_M3R_I1R" presynapticPopulation="M3R" postsynapticPopulation="I1R" synapse="Acetylcholine">
      <connection id="7" preCellId="../M3R/0/M3R" postCellId="../I1R/0/I1R" preSegmentId="4" postSegmentId="1" preFractionAlong="0.2823138342107202" postFractionAlong="0.5852968283343113"/>
    </projection>
    <projection id="NCXLS_M3R_I6" presynapticPopulation="M3R" postsynapticPopulation="I6" synapse="Acetylcholine">
      <connection id="8" preCellId="../M3R/0/M3R" postCellId="../I6/0/I6" preSegmentId="7" postSegmentId="2" preFractionAlong="0.9339779741445192" postFractionAlong="0.13105863080429037"/>
    </projection>
    <projection id="NCXLS_M3R_MCR" presynapticPopulation="M3R" postsynapticPopulation="MCR" synapse="Acetylcholine">
      <connection id="9" preCellId="../M3R/0/M3R" postCellId="../MCR/0/MCR" preSegmentId="8" postSegmentId="3" preFractionAlong="0.5144896023120388" postFractionAlong="0.8568353497231763"/>
    </projection>
    <projection id="NCXLS_M3R_M3L" presynapticPopulation="M3R" postsynapticPopulation="M3L" synapse="Acetylcholine">
      <connection id="10" preCellId="../M3R/0/M3R" postCellId="../M3L/0/M3L" preSegmentId="1" postSegmentId="9" preFractionAlong="0.7978046813410725" postFractionAlong="0.8643662664559733"/>
    </projection>
    <electricalProjection id="NCXLS_M3R_M2R_GJ" presynapticPopulation="M3R" postsynapticPopulation="M2R">
      <electricalConnection id="11" preCell="0" postCell="0" synapse="Generic_GJ" preSegment="4" postSegment="4" preFractionAlong="0.7569276593414415" postFractionAlong="0.6891210904957582"/>
    </electricalProjection>
    <projection id="NCXLS_M5_I3" presynapticPopulation="M5" postsynapticPopulation="I3" synapse="Acetylcholine">
      <connection id="12" preCellId="../M5/0/M5" postCellId="../I3/0/I3" preSegmentId="2" postSegmentId="9" preFractionAlong="0.9968091806811089" postFractionAlong="0.42685832879508956"/>
    </projection>
    <projection id="NCXLS_M5_I4" presynapticPopulation="M5" postsynapticPopulation="I4" synapse="Acetylcholine">
      <connection id="13" preCellId="../M5/0/M5" postCellId="../I4/0/I4" preSegmentId="7" postSegmentId="5" preFractionAlong="0.4171642789757021" postFractionAlong="0.8777494048626249"/>
    </projection>
    <projection id="NCXLS_M5_I1L" presynapticPopulation="M5" postsynapticPopulation="I1L" synapse="Acetylcholine">
      <connection id="14" preCellId="../M5/0/M5" postCellId="../I1L/0/I1L" preSegmentId="7" postSegmentId="6" preFractionAlong="0.5576886911854527" postFractionAlong="0.05461030321346905"/>
    </projection>
    <electricalProjection id="NCXLS_M5_M3L_GJ" presynapticPopulation="M5" postsynapticPopulation="M3L">
      <electricalConnection id="15" preCell="0" postCell="0" synapse="Generic_GJ" preSegment="5" postSegment="5" preFractionAlong="0.2908768542315825" postFractionAlong="0.4694068419892581"/>
    </electricalProjection>
    <projection id="NCXLS_M5_I2L" presynapticPopulation="M5" postsynapticPopulation="I2L" synapse="Acetylcholine">
      <connection id="16" preCellId="../M5/0/M5" postCellId="../I2L/0/I2L" preSegmentId="3" postSegmentId="2" preFractionAlong="0.1756720999559107" postFractionAlong="0.5131898917098298"/>
    </projection>
    <projection id="NCXLS_NSMR_I2R" presynapticPopulation="NSMR" postsynapticPopulation="I2R" synapse="Serotonin_Glutamate">
      <connection id="17" preCellId="../NSMR/0/NSMR" postCellId="../I2R/0/I2R" preSegmentId="4" postSegmentId="4" preFractionAlong="0.9732608830304917" postFractionAlong="0.20140630921335223"/>
    </projection>
    <projection id="NCXLS_NSMR_M3R" presynapticPopulation="NSMR" postsynapticPopulation="M3R" synapse="Serotonin_Glutamate">
      <connection id="18" preCellId="../NSMR/0/NSMR" postCellId="../M3R/0/M3R" preSegmentId="9" postSegmentId="5" preFractionAlong="0.3327294765103791" postFractionAlong="0.9399243728857088"/>
    </projection>
    <projection id="NCXLS_MI_M1" presynapticPopulation="MI" postsynapticPopulation="M1" synapse="Acetylcholine">
      <connection id="19" preCellId="../MI/0/MI" postCellId="../M1/0/M1" preSegmentId="5" postSegmentId="7" preFractionAlong="0.9881240759546354" postFractionAlong="0.4852304557653562"/>
    </projection>
    <projection id="NCXLS_MI_MCL" presynapticPopulation="MI" postsynapticPopulation="MCL" synapse="Acetylcholine">
      <connection id="20" preCellId="../MI/0/MI" postCellId="../MCL/0/MCL" preSegmentId="7" postSegmentId="5" preFractionAlong="0.4502362866726173" postFractionAlong="0.25474870733671884"/>
    </projection>
    <projection id="NCXLS_MCR_I1L" presynapticPopulation="MCR" postsynapticPopulation="I1L" synapse="Acetylcholine">
      <connection id="21" preCellId="../MCR/0/MCR" postCellId="../I1L/0/I1L" preSegmentId="3" postSegmentId="5" preFractionAlong="0.09669455978756714" postFractionAlong="0.7204567414627562"/>
    </projection>
    <projection id="NCXLS_MCR_I6" presynapticPopulation="MCR" postsynapticPopulation="I6" synapse="Acetylcholine">
      <connection id="22" preCellId="../MCR/0/MCR" postCellId="../I6/0/I6" preSegmentId="7" postSegmentId="5" preFractionAlong="0.7658684256625315" postFractionAlong="0.07921315000837081"/>
    </projection>
    <projection id="NCXLS_MCR_M2R" presynapticPopulation="MCR" postsynapticPopulation="M2R" synapse="Acetylcholine">
      <connection id="23" preCellId="../MCR/0/MCR" postCellId="../M2R/0/M2R" preSegmentId="1" postSegmentId="5" preFractionAlong="0.01944805036808117" postFractionAlong="0.18879402777344445"/>
    </projection>
    <projection id="NCXLS_M2L_I3" presynapticPopulation="M2L" postsynapticPopulation="I3" synapse="Acetylcholine">
      <connection id="24" preCellId="../M2L/0/M2L" postCellId="../I3/0/I3" preSegmentId="4" postSegmentId="8" preFractionAlong="0.42835180056884625" postFractionAlong="0.027106652336233106"/>
    </projection>
    <projection id="NCXLS_M2L_I4" presynapticPopulation="M2L" postsynapticPopulation="I4" synapse="Acetylcholine">
      <connection id="25" preCellId="../M2L/0/M2L" postCellId="../I4/0/I4" preSegmentId="4" postSegmentId="2" preFractionAlong="0.010513224541653488" postFractionAlong="0.761889894377484"/>
    </projection>
    <projection id="NCXLS_M2L_NSML" presynapticPopulation="M2L" postsynapticPopulation="NSML" synapse="Acetylcholine">
      <connection id="26" preCellId="../M2L/0/M2L" postCellId="../NSML/0/NSML" preSegmentId="1" postSegmentId="1" preFractionAlong="0.9866876116170241" postFractionAlong="0.2508734717161105"/>
    </projection>
    <projection id="NCXLS_M2L_I1L" presynapticPopulation="M2L" postsynapticPopulation="I1L" synapse="Acetylcholine">
      <connection id="27" preCellId="../M2L/0/M2L" postCellId="../I1L/0/I1L" preSegmentId="6" postSegmentId="9" preFractionAlong="0.8939335106699905" postFractionAlong="0.3358163646415345"/>
    </projection>
    <projection id="NCXLS_M2L_I5" presynapticPopulation="M2L" postsynapticPopulation="I5" synapse="Acetylcholine">
      <connection id="28" preCellId="../M2L/0/M2L" postCellId="../I5/0/I5" preSegmentId="5" postSegmentId="8" preFractionAlong="0.930998619712584" postFractionAlong="0.05050739238280655"/>
    </projection>
    <projection id="NCXLS_M2L_M5" presynapticPopulation="M2L" postsynapticPopulation="M5" synapse="Acetylcholine">
      <connection id="29" preCellId="../M2L/0/M2L" postCellId="../M5/0/M5" preSegmentId="6" postSegmentId="6" preFractionAlong="0.8904409480010858" postFractionAlong="0.2627209435613028"/>
    </projection>
    <projection id="NCXLS_M2L_I1R" presynapticPopulation="M2L" postsynapticPopulation="I1R" synapse="Acetylcholine">
      <connection id="30" preCellId="../M2L/0/M2L" postCellId="../I1R/0/I1R" preSegmentId="5" postSegmentId="2" preFractionAlong="0.3243288791369666" postFractionAlong="0.9521439170763514"/>
    </projection>
    <projection id="NCXLS_M2L_I6" presynapticPopulation="M2L" postsynapticPopulation="I6" synapse="Acetylcholine">
      <connection id="31" preCellId="../M2L/0/M2L" postCellId="../I6/0/I6" preSegmentId="3" postSegmentId="1" preFractionAlong="0.9987929358156545" postFractionAlong="0.054966306839822066"/>
    </projection>
    <projection id="NCXLS_M2L_MCR" presynapticPopulation="M2L" postsynapticPopulation="MCR" synapse="Acetylcholine">
      <connection id="32" preCellId="../M2L/0/M2L" postCellId="../MCR/0/MCR" preSegmentId="5" postSegmentId="3" preFractionAlong="0.08257215803527718" postFractionAlong="0.15452082999051897"/>
    </projection>
    <electricalProjection id="NCXLS_M2L_M4_GJ" presynapticPopulation="M2L" postsynapticPopulation="M4">
      <electricalConnection id="33" preCell="0" postCell="0" synapse="Generic_GJ" preSegment="6" postSegment="7" preFractionAlong="0.07433460888607146" postFractionAlong="0.11536280130570387"/>
    </electricalProjection>
    <projection id="NCXLS_M2L_M3L" presynapticPopulation="M2L" postsynapticPopulation="M3L" synapse="Acetylcholine">
      <connection id="34" preCellId="../M2L/0/M2L" postCellId="../M3L/0/M3L" preSegmentId="2" postSegmentId="5" preFractionAlong="0.4722264257562043" postFractionAlong="0.7128823693447365"/>
    </projection>
    <projection id="NCXLS_M2L_I2L" presynapticPopulation="M2L" postsynapticPopulation="I2L" synapse="Acetylcholine">
      <connection id="35" preCellId="../M2L/0/M2L" postCellId="../I2L/0/I2L" preSegmentId="6" postSegmentId="3" preFractionAlong="0.2587109474156345" postFractionAlong="0.34719216756221194"/>
    </projection>
    <projection id="NCXLS_M2L_M2R" presynapticPopulation="M2L" postsynapticPopulation="M2R" synapse="Glutamate">
      <connection id="36" preCellId="../M2L/0/M2L" postCellId="../M2R/0/M2R" preSegmentId="9" postSegmentId="1" preFractionAlong="0.6252161250314382" postFractionAlong="0.937639779957902"/>
    </projection>
    <projection id="NCXLS_M2L_MCL" presynapticPopulation="M2L" postsynapticPopulation="MCL" synapse="Acetylcholine">
      <connection id="37" preCellId="../M2L/0/M2L" postCellId="../MCL/0/MCL" preSegmentId="8" postSegmentId="7" preFractionAlong="0.5701816317546939" postFractionAlong="0.6101960089858345"/>
    </projection>
    <projection id="NCXLS_M4_I2R" presynapticPopulation="M4" postsynapticPopulation="I2R" synapse="Acetylcholine">
      <connection id="38" preCellId="../M4/0/M4" postCellId="../I2R/0/I2R" preSegmentId="4" postSegmentId="9" preFractionAlong="0.014196634471723701" postFractionAlong="0.25763199876352916"/>
    </projection>
    <projection id="NCXLS_M4_M3R" presynapticPopulation="M4" postsynapticPopulation="M3R" synapse="Glutamate">
      <connection id="39" preCellId="../M4/0/M4" postCellId="../M3R/0/M3R" preSegmentId="4" postSegmentId="3" preFractionAlong="0.7331603781367996" postFractionAlong="0.9954215129254561"/>
    </projection>
    <projection id="NCXLS_M4_I5" presynapticPopulation="M4" postsynapticPopulation="I5" synapse="Acetylcholine">
      <connection id="40" preCellId="../M4/0/M4" postCellId="../I5/0/I5" preSegmentId="5" postSegmentId="6" preFractionAlong="0.5382201018684752" postFractionAlong="0.533323547859605"/>
    </projection>
    <projection id="NCXLS_M4_NSMR" presynapticPopulation="M4" postsynapticPopulation="NSMR" synapse="Acetylcholine">
      <connection id="41" preCellId="../M4/0/M4" postCellId="../NSMR/0/NSMR" preSegmentId="4" postSegmentId="8" preFractionAlong="0.1691618938424202" postFractionAlong="0.9774565631838426"/>
    </projection>
    <projection id="NCXLS_M4_I1R" presynapticPopulation="M4" postsynapticPopulation="I1R" synapse="Acetylcholine">
      <connection id="42" preCellId="../M4/0/M4" postCellId="../I1R/0/I1R" preSegmentId="5" postSegmentId="4" preFractionAlong="0.6032454226840298" postFractionAlong="0.2272610535596623"/>
    </projection>
    <projection id="NCXLS_M4_I6" presynapticPopulation="M4" postsynapticPopulation="I6" synapse="Acetylcholine">
      <connection id="43" preCellId="../M4/0/M4" postCellId="../I6/0/I6" preSegmentId="3" postSegmentId="8" preFractionAlong="0.6949701331214758" postFractionAlong="0.5151670283865888"/>
    </projection>
    <projection id="NCXLS_M4_M2R" presynapticPopulation="M4" postsynapticPopulation="M2R" synapse="Acetylcholine">
      <connection id="44" preCellId="../M4/0/M4" postCellId="../M2R/0/M2R" preSegmentId="9" postSegmentId="3" preFractionAlong="0.6113416562477262" postFractionAlong="0.37097371259216905"/>
    </projection>
    <projection id="NCXLS_M1_I3" presynapticPopulation="M1" postsynapticPopulation="I3" synapse="Acetylcholine">
      <connection id="45" preCellId="../M1/0/M1" postCellId="../I3/0/I3" preSegmentId="8" postSegmentId="3" preFractionAlong="0.01366168547060942" postFractionAlong="0.8957263555151146"/>
    </projection>
    <projection id="NCXLS_M1_I2R" presynapticPopulation="M1" postsynapticPopulation="I2R" synapse="Acetylcholine">
      <connection id="46" preCellId="../M1/0/M1" postCellId="../I2R/0/I2R" preSegmentId="9" postSegmentId="8" preFractionAlong="0.335843487039316" postFractionAlong="0.5138665257132716"/>
    </projection>
    <projection id="NCXLS_M1_I4" presynapticPopulation="M1" postsynapticPopulation="I4" synapse="Acetylcholine">
      <connection id="47" preCellId="../M1/0/M1" postCellId="../I4/0/I4" preSegmentId="3" postSegmentId="4" preFractionAlong="0.23828967055309158" postFractionAlong="0.2243829797997955"/>
    </projection>
    <electricalProjection id="NCXLS_M1_M3R_GJ" presynapticPopulation="M1" postsynapticPopulation="M3R">
      <electricalConnection id="48" preCell="0" postCell="0" synapse="Generic_GJ" preSegment="1" postSegment="7" preFractionAlong="0.511093821472398" postFractionAlong="0.4455178144931612"/>
    </electricalProjection>
    <projection id="NCXLS_M1_NSML" presynapticPopulation="M1" postsynapticPopulation="NSML" synapse="Acetylcholine">
      <connection id="49" preCellId="../M1/0/M1" postCellId="../NSML/0/NSML" preSegmentId="2" postSegmentId="7" preFractionAlong="0.8725199518293624" postFractionAlong="0.24414756050690722"/>
    </projection>
    <projection id="NCXLS_M1_I1L" presynapticPopulation="M1" postsynapticPopulation="I1L" synapse="Acetylcholine">
      <connection id="50" preCellId="../M1/0/M1" postCellId="../I1L/0/I1L" preSegmentId="8" postSegmentId="6" preFractionAlong="0.9258273744435174" postFractionAlong="0.6599934501353172"/>
    </projection>
    <projection id="NCXLS_M1_I5" presynapticPopulation="M1" postsynapticPopulation="I5" synapse="Acetylcholine">
      <connection id="51" preCellId="../M1/0/M1" postCellId="../I5/0/I5" preSegmentId="4" postSegmentId="2" preFractionAlong="0.13141238285526846" postFractionAlong="0.26248500790059104"/>
    </projection>
    <projection id="NCXLS_M1_M5" presynapticPopulation="M1" postsynapticPopulation="M5" synapse="Glutamate">
      <connection id="52" preCellId="../M1/0/M1" postCellId="../M5/0/M5" preSegmentId="9" postSegmentId="9" preFractionAlong="0.24399530235247224" postFractionAlong="0.9667342275351081"/>
    </projection>
    <projection id="NCXLS_M1_NSMR" presynapticPopulation="M1" postsynapticPopulation="NSMR" synapse="Acetylcholine">
      <connection id="53" preCellId="../M1/0/M1" postCellId="../NSMR/0/NSMR" preSegmentId="3" postSegmentId="2" preFractionAlong="0.2476316430714387" postFractionAlong="0.3480519554773205"/>
    </projection>
    <projection id="NCXLS_M1_I1R" presynapticPopulation="M1" postsynapticPopulation="I1R" synapse="Acetylcholine">
      <connection id="54" preCellId="../M1/0/M1" postCellId="../I1R/0/I1R" preSegmentId="4" postSegmentId="7" preFractionAlong="0.9666222208961075" postFractionAlong="0.44343910283604404"/>
    </projection>
    <projection id="NCXLS_M1_MI" presynapticPopulation="M1" postsynapticPopulation="MI" synapse="Acetylcholine">
      <connection id="55" preCellId="../M1/0/M1" postCellId="../MI/0/MI" preSegmentId="2" postSegmentId="6" preFractionAlong="0.2667720636239239" postFractionAlong="0.11953086954707781"/>
    </projection>
    <projection id="NCXLS_M1_I6" presynapticPopulation="M1" postsynapticPopulation="I6" synapse="Acetylcholine">
      <connection id="56" preCellId="../M1/0/M1" postCellId="../I6/0/I6" preSegmentId="6" postSegmentId="7" preFractionAlong="0.04929449276441644" postFractionAlong="0.3862877051455452"/>
    </projection>
    <projection id="NCXLS_M1_MCR" presynapticPopulation="M1" postsynapticPopulation="MCR" synapse="Acetylcholine">
      <connection id="57" preCellId="../M1/0/M1" postCellId="../MCR/0/MCR" preSegmentId="1" postSegmentId="7" preFractionAlong="0.3156332153671523" postFractionAlong="0.49101976266891"/>
    </projection>
    <projection id="NCXLS_M1_M2L" presynapticPopulation="M1" postsynapticPopulation="M2L" synapse="Glutamate">
      <connection id="58" preCellId="../M1/0/M1" postCellId="../M2L/0/M2L" preSegmentId="5" postSegmentId="2" preFractionAlong="0.006796548586111784" postFractionAlong="0.763856500200214"/>
    </projection>
    <projection id="NCXLS_M1_M4" presynapticPopulation="M1" postsynapticPopulation="M4" synapse="Acetylcholine">
      <connection id="59" preCellId="../M1/0/M1" postCellId="../M4/0/M4" preSegmentId="7" postSegmentId="2" preFractionAlong="0.7793651703351198" postFractionAlong="0.5224968088905885"/>
    </projection>
    <electricalProjection id="NCXLS_M1_M3L_GJ" presynapticPopulation="M1" postsynapticPopulation="M3L">
      <electricalConnection id="60" preCell="0" postCell="0" synapse="Generic_GJ" preSegment="1" postSegment="4" preFractionAlong="0.4051080545878567" postFractionAlong="0.002708149820452088"/>
    </electricalProjection>
    <projection id="NCXLS_M1_I2L" presynapticPopulation="M1" postsynapticPopulation="I2L" synapse="Acetylcholine">
      <connection id="61" preCellId="../M1/0/M1" postCellId="../I2L/0/I2L" preSegmentId="3" postSegmentId="7" preFractionAlong="0.49604272601658306" postFractionAlong="0.007766642153968717"/>
    </projection>
    <electricalProjection id="NCXLS_M1_M2R_GJ" presynapticPopulation="M1" postsynapticPopulation="M2R">
      <electricalConnection id="62" preCell="0" postCell="0" synapse="Generic_GJ" preSegment="2" postSegment="6" preFractionAlong="0.9864874015717295" postFractionAlong="0.27826766081876964"/>
    </electricalProjection>
    <projection id="NCXLS_M3L_I2R" presynapticPopulation="M3L" postsynapticPopulation="I2R" synapse="Acetylcholine">
      <connection id="63" preCellId="../M3L/0/M3L" postCellId="../I2R/0/I2R" preSegmentId="2" postSegmentId="6" preFractionAlong="0.8438128636583061" postFractionAlong="0.4603290506427651"/>
    </projection>
    <projection id="NCXLS_M3L_I4" presynapticPopulation="M3L" postsynapticPopulation="I4" synapse="Acetylcholine">
      <connection id="64" preCellId="../M3L/0/M3L" postCellId="../I4/0/I4" preSegmentId="3" postSegmentId="3" preFractionAlong="0.133778144993968" postFractionAlong="0.9533071675823725"/>
    </projection>
    <projection id="NCXLS_M3L_M3R" presynapticPopulation="M3L" postsynapticPopulation="M3R" synapse="Acetylcholine">
      <connection id="65" preCellId="../M3L/0/M3L" postCellId="../M3R/0/M3R" preSegmentId="3" postSegmentId="1" preFractionAlong="0.6202348489611205" postFractionAlong="0.5448010852760984"/>
    </projection>
    <projection id="NCXLS_M3L_NSML" presynapticPopulation="M3L" postsynapticPopulation="NSML" synapse="Acetylcholine">
      <connection id="66" preCellId="../M3L/0/M3L" postCellId="../NSML/0/NSML" preSegmentId="4" postSegmentId="7" preFractionAlong="0.7153641152288897" postFractionAlong="0.27114225338058806"/>
    </projection>
    <electricalProjection id="NCXLS_M3L_M5_GJ" presynapticPopulation="M3L" postsynapticPopulation="M5">
      <electricalConnection id="67" preCell="0" postCell="0" synapse="Generic_GJ" preSegment="3" postSegment="5" preFractionAlong="0.7224113844635446" postFractionAlong="0.007391901444293025"/>
    </electricalProjection>
    <projection id="NCXLS_M3L_NSMR" presynapticPopulation="M3L" postsynapticPopulation="NSMR" synapse="Acetylcholine">
      <connection id="68" preCellId="../M3L/0/M3L" postCellId="../NSMR/0/NSMR" preSegmentId="3" postSegmentId="5" preFractionAlong="0.39091742684116226" postFractionAlong="0.9764565294354102"/>
    </projection>
    <projection id="NCXLS_M3L_I1R" presynapticPopulation="M3L" postsynapticPopulation="I1R" synapse="Acetylcholine">
      <connection id="69" preCellId="../M3L/0/M3L" postCellId="../I1R/0/I1R" preSegmentId="3" postSegmentId="3" preFractionAlong="0.44439561845108055" postFractionAlong="0.3032829394045271"/>
    </projection>
    <projection id="NCXLS_M3L_MI" presynapticPopulation="M3L" postsynapticPopulation="MI" synapse="Acetylcholine">
      <connection id="70" preCellId="../M3L/0/M3L" postCellId="../MI/0/MI" preSegmentId="6" postSegmentId="3" preFractionAlong="0.26679454943383085" postFractionAlong="0.5059258001463939"/>
    </projection>
    <projection id="NCXLS_M3L_M2L" presynapticPopulation="M3L" postsynapticPopulation="M2L" synapse="Acetylcholine">
      <connection id="71" preCellId="../M3L/0/M3L" postCellId="../M2L/0/M2L" preSegmentId="8" postSegmentId="4" preFractionAlong="0.7466032046442038" postFractionAlong="0.012596401271786961"/>
    </projection>
    <projection id="NCXLS_M3L_M4" presynapticPopulation="M3L" postsynapticPopulation="M4" synapse="Glutamate">
      <connection id="72" preCellId="../M3L/0/M3L" postCellId="../M4/0/M4" preSegmentId="6" postSegmentId="1" preFractionAlong="0.18286452675487241" postFractionAlong="0.23240404621441313"/>
    </projection>
    <projection id="NCXLS_M3L_M1" presynapticPopulation="M3L" postsynapticPopulation="M1" synapse="Acetylcholine">
      <connection id="73" preCellId="../M3L/0/M3L" postCellId="../M1/0/M1" preSegmentId="1" postSegmentId="9" preFractionAlong="0.9929434657829072" postFractionAlong="0.7777174890725507"/>
    </projection>
    <projection id="NCXLS_M3L_I2L" presynapticPopulation="M3L" postsynapticPopulation="I2L" synapse="Acetylcholine">
      <connection id="74" preCellId="../M3L/0/M3L" postCellId="../I2L/0/I2L" preSegmentId="2" postSegmentId="4" preFractionAlong="0.1760247550411338" postFractionAlong="0.8662328702676704"/>
    </projection>
    <projection id="NCXLS_M3L_MCL" presynapticPopulation="M3L" postsynapticPopulation="MCL" synapse="Acetylcholine">
      <connection id="75" preCellId="../M3L/0/M3L" postCellId="../MCL/0/MCL" preSegmentId="6" postSegmentId="7" preFractionAlong="0.8622114233219381" postFractionAlong="0.8160923529142614"/>
    </projection>
    <projection id="NCXLS_M2R_I3" presynapticPopulation="M2R" postsynapticPopulation="I3" synapse="Acetylcholine">
      <connection id="76" preCellId="../M2R/0/M2R" postCellId="../I3/0/I3" preSegmentId="8" postSegmentId="5" preFractionAlong="0.6929202292247886" postFractionAlong="0.9873684723122"/>
    </projection>
    <projection id="NCXLS_M2R_I2R" presynapticPopulation="M2R" postsynapticPopulation="I2R" synapse="Acetylcholine">
      <connection id="77" preCellId="../M2R/0/M2R" postCellId="../I2R/0/I2R" preSegmentId="9" postSegmentId="9" preFractionAlong="0.6623179135395824" postFractionAlong="0.6096819082757774"/>
    </projection>
    <projection id="NCXLS_M2R_I4" presynapticPopulation="M2R" postsynapticPopulation="I4" synapse="Acetylcholine">
      <connection id="78" preCellId="../M2R/0/M2R" postCellId="../I4/0/I4" preSegmentId="8" postSegmentId="1" preFractionAlong="0.3967893254145842" postFractionAlong="0.4312104848643289"/>
    </projection>
    <projection id="NCXLS_M2R_NSML" presynapticPopulation="M2R" postsynapticPopulation="NSML" synapse="Acetylcholine">
      <connection id="79" preCellId="../M2R/0/M2R" postCellId="../NSML/0/NSML" preSegmentId="3" postSegmentId="3" preFractionAlong="0.2607087741328522" postFractionAlong="0.5182797206887111"/>
    </projection>
    <projection id="NCXLS_M2R_I1L" presynapticPopulation="M2R" postsynapticPopulation="I1L" synapse="Acetylcholine">
      <connection id="80" preCellId="../M2R/0/M2R" postCellId="../I1L/0/I1L" preSegmentId="7" postSegmentId="5" preFractionAlong="0.569304984412202" postFractionAlong="0.631722418326584"/>
    </projection>
    <projection id="NCXLS_M2R_I5" presynapticPopulation="M2R" postsynapticPopulation="I5" synapse="Acetylcholine">
      <connection id="81" preCellId="../M2R/0/M2R" postCellId="../I5/0/I5" preSegmentId="2" postSegmentId="3" preFractionAlong="0.051165506445475906" postFractionAlong="0.23285855687609425"/>
    </projection>
    <electricalProjection id="NCXLS_M2R_M5_GJ" presynapticPopulation="M2R" postsynapticPopulation="M5">
      <electricalConnection id="82" preCell="0" postCell="0" synapse="Generic_GJ" preSegment="7" postSegment="2" preFractionAlong="0.9296496077013283" postFractionAlong="0.12461338567832736"/>
    </electricalProjection>
    <projection id="NCXLS_M2R_NSMR" presynapticPopulation="M2R" postsynapticPopulation="NSMR" synapse="Acetylcholine">
      <connection id="83" preCellId="../M2R/0/M2R" postCellId="../NSMR/0/NSMR" preSegmentId="4" postSegmentId="9" preFractionAlong="0.05271976633450115" postFractionAlong="0.4461704378126965"/>
    </projection>
    <projection id="NCXLS_M2R_I1R" presynapticPopulation="M2R" postsynapticPopulation="I1R" synapse="Acetylcholine">
      <connection id="84" preCellId="../M2R/0/M2R" postCellId="../I1R/0/I1R" preSegmentId="7" postSegmentId="7" preFractionAlong="0.9277457330754073" postFractionAlong="0.867702097919239"/>
    </projection>
    <projection id="NCXLS_M2R_MI" presynapticPopulation="M2R" postsynapticPopulation="MI" synapse="Acetylcholine">
      <connection id="85" preCellId="../M2R/0/M2R" postCellId="../MI/0/MI" preSegmentId="7" postSegmentId="6" preFractionAlong="0.3018000558611551" postFractionAlong="0.8997430784088717"/>
    </projection>
    <projection id="NCXLS_M2R_MCR" presynapticPopulation="M2R" postsynapticPopulation="MCR" synapse="Acetylcholine">
      <connection id="86" preCellId="../M2R/0/M2R" postCellId="../MCR/0/MCR" preSegmentId="4" postSegmentId="9" preFractionAlong="0.4386490184359845" postFractionAlong="0.03875693555418247"/>
    </projection>
    <projection id="NCXLS_M2R_M2L" presynapticPopulation="M2R" postsynapticPopulation="M2L" synapse="Glutamate">
      <connection id="87" preCellId="../M2R/0/M2R" postCellId="../M2L/0/M2L" preSegmentId="8" postSegmentId="5" preFractionAlong="0.7647762421250892" postFractionAlong="0.26555759801241363"/>
    </projection>
    <electricalProjection id="NCXLS_M2R_M4_GJ" presynapticPopulation="M2R" postsynapticPopulation="M4">
      <electricalConnection id="88" preCell="0" postCell="0" synapse="Generic_GJ" preSegment="2" postSegment="5" preFractionAlong="0.034376858351725215" postFractionAlong="0.6389630219732846"/>
    </electricalProjection>
    <projection id="NCXLS_M2R_M1" presynapticPopulation="M2R" postsynapticPopulation="M1" synapse="Acetylcholine">
      <connection id="89" preCellId="../M2R/0/M2R" postCellId="../M1/0/M1" preSegmentId="5" postSegmentId="5" preFractionAlong="0.4350145943402234" postFractionAlong="0.2926550976674078"/>
    </projection>
    <projection id="NCXLS_M2R_M3L" presynapticPopulation="M2R" postsynapticPopulation="M3L" synapse="Glutamate">
      <connection id="90" preCellId="../M2R/0/M2R" postCellId="../M3L/0/M3L" preSegmentId="2" postSegmentId="7" preFractionAlong="0.1633544497431565" postFractionAlong="0.10431308735188216"/>
    </projection>
    <projection id="NCXLS_M2R_I2L" presynapticPopulation="M2R" postsynapticPopulation="I2L" synapse="Acetylcholine">
      <connection id="91" preCellId="../M2R/0/M2R" postCellId="../I2L/0/I2L" preSegmentId="3" postSegmentId="2" preFractionAlong="0.8771275618985017" postFractionAlong="0.5281892617563562"/>
    </projection>
    <projection id="NCXLS_M2R_MCL" presynapticPopulation="M2R" postsynapticPopulation="MCL" synapse="Acetylcholine">
      <connection id="92" preCellId="../M2R/0/M2R" postCellId="../MCL/0/MCL" preSegmentId="9" postSegmentId="5" preFractionAlong="0.6495560067569618" postFractionAlong="0.8679995918950899"/>
    </projection>
    <projection id="NCXLS_MCL_M3R" presynapticPopulation="MCL" postsynapticPopulation="M3R" synapse="Acetylcholine">
      <connection id="93" preCellId="../MCL/0/MCL" postCellId="../M3R/0/M3R" preSegmentId="4" postSegmentId="8" preFractionAlong="0.6431043526178503" postFractionAlong="0.3157434024840371"/>
    </projection>
    <projection id="NCXLS_MCL_MI" presynapticPopulation="MCL" postsynapticPopulation="MI" synapse="Acetylcholine">
      <connection id="94" preCellId="../MCL/0/MCL" postCellId="../MI/0/MI" preSegmentId="7" postSegmentId="5" preFractionAlong="0.13353423316074942" postFractionAlong="0.386696449987462"/>
    </projection>
    <projection id="NCXLS_MCL_M1" presynapticPopulation="MCL" postsynapticPopulation="M1" synapse="Acetylcholine">
      <connection id="95" preCellId="../MCL/0/MCL" postCellId="../M1/0/M1" preSegmentId="2" postSegmentId="5" preFractionAlong="0.8349737856829623" postFractionAlong="0.7103515007123322"/>
    </projection>
  </network>
</neuroml>
