<?xml version='1.0' encoding='UTF-8'?>
<neuroml xmlns="http://www.neuroml.org/schema/neuroml2" xmlns:xsi="http://www.w3.org/2001/XMLSchema-instance" xsi:schemaLocation="http://www.neuroml.org/schema/neuroml2 https://raw.githubusercontent.com/NeuroML/NeuroML2/development/Schemas/NeuroML2/NeuroML_v2beta4.xsd" id="gvft_network_bio_prior_lamW_0.144_DF_0.037_t40.net">
  <notes>NeuroML2 network generated from GVFT simulation on 2025-05-04 00:14:27
</notes>
  <include href="M3R.cell.nml"/>
  <include href="M1.cell.nml"/>
  <include href="I2L.cell.nml"/>
  <include href="MCL.cell.nml"/>
  <include href="I6.cell.nml"/>
  <include href="I5.cell.nml"/>
  <include href="M4.cell.nml"/>
  <include href="I1R.cell.nml"/>
  <include href="MCR.cell.nml"/>
  <include href="I3.cell.nml"/>
  <include href="M3L.cell.nml"/>
  <include href="NSML.cell.nml"/>
  <include href="M2L.cell.nml"/>
  <include href="M5.cell.nml"/>
  <include href="I4.cell.nml"/>
  <include href="MI.cell.nml"/>
  <include href="NSMR.cell.nml"/>
  <include href="I2R.cell.nml"/>
  <include href="M2R.cell.nml"/>
  <include href="I1L.cell.nml"/>
  <include href="Serotonin_Glutamate.synapse.nml"/>
  <include href="Acetylcholine.synapse.nml"/>
  <include href="Generic_GJ.synapse.nml"/>
  <include href="Glutamate.synapse.nml"/>
  <network id="gvft_network_bio_prior_lamW_0.144_DF_0.037_t40.net" type="networkWithTemperature" temperature="20.0 degC">
    <population id="M1" component="M1" type="populationList" size="1">
      <instance id="0">
        <location x="-0.94974875" y="0.67839193" z="0.0"/>
      </instance>
    </population>
    <population id="M2L" component="M2L" type="populationList" size="1">
      <instance id="0">
        <location x="-0.42713568" y="0.31658292" z="0.0"/>
      </instance>
    </population>
    <population id="M2R" component="M2R" type="populationList" size="1">
      <instance id="0">
        <location x="-0.1356784" y="-0.51758796" z="0.0"/>
      </instance>
    </population>
    <population id="M3L" component="M3L" type="populationList" size="1">
      <instance id="0">
        <location x="-0.8492462" y="-0.025125638" z="0.0"/>
      </instance>
    </population>
    <population id="M3R" component="M3R" type="populationList" size="1">
      <instance id="0">
        <location x="-0.2562814" y="-0.57788944" z="0.0"/>
      </instance>
    </population>
    <population id="M4" component="M4" type="populationList" size="1">
      <instance id="0">
        <location x="-0.98994976" y="-0.6482412" z="0.0"/>
      </instance>
    </population>
    <population id="M5" component="M5" type="populationList" size="1">
      <instance id="0">
        <location x="-0.2964824" y="0.80904526" z="0.0"/>
      </instance>
    </population>
    <population id="I1L" component="I1L" type="populationList" size="1">
      <instance id="0">
        <location x="-0.5477387" y="-0.919598" z="0.0"/>
      </instance>
    </population>
    <population id="I1R" component="I1R" type="populationList" size="1">
      <instance id="0">
        <location x="0.9698492" y="0.39698493" z="0.0"/>
      </instance>
    </population>
    <population id="I2L" component="I2L" type="populationList" size="1">
      <instance id="0">
        <location x="0.6482412" y="0.61809045" z="0.0"/>
      </instance>
    </population>
    <population id="I2R" component="I2R" type="populationList" size="1">
      <instance id="0">
        <location x="0.8492462" y="0.015075387" z="0.0"/>
      </instance>
    </population>
    <population id="I3" component="I3" type="populationList" size="1">
      <instance id="0">
        <location x="0.53768843" y="0.72864324" z="0.0"/>
      </instance>
    </population>
    <population id="I4" component="I4" type="populationList" size="1">
      <instance id="0">
        <location x="-0.1155779" y="0.9396985" z="0.0"/>
      </instance>
    </population>
    <population id="I5" component="I5" type="populationList" size="1">
      <instance id="0">
        <location x="-0.5276382" y="0.8190955" z="0.0"/>
      </instance>
    </population>
    <population id="I6" component="I6" type="populationList" size="1">
      <instance id="0">
        <location x="0.37688443" y="-0.5075377" z="0.0"/>
      </instance>
    </population>
    <population id="MCL" component="MCL" type="populationList" size="1">
      <instance id="0">
        <location x="-0.43718594" y="-0.8592965" z="0.0"/>
      </instance>
    </population>
    <population id="MCR" component="MCR" type="populationList" size="1">
      <instance id="0">
        <location x="-0.35678393" y="0.7788945" z="0.0"/>
      </instance>
    </population>
    <population id="MI" component="MI" type="populationList" size="1">
      <instance id="0">
        <location x="0.7889447" y="0.1557789" z="0.0"/>
      </instance>
    </population>
    <population id="NSML" component="NSML" type="populationList" size="1">
      <instance id="0">
        <location x="0.24623117" y="0.9396985" z="0.0"/>
      </instance>
    </population>
    <population id="NSMR" component="NSMR" type="populationList" size="1">
      <instance id="0">
        <location x="-0.23618092" y="-0.72864324" z="0.0"/>
      </instance>
    </population>
    <projection id="NCXLS_M3L_I2L" presynapticPopulation="M3L" postsynapticPopulation="I2L" synapse="Acetylcholine">
      <connection id="0" preCellId="../M3L/0/M3L" postCellId="../I2L/0/I2L" preSegmentId="7" postSegmentId="5" preFractionAlong="0.9190382770286711" postFractionAlong="0.8999095433546718"/>
    </projection>
    <projection id="NCXLS_M3L_M2R" presynapticPopulation="M3L" postsynapticPopulation="M2R" synapse="Acetylcholine">
      <connection id="1" preCellId="../M3L/0/M3L" postCellId="../M2R/0/M2R" preSegmentId="9" postSegmentId="9" preFractionAlong="0.38776432852974974" postFractionAlong="0.28686687498279395"/>
    </projection>
    <electricalProjection id="NCXLS_M3L_M3R_GJ" presynapticPopulation="M3L" postsynapticPopulation="M3R">
      <electricalConnection id="2" preCell="0" postCell="0" synapse="Generic_GJ" preSegment="2" postSegment="3" preFractionAlong="0.9993162681897128" postFractionAlong="0.2680115005195973"/>
    </electricalProjection>
    <projection id="NCXLS_M3L_I2R" presynapticPopulation="M3L" postsynapticPopulation="I2R" synapse="Acetylcholine">
      <connection id="3" preCellId="../M3L/0/M3L" postCellId="../I2R/0/I2R" preSegmentId="5" postSegmentId="2" preFractionAlong="0.6593281279840014" postFractionAlong="0.2939613764102983"/>
    </projection>
    <projection id="NCXLS_M3L_MCL" presynapticPopulation="M3L" postsynapticPopulation="MCL" synapse="Acetylcholine">
      <connection id="4" preCellId="../M3L/0/M3L" postCellId="../MCL/0/MCL" preSegmentId="2" postSegmentId="3" preFractionAlong="0.3126826650277922" postFractionAlong="0.10591568962877351"/>
    </projection>
    <projection id="NCXLS_M3L_M4" presynapticPopulation="M3L" postsynapticPopulation="M4" synapse="Acetylcholine">
      <connection id="5" preCellId="../M3L/0/M3L" postCellId="../M4/0/M4" preSegmentId="1" postSegmentId="1" preFractionAlong="0.4703240479372064" postFractionAlong="0.8735753057597342"/>
    </projection>
    <projection id="NCXLS_M3L_I1L" presynapticPopulation="M3L" postsynapticPopulation="I1L" synapse="Acetylcholine">
      <connection id="6" preCellId="../M3L/0/M3L" postCellId="../I1L/0/I1L" preSegmentId="9" postSegmentId="9" preFractionAlong="0.5130772183680499" postFractionAlong="0.6707472004717734"/>
    </projection>
    <projection id="NCXLS_M3L_I3" presynapticPopulation="M3L" postsynapticPopulation="I3" synapse="Acetylcholine">
      <connection id="7" preCellId="../M3L/0/M3L" postCellId="../I3/0/I3" preSegmentId="3" postSegmentId="3" preFractionAlong="0.7368051067209991" postFractionAlong="0.601386985981786"/>
    </projection>
    <projection id="NCXLS_M3L_I1R" presynapticPopulation="M3L" postsynapticPopulation="I1R" synapse="Acetylcholine">
      <connection id="8" preCellId="../M3L/0/M3L" postCellId="../I1R/0/I1R" preSegmentId="5" postSegmentId="1" preFractionAlong="0.3477700976044378" postFractionAlong="0.5205205336415145"/>
    </projection>
    <projection id="NCXLS_M3L_I6" presynapticPopulation="M3L" postsynapticPopulation="I6" synapse="Acetylcholine">
      <connection id="9" preCellId="../M3L/0/M3L" postCellId="../I6/0/I6" preSegmentId="3" postSegmentId="5" preFractionAlong="0.714153146392174" postFractionAlong="0.8612322272603858"/>
    </projection>
    <projection id="NCXLS_M3L_MI" presynapticPopulation="M3L" postsynapticPopulation="MI" synapse="Acetylcholine">
      <connection id="10" preCellId="../M3L/0/M3L" postCellId="../MI/0/MI" preSegmentId="8" postSegmentId="9" preFractionAlong="0.4080200912850811" postFractionAlong="0.6874648040497281"/>
    </projection>
    <projection id="NCXLS_M3L_NSMR" presynapticPopulation="M3L" postsynapticPopulation="NSMR" synapse="Acetylcholine">
      <connection id="11" preCellId="../M3L/0/M3L" postCellId="../NSMR/0/NSMR" preSegmentId="9" postSegmentId="8" preFractionAlong="0.6402509149522763" postFractionAlong="0.877489241731488"/>
    </projection>
    <projection id="NCXLS_M2R_I2L" presynapticPopulation="M2R" postsynapticPopulation="I2L" synapse="Acetylcholine">
      <connection id="12" preCellId="../M2R/0/M2R" postCellId="../I2L/0/I2L" preSegmentId="7" postSegmentId="5" preFractionAlong="0.4235405772415082" postFractionAlong="0.5716366179741326"/>
    </projection>
    <projection id="NCXLS_M2R_M3L" presynapticPopulation="M2R" postsynapticPopulation="M3L" synapse="Glutamate">
      <connection id="13" preCellId="../M2R/0/M2R" postCellId="../M3L/0/M3L" preSegmentId="3" postSegmentId="8" preFractionAlong="0.9811311957115507" postFractionAlong="0.7590280480512028"/>
    </projection>
    <projection id="NCXLS_M2R_M5" presynapticPopulation="M2R" postsynapticPopulation="M5" synapse="Acetylcholine">
      <connection id="14" preCellId="../M2R/0/M2R" postCellId="../M5/0/M5" preSegmentId="5" postSegmentId="1" preFractionAlong="0.8445215313136548" postFractionAlong="0.5823574550639659"/>
    </projection>
    <projection id="NCXLS_M2R_I2R" presynapticPopulation="M2R" postsynapticPopulation="I2R" synapse="Acetylcholine">
      <connection id="15" preCellId="../M2R/0/M2R" postCellId="../I2R/0/I2R" preSegmentId="3" postSegmentId="3" preFractionAlong="0.6364287437528491" postFractionAlong="0.8341115832663251"/>
    </projection>
    <projection id="NCXLS_M2R_I3" presynapticPopulation="M2R" postsynapticPopulation="I3" synapse="Acetylcholine">
      <connection id="16" preCellId="../M2R/0/M2R" postCellId="../I3/0/I3" preSegmentId="9" postSegmentId="7" preFractionAlong="0.43049358343151" postFractionAlong="0.46724134440883713"/>
    </projection>
    <projection id="NCXLS_M2R_MCR" presynapticPopulation="M2R" postsynapticPopulation="MCR" synapse="Acetylcholine">
      <connection id="17" preCellId="../M2R/0/M2R" postCellId="../MCR/0/MCR" preSegmentId="6" postSegmentId="1" preFractionAlong="0.542547862300646" postFractionAlong="0.9784443921535696"/>
    </projection>
    <projection id="NCXLS_M2R_I1R" presynapticPopulation="M2R" postsynapticPopulation="I1R" synapse="Acetylcholine">
      <connection id="18" preCellId="../M2R/0/M2R" postCellId="../I1R/0/I1R" preSegmentId="3" postSegmentId="3" preFractionAlong="0.9470402781443592" postFractionAlong="0.5048748150953071"/>
    </projection>
    <projection id="NCXLS_M2R_I4" presynapticPopulation="M2R" postsynapticPopulation="I4" synapse="Acetylcholine">
      <connection id="19" preCellId="../M2R/0/M2R" postCellId="../I4/0/I4" preSegmentId="8" postSegmentId="5" preFractionAlong="0.5466256459432461" postFractionAlong="0.553490270198824"/>
    </projection>
    <projection id="NCXLS_M2R_I5" presynapticPopulation="M2R" postsynapticPopulation="I5" synapse="Acetylcholine">
      <connection id="20" preCellId="../M2R/0/M2R" postCellId="../I5/0/I5" preSegmentId="1" postSegmentId="2" preFractionAlong="0.30600097358316747" postFractionAlong="0.927206464790831"/>
    </projection>
    <projection id="NCXLS_M2R_I6" presynapticPopulation="M2R" postsynapticPopulation="I6" synapse="Acetylcholine">
      <connection id="21" preCellId="../M2R/0/M2R" postCellId="../I6/0/I6" preSegmentId="1" postSegmentId="5" preFractionAlong="0.19695363020872136" postFractionAlong="0.41275832027739345"/>
    </projection>
    <projection id="NCXLS_M2R_MI" presynapticPopulation="M2R" postsynapticPopulation="MI" synapse="Acetylcholine">
      <connection id="22" preCellId="../M2R/0/M2R" postCellId="../MI/0/MI" preSegmentId="2" postSegmentId="2" preFractionAlong="0.4407658014365413" postFractionAlong="0.4789705614534714"/>
    </projection>
    <projection id="NCXLS_M2R_M1" presynapticPopulation="M2R" postsynapticPopulation="M1" synapse="Acetylcholine">
      <connection id="23" preCellId="../M2R/0/M2R" postCellId="../M1/0/M1" preSegmentId="4" postSegmentId="7" preFractionAlong="0.3948007684629531" postFractionAlong="0.9533242648871384"/>
    </projection>
    <projection id="NCXLS_M2R_NSML" presynapticPopulation="M2R" postsynapticPopulation="NSML" synapse="Acetylcholine">
      <connection id="24" preCellId="../M2R/0/M2R" postCellId="../NSML/0/NSML" preSegmentId="2" postSegmentId="3" preFractionAlong="0.9737805009789289" postFractionAlong="0.008198321130962194"/>
    </projection>
    <projection id="NCXLS_M2R_M2L" presynapticPopulation="M2R" postsynapticPopulation="M2L" synapse="Glutamate">
      <connection id="25" preCellId="../M2R/0/M2R" postCellId="../M2L/0/M2L" preSegmentId="5" postSegmentId="4" preFractionAlong="0.9311204519433507" postFractionAlong="0.9610209357652133"/>
    </projection>
    <projection id="NCXLS_M3R_M3L" presynapticPopulation="M3R" postsynapticPopulation="M3L" synapse="Acetylcholine">
      <connection id="26" preCellId="../M3R/0/M3R" postCellId="../M3L/0/M3L" preSegmentId="3" postSegmentId="6" preFractionAlong="0.171700836550309" postFractionAlong="0.6537645030932362"/>
    </projection>
    <projection id="NCXLS_M3R_MCL" presynapticPopulation="M3R" postsynapticPopulation="MCL" synapse="Acetylcholine">
      <connection id="27" preCellId="../M3R/0/M3R" postCellId="../MCL/0/MCL" preSegmentId="2" postSegmentId="3" preFractionAlong="0.947170616843394" postFractionAlong="0.13593274736732064"/>
    </projection>
    <electricalProjection id="NCXLS_M3R_M4_GJ" presynapticPopulation="M3R" postsynapticPopulation="M4">
      <electricalConnection id="28" preCell="0" postCell="0" synapse="Generic_GJ" preSegment="4" postSegment="7" preFractionAlong="0.21417625273958685" postFractionAlong="0.06007316835498244"/>
    </electricalProjection>
    <projection id="NCXLS_M3R_I1L" presynapticPopulation="M3R" postsynapticPopulation="I1L" synapse="Acetylcholine">
      <connection id="29" preCellId="../M3R/0/M3R" postCellId="../I1L/0/I1L" preSegmentId="3" postSegmentId="1" preFractionAlong="0.5337254136714444" postFractionAlong="0.14383447099031088"/>
    </projection>
    <projection id="NCXLS_M3R_M1" presynapticPopulation="M3R" postsynapticPopulation="M1" synapse="Acetylcholine">
      <connection id="30" preCellId="../M3R/0/M3R" postCellId="../M1/0/M1" preSegmentId="4" postSegmentId="1" preFractionAlong="0.33692191307674557" postFractionAlong="0.5854859383150356"/>
    </projection>
    <projection id="NCXLS_M5_I4" presynapticPopulation="M5" postsynapticPopulation="I4" synapse="Acetylcholine">
      <connection id="31" preCellId="../M5/0/M5" postCellId="../I4/0/I4" preSegmentId="4" postSegmentId="6" preFractionAlong="0.08693956069225417" postFractionAlong="0.2229500085577536"/>
    </projection>
    <projection id="NCXLS_M5_NSML" presynapticPopulation="M5" postsynapticPopulation="NSML" synapse="Acetylcholine">
      <connection id="32" preCellId="../M5/0/M5" postCellId="../NSML/0/NSML" preSegmentId="2" postSegmentId="1" preFractionAlong="0.42801935243964384" postFractionAlong="0.6582837834261573"/>
    </projection>
    <projection id="NCXLS_I2R_I1R" presynapticPopulation="I2R" postsynapticPopulation="I1R" synapse="Glutamate">
      <connection id="33" preCellId="../I2R/0/I2R" postCellId="../I1R/0/I1R" preSegmentId="2" postSegmentId="6" preFractionAlong="0.6057594893589721" postFractionAlong="0.9628704940018097"/>
    </projection>
    <projection id="NCXLS_MCL_M4" presynapticPopulation="MCL" postsynapticPopulation="M4" synapse="Acetylcholine">
      <connection id="34" preCellId="../MCL/0/MCL" postCellId="../M4/0/M4" preSegmentId="8" postSegmentId="4" preFractionAlong="0.4156792951628686" postFractionAlong="0.45949577486441007"/>
    </projection>
    <projection id="NCXLS_MCL_I1L" presynapticPopulation="MCL" postsynapticPopulation="I1L" synapse="Acetylcholine">
      <connection id="35" preCellId="../MCL/0/MCL" postCellId="../I1L/0/I1L" preSegmentId="9" postSegmentId="6" preFractionAlong="0.322978733363808" postFractionAlong="0.23725436365713726"/>
    </projection>
    <projection id="NCXLS_M4_M3L" presynapticPopulation="M4" postsynapticPopulation="M3L" synapse="Acetylcholine">
      <connection id="36" preCellId="../M4/0/M4" postCellId="../M3L/0/M3L" preSegmentId="6" postSegmentId="5" preFractionAlong="0.9059736635092605" postFractionAlong="0.8635465316714287"/>
    </projection>
    <projection id="NCXLS_M4_M5" presynapticPopulation="M4" postsynapticPopulation="M5" synapse="Acetylcholine">
      <connection id="37" preCellId="../M4/0/M4" postCellId="../M5/0/M5" preSegmentId="6" postSegmentId="8" preFractionAlong="0.6377028510419288" postFractionAlong="0.5060830957405109"/>
    </projection>
    <projection id="NCXLS_M4_MCR" presynapticPopulation="M4" postsynapticPopulation="MCR" synapse="Acetylcholine">
      <connection id="38" preCellId="../M4/0/M4" postCellId="../MCR/0/MCR" preSegmentId="2" postSegmentId="5" preFractionAlong="0.7427214971864174" postFractionAlong="0.8465611699612853"/>
    </projection>
    <projection id="NCXLS_M4_I4" presynapticPopulation="M4" postsynapticPopulation="I4" synapse="Acetylcholine">
      <connection id="39" preCellId="../M4/0/M4" postCellId="../I4/0/I4" preSegmentId="7" postSegmentId="1" preFractionAlong="0.031620038237463954" postFractionAlong="0.25850056769959395"/>
    </projection>
    <projection id="NCXLS_M4_I5" presynapticPopulation="M4" postsynapticPopulation="I5" synapse="Acetylcholine">
      <connection id="40" preCellId="../M4/0/M4" postCellId="../I5/0/I5" preSegmentId="9" postSegmentId="4" preFractionAlong="0.31325074048882195" postFractionAlong="0.7536661379095813"/>
    </projection>
    <projection id="NCXLS_M4_M1" presynapticPopulation="M4" postsynapticPopulation="M1" synapse="Acetylcholine">
      <connection id="41" preCellId="../M4/0/M4" postCellId="../M1/0/M1" preSegmentId="1" postSegmentId="3" preFractionAlong="0.40381100524749924" postFractionAlong="0.2147445024083574"/>
    </projection>
    <projection id="NCXLS_MCR_I5" presynapticPopulation="MCR" postsynapticPopulation="I5" synapse="Acetylcholine">
      <connection id="42" preCellId="../MCR/0/MCR" postCellId="../I5/0/I5" preSegmentId="8" postSegmentId="8" preFractionAlong="0.8064028192465743" postFractionAlong="0.5102470998031456"/>
    </projection>
    <projection id="NCXLS_MCR_M1" presynapticPopulation="MCR" postsynapticPopulation="M1" synapse="Acetylcholine">
      <connection id="43" preCellId="../MCR/0/MCR" postCellId="../M1/0/M1" preSegmentId="4" postSegmentId="8" preFractionAlong="0.28167935447452497" postFractionAlong="0.4806701123050767"/>
    </projection>
    <projection id="NCXLS_M1_I2L" presynapticPopulation="M1" postsynapticPopulation="I2L" synapse="Acetylcholine">
      <connection id="44" preCellId="../M1/0/M1" postCellId="../I2L/0/I2L" preSegmentId="2" postSegmentId="9" preFractionAlong="0.12077952243257872" postFractionAlong="0.4261152788307795"/>
    </projection>
    <projection id="NCXLS_M1_M3L" presynapticPopulation="M1" postsynapticPopulation="M3L" synapse="Glutamate">
      <connection id="45" preCellId="../M1/0/M1" postCellId="../M3L/0/M3L" preSegmentId="3" postSegmentId="7" preFractionAlong="0.2821555840361393" postFractionAlong="0.233251691266392"/>
    </projection>
    <projection id="NCXLS_M1_M2R" presynapticPopulation="M1" postsynapticPopulation="M2R" synapse="Glutamate">
      <connection id="46" preCellId="../M1/0/M1" postCellId="../M2R/0/M2R" preSegmentId="3" postSegmentId="9" preFractionAlong="0.14954931855694453" postFractionAlong="0.10383938611092758"/>
    </projection>
    <projection id="NCXLS_M1_M3R" presynapticPopulation="M1" postsynapticPopulation="M3R" synapse="Glutamate">
      <connection id="47" preCellId="../M1/0/M1" postCellId="../M3R/0/M3R" preSegmentId="3" postSegmentId="9" preFractionAlong="0.10102824649125852" postFractionAlong="0.6097081955367598"/>
    </projection>
    <projection id="NCXLS_M1_M5" presynapticPopulation="M1" postsynapticPopulation="M5" synapse="Acetylcholine">
      <connection id="48" preCellId="../M1/0/M1" postCellId="../M5/0/M5" preSegmentId="5" postSegmentId="6" preFractionAlong="0.7772955758390735" postFractionAlong="0.8320947360831149"/>
    </projection>
    <projection id="NCXLS_M1_I2R" presynapticPopulation="M1" postsynapticPopulation="I2R" synapse="Acetylcholine">
      <connection id="49" preCellId="../M1/0/M1" postCellId="../I2R/0/I2R" preSegmentId="6" postSegmentId="3" preFractionAlong="0.23049483735152088" postFractionAlong="0.327566293922126"/>
    </projection>
    <projection id="NCXLS_M1_MCL" presynapticPopulation="M1" postsynapticPopulation="MCL" synapse="Acetylcholine">
      <connection id="50" preCellId="../M1/0/M1" postCellId="../MCL/0/MCL" preSegmentId="9" postSegmentId="6" preFractionAlong="0.49187595946082374" postFractionAlong="0.019610532474253595"/>
    </projection>
    <electricalProjection id="NCXLS_M1_M4_GJ" presynapticPopulation="M1" postsynapticPopulation="M4">
      <electricalConnection id="51" preCell="0" postCell="0" synapse="Generic_GJ" preSegment="5" postSegment="9" preFractionAlong="0.2489289877145937" postFractionAlong="0.5903809652038607"/>
    </electricalProjection>
    <projection id="NCXLS_M1_I1L" presynapticPopulation="M1" postsynapticPopulation="I1L" synapse="Acetylcholine">
      <connection id="52" preCellId="../M1/0/M1" postCellId="../I1L/0/I1L" preSegmentId="5" postSegmentId="1" preFractionAlong="0.026297726684668565" postFractionAlong="0.26102866529344926"/>
    </projection>
    <projection id="NCXLS_M1_I3" presynapticPopulation="M1" postsynapticPopulation="I3" synapse="Acetylcholine">
      <connection id="53" preCellId="../M1/0/M1" postCellId="../I3/0/I3" preSegmentId="9" postSegmentId="1" preFractionAlong="0.9076163862252272" postFractionAlong="0.8464351763073069"/>
    </projection>
    <projection id="NCXLS_M1_MCR" presynapticPopulation="M1" postsynapticPopulation="MCR" synapse="Acetylcholine">
      <connection id="54" preCellId="../M1/0/M1" postCellId="../MCR/0/MCR" preSegmentId="6" postSegmentId="6" preFractionAlong="0.4114109317604655" postFractionAlong="0.9477328040063053"/>
    </projection>
    <projection id="NCXLS_M1_I1R" presynapticPopulation="M1" postsynapticPopulation="I1R" synapse="Acetylcholine">
      <connection id="55" preCellId="../M1/0/M1" postCellId="../I1R/0/I1R" preSegmentId="5" postSegmentId="5" preFractionAlong="0.23063864021426395" postFractionAlong="0.7728739363818531"/>
    </projection>
    <projection id="NCXLS_M1_I4" presynapticPopulation="M1" postsynapticPopulation="I4" synapse="Acetylcholine">
      <connection id="56" preCellId="../M1/0/M1" postCellId="../I4/0/I4" preSegmentId="4" postSegmentId="4" preFractionAlong="0.3088608992364632" postFractionAlong="0.6588554042268422"/>
    </projection>
    <projection id="NCXLS_M1_I5" presynapticPopulation="M1" postsynapticPopulation="I5" synapse="Acetylcholine">
      <connection id="57" preCellId="../M1/0/M1" postCellId="../I5/0/I5" preSegmentId="3" postSegmentId="8" preFractionAlong="0.016108218549336972" postFractionAlong="0.11704507270632614"/>
    </projection>
    <projection id="NCXLS_M1_I6" presynapticPopulation="M1" postsynapticPopulation="I6" synapse="Acetylcholine">
      <connection id="58" preCellId="../M1/0/M1" postCellId="../I6/0/I6" preSegmentId="5" postSegmentId="3" preFractionAlong="0.6681806619579052" postFractionAlong="0.8958121013985787"/>
    </projection>
    <projection id="NCXLS_M1_MI" presynapticPopulation="M1" postsynapticPopulation="MI" synapse="Acetylcholine">
      <connection id="59" preCellId="../M1/0/M1" postCellId="../MI/0/MI" preSegmentId="1" postSegmentId="6" preFractionAlong="0.6275560238706465" postFractionAlong="0.3563864785230282"/>
    </projection>
    <projection id="NCXLS_M1_NSML" presynapticPopulation="M1" postsynapticPopulation="NSML" synapse="Acetylcholine">
      <connection id="60" preCellId="../M1/0/M1" postCellId="../NSML/0/NSML" preSegmentId="4" postSegmentId="8" preFractionAlong="0.13696663454423585" postFractionAlong="0.5067700407177881"/>
    </projection>
    <projection id="NCXLS_M1_M2L" presynapticPopulation="M1" postsynapticPopulation="M2L" synapse="Acetylcholine">
      <connection id="61" preCellId="../M1/0/M1" postCellId="../M2L/0/M2L" preSegmentId="1" postSegmentId="3" preFractionAlong="0.49267433031100294" postFractionAlong="0.3389939701615733"/>
    </projection>
    <projection id="NCXLS_M1_NSMR" presynapticPopulation="M1" postsynapticPopulation="NSMR" synapse="Acetylcholine">
      <connection id="62" preCellId="../M1/0/M1" postCellId="../NSMR/0/NSMR" preSegmentId="7" postSegmentId="2" preFractionAlong="0.5521608269710124" postFractionAlong="0.7528170260888097"/>
    </projection>
    <projection id="NCXLS_M2L_I2L" presynapticPopulation="M2L" postsynapticPopulation="I2L" synapse="Acetylcholine">
      <connection id="63" preCellId="../M2L/0/M2L" postCellId="../I2L/0/I2L" preSegmentId="4" postSegmentId="6" preFractionAlong="0.21879435157672256" postFractionAlong="0.521934964064577"/>
    </projection>
    <electricalProjection id="NCXLS_M2L_M2R_GJ" presynapticPopulation="M2L" postsynapticPopulation="M2R">
      <electricalConnection id="64" preCell="0" postCell="0" synapse="Generic_GJ" preSegment="2" postSegment="7" preFractionAlong="0.40195192461521956" postFractionAlong="0.8457448783257632"/>
    </electricalProjection>
    <projection id="NCXLS_M2L_M3R" presynapticPopulation="M2L" postsynapticPopulation="M3R" synapse="Acetylcholine">
      <connection id="65" preCellId="../M2L/0/M2L" postCellId="../M3R/0/M3R" preSegmentId="1" postSegmentId="1" preFractionAlong="0.7093142948034834" postFractionAlong="0.5861823540883414"/>
    </projection>
    <projection id="NCXLS_M2L_I2R" presynapticPopulation="M2L" postsynapticPopulation="I2R" synapse="Acetylcholine">
      <connection id="66" preCellId="../M2L/0/M2L" postCellId="../I2R/0/I2R" preSegmentId="4" postSegmentId="7" preFractionAlong="0.5770533417135443" postFractionAlong="0.3422655927897462"/>
    </projection>
    <projection id="NCXLS_M2L_MCL" presynapticPopulation="M2L" postsynapticPopulation="MCL" synapse="Acetylcholine">
      <connection id="67" preCellId="../M2L/0/M2L" postCellId="../MCL/0/MCL" preSegmentId="8" postSegmentId="6" preFractionAlong="0.30148841535435944" postFractionAlong="0.9680209612276284"/>
    </projection>
    <projection id="NCXLS_M2L_M4" presynapticPopulation="M2L" postsynapticPopulation="M4" synapse="Acetylcholine">
      <connection id="68" preCellId="../M2L/0/M2L" postCellId="../M4/0/M4" preSegmentId="7" postSegmentId="6" preFractionAlong="0.1367222763734658" postFractionAlong="0.41669483967346677"/>
    </projection>
    <projection id="NCXLS_M2L_I1L" presynapticPopulation="M2L" postsynapticPopulation="I1L" synapse="Acetylcholine">
      <connection id="69" preCellId="../M2L/0/M2L" postCellId="../I1L/0/I1L" preSegmentId="6" postSegmentId="8" preFractionAlong="0.2621129720167965" postFractionAlong="0.3430440057930102"/>
    </projection>
    <projection id="NCXLS_M2L_I3" presynapticPopulation="M2L" postsynapticPopulation="I3" synapse="Acetylcholine">
      <connection id="70" preCellId="../M2L/0/M2L" postCellId="../I3/0/I3" preSegmentId="8" postSegmentId="6" preFractionAlong="0.5115361942347918" postFractionAlong="0.9435652171569769"/>
    </projection>
    <projection id="NCXLS_M2L_I1R" presynapticPopulation="M2L" postsynapticPopulation="I1R" synapse="Acetylcholine">
      <connection id="71" preCellId="../M2L/0/M2L" postCellId="../I1R/0/I1R" preSegmentId="7" postSegmentId="7" preFractionAlong="0.29244180458951574" postFractionAlong="0.7982729965463056"/>
    </projection>
    <projection id="NCXLS_M2L_I6" presynapticPopulation="M2L" postsynapticPopulation="I6" synapse="Acetylcholine">
      <connection id="72" preCellId="../M2L/0/M2L" postCellId="../I6/0/I6" preSegmentId="5" postSegmentId="1" preFractionAlong="0.35230235437675994" postFractionAlong="0.2989477280797803"/>
    </projection>
    <projection id="NCXLS_M2L_MI" presynapticPopulation="M2L" postsynapticPopulation="MI" synapse="Acetylcholine">
      <connection id="73" preCellId="../M2L/0/M2L" postCellId="../MI/0/MI" preSegmentId="4" postSegmentId="9" preFractionAlong="0.08266703798654229" postFractionAlong="0.12616959014873674"/>
    </projection>
    <projection id="NCXLS_M2L_NSMR" presynapticPopulation="M2L" postsynapticPopulation="NSMR" synapse="Acetylcholine">
      <connection id="74" preCellId="../M2L/0/M2L" postCellId="../NSMR/0/NSMR" preSegmentId="5" postSegmentId="3" preFractionAlong="0.5120181266754691" postFractionAlong="0.992241914861122"/>
    </projection>
  </network>
</neuroml>
