<?xml version='1.0' encoding='UTF-8'?>
<neuroml xmlns="http://www.neuroml.org/schema/neuroml2" xmlns:xsi="http://www.w3.org/2001/XMLSchema-instance" xsi:schemaLocation="http://www.neuroml.org/schema/neuroml2 https://raw.githubusercontent.com/NeuroML/NeuroML2/development/Schemas/NeuroML2/NeuroML_v2beta4.xsd" id="gvft_network_bio_prior_lamW_0.144_DF_0.037_t60.net">
  <notes>NeuroML2 network generated from GVFT simulation on 2025-05-04 00:14:33
</notes>
  <include href="M3R.cell.nml"/>
  <include href="M1.cell.nml"/>
  <include href="I2L.cell.nml"/>
  <include href="MCL.cell.nml"/>
  <include href="I6.cell.nml"/>
  <include href="I5.cell.nml"/>
  <include href="M4.cell.nml"/>
  <include href="I1R.cell.nml"/>
  <include href="MCR.cell.nml"/>
  <include href="I3.cell.nml"/>
  <include href="M3L.cell.nml"/>
  <include href="NSML.cell.nml"/>
  <include href="M2L.cell.nml"/>
  <include href="M5.cell.nml"/>
  <include href="I4.cell.nml"/>
  <include href="MI.cell.nml"/>
  <include href="NSMR.cell.nml"/>
  <include href="I2R.cell.nml"/>
  <include href="M2R.cell.nml"/>
  <include href="I1L.cell.nml"/>
  <include href="Serotonin_Glutamate.synapse.nml"/>
  <include href="Acetylcholine.synapse.nml"/>
  <include href="Generic_GJ.synapse.nml"/>
  <include href="Glutamate.synapse.nml"/>
  <network id="gvft_network_bio_prior_lamW_0.144_DF_0.037_t60.net" type="networkWithTemperature" temperature="20.0 degC">
    <population id="M1" component="M1" type="populationList" size="1">
      <instance id="0">
        <location x="0.7487437" y="-0.31658292" z="0.0"/>
      </instance>
    </population>
    <population id="M2L" component="M2L" type="populationList" size="1">
      <instance id="0">
        <location x="0.879397" y="0.21608041" z="0.0"/>
      </instance>
    </population>
    <population id="M2R" component="M2R" type="populationList" size="1">
      <instance id="0">
        <location x="-0.6683417" y="-0.3467337" z="0.0"/>
      </instance>
    </population>
    <population id="M3L" component="M3L" type="populationList" size="1">
      <instance id="0">
        <location x="0.57788944" y="0.2562814" z="0.0"/>
      </instance>
    </population>
    <population id="M3R" component="M3R" type="populationList" size="1">
      <instance id="0">
        <location x="0.0753769" y="-0.2562814" z="0.0"/>
      </instance>
    </population>
    <population id="M4" component="M4" type="populationList" size="1">
      <instance id="0">
        <location x="0.83919597" y="-0.39698493" z="0.0"/>
      </instance>
    </population>
    <population id="M5" component="M5" type="populationList" size="1">
      <instance id="0">
        <location x="0.04522614" y="-0.16582915" z="0.0"/>
      </instance>
    </population>
    <population id="I1L" component="I1L" type="populationList" size="1">
      <instance id="0">
        <location x="-0.5678392" y="0.8291457" z="0.0"/>
      </instance>
    </population>
    <population id="I1R" component="I1R" type="populationList" size="1">
      <instance id="0">
        <location x="-0.8894472" y="-0.5075377" z="0.0"/>
      </instance>
    </population>
    <population id="I2L" component="I2L" type="populationList" size="1">
      <instance id="0">
        <location x="-0.638191" y="0.7788945" z="0.0"/>
      </instance>
    </population>
    <population id="I2R" component="I2R" type="populationList" size="1">
      <instance id="0">
        <location x="0.40703517" y="0.18592966" z="0.0"/>
      </instance>
    </population>
    <population id="I3" component="I3" type="populationList" size="1">
      <instance id="0">
        <location x="0.44723618" y="-0.9396985" z="0.0"/>
      </instance>
    </population>
    <population id="I4" component="I4" type="populationList" size="1">
      <instance id="0">
        <location x="0.8291457" y="-0.98994976" z="0.0"/>
      </instance>
    </population>
    <population id="I5" component="I5" type="populationList" size="1">
      <instance id="0">
        <location x="-0.9798995" y="-0.065326646" z="0.0"/>
      </instance>
    </population>
    <population id="I6" component="I6" type="populationList" size="1">
      <instance id="0">
        <location x="0.6683417" y="-0.75879395" z="0.0"/>
      </instance>
    </population>
    <population id="MCL" component="MCL" type="populationList" size="1">
      <instance id="0">
        <location x="-0.04522614" y="-0.5075377" z="0.0"/>
      </instance>
    </population>
    <population id="MCR" component="MCR" type="populationList" size="1">
      <instance id="0">
        <location x="0.1758794" y="-0.8291457" z="0.0"/>
      </instance>
    </population>
    <population id="MI" component="MI" type="populationList" size="1">
      <instance id="0">
        <location x="0.8592965" y="0.7085427" z="0.0"/>
      </instance>
    </population>
    <population id="NSML" component="NSML" type="populationList" size="1">
      <instance id="0">
        <location x="0.31658292" y="-0.49748746" z="0.0"/>
      </instance>
    </population>
    <population id="NSMR" component="NSMR" type="populationList" size="1">
      <instance id="0">
        <location x="0.6482412" y="0.4874372" z="0.0"/>
      </instance>
    </population>
    <projection id="NCXLS_M2R_MCL" presynapticPopulation="M2R" postsynapticPopulation="MCL" synapse="Acetylcholine">
      <connection id="0" preCellId="../M2R/0/M2R" postCellId="../MCL/0/MCL" preSegmentId="7" postSegmentId="4" preFractionAlong="0.014276981685832357" postFractionAlong="0.6013168243361512"/>
    </projection>
    <electricalProjection id="NCXLS_M2R_M2L_GJ" presynapticPopulation="M2R" postsynapticPopulation="M2L">
      <electricalConnection id="1" preCell="0" postCell="0" synapse="Generic_GJ" preSegment="2" postSegment="5" preFractionAlong="0.1509159827135298" postFractionAlong="0.7926774877946268"/>
    </electricalProjection>
    <projection id="NCXLS_M2R_I2R" presynapticPopulation="M2R" postsynapticPopulation="I2R" synapse="Acetylcholine">
      <connection id="2" preCellId="../M2R/0/M2R" postCellId="../I2R/0/I2R" preSegmentId="8" postSegmentId="8" preFractionAlong="0.28301696588376957" postFractionAlong="0.4379639639625684"/>
    </projection>
    <projection id="NCXLS_M2R_I6" presynapticPopulation="M2R" postsynapticPopulation="I6" synapse="Acetylcholine">
      <connection id="3" preCellId="../M2R/0/M2R" postCellId="../I6/0/I6" preSegmentId="8" postSegmentId="9" preFractionAlong="0.8251929348056901" postFractionAlong="0.3048793573912071"/>
    </projection>
    <projection id="NCXLS_M2R_MI" presynapticPopulation="M2R" postsynapticPopulation="MI" synapse="Acetylcholine">
      <connection id="4" preCellId="../M2R/0/M2R" postCellId="../MI/0/MI" preSegmentId="1" postSegmentId="2" preFractionAlong="0.6836995457246208" postFractionAlong="0.01968321538141371"/>
    </projection>
    <projection id="NCXLS_M2R_NSML" presynapticPopulation="M2R" postsynapticPopulation="NSML" synapse="Acetylcholine">
      <connection id="5" preCellId="../M2R/0/M2R" postCellId="../NSML/0/NSML" preSegmentId="1" postSegmentId="4" preFractionAlong="0.4870160405162395" postFractionAlong="0.8131821472844613"/>
    </projection>
    <projection id="NCXLS_M2R_M5" presynapticPopulation="M2R" postsynapticPopulation="M5" synapse="Acetylcholine">
      <connection id="6" preCellId="../M2R/0/M2R" postCellId="../M5/0/M5" preSegmentId="9" postSegmentId="3" preFractionAlong="0.7215765260850269" postFractionAlong="0.282397110105827"/>
    </projection>
    <projection id="NCXLS_M2R_I3" presynapticPopulation="M2R" postsynapticPopulation="I3" synapse="Acetylcholine">
      <connection id="7" preCellId="../M2R/0/M2R" postCellId="../I3/0/I3" preSegmentId="7" postSegmentId="6" preFractionAlong="0.7250931239865422" postFractionAlong="0.12099976751206643"/>
    </projection>
    <projection id="NCXLS_M2R_M3L" presynapticPopulation="M2R" postsynapticPopulation="M3L" synapse="Glutamate">
      <connection id="8" preCellId="../M2R/0/M2R" postCellId="../M3L/0/M3L" preSegmentId="1" postSegmentId="7" preFractionAlong="0.31579564450825115" postFractionAlong="0.5938737676678615"/>
    </projection>
    <projection id="NCXLS_M2R_M3R" presynapticPopulation="M2R" postsynapticPopulation="M3R" synapse="Glutamate">
      <connection id="9" preCellId="../M2R/0/M2R" postCellId="../M3R/0/M3R" preSegmentId="5" postSegmentId="7" preFractionAlong="0.8802517732816871" postFractionAlong="0.27993732969190666"/>
    </projection>
    <electricalProjection id="NCXLS_M2R_M1_GJ" presynapticPopulation="M2R" postsynapticPopulation="M1">
      <electricalConnection id="10" preCell="0" postCell="0" synapse="Generic_GJ" preSegment="3" postSegment="8" preFractionAlong="0.16019641320544276" postFractionAlong="0.007783970268967155"/>
    </electricalProjection>
    <projection id="NCXLS_M2R_NSMR" presynapticPopulation="M2R" postsynapticPopulation="NSMR" synapse="Acetylcholine">
      <connection id="11" preCellId="../M2R/0/M2R" postCellId="../NSMR/0/NSMR" preSegmentId="3" postSegmentId="6" preFractionAlong="0.6237533843692328" postFractionAlong="0.0056313127480537295"/>
    </projection>
    <projection id="NCXLS_M2R_I4" presynapticPopulation="M2R" postsynapticPopulation="I4" synapse="Acetylcholine">
      <connection id="12" preCellId="../M2R/0/M2R" postCellId="../I4/0/I4" preSegmentId="7" postSegmentId="4" preFractionAlong="0.09972620385336795" postFractionAlong="0.36332447556901004"/>
    </projection>
    <electricalProjection id="NCXLS_M2R_M4_GJ" presynapticPopulation="M2R" postsynapticPopulation="M4">
      <electricalConnection id="13" preCell="0" postCell="0" synapse="Generic_GJ" preSegment="4" postSegment="8" preFractionAlong="0.71042471638678" postFractionAlong="0.16933185740694157"/>
    </electricalProjection>
    <projection id="NCXLS_M2R_MCR" presynapticPopulation="M2R" postsynapticPopulation="MCR" synapse="Acetylcholine">
      <connection id="14" preCellId="../M2R/0/M2R" postCellId="../MCR/0/MCR" preSegmentId="5" postSegmentId="1" preFractionAlong="0.4953176469339088" postFractionAlong="0.4276917880334611"/>
    </projection>
    <projection id="NCXLS_MCL_M2R" presynapticPopulation="MCL" postsynapticPopulation="M2R" synapse="Acetylcholine">
      <connection id="15" preCellId="../MCL/0/MCL" postCellId="../M2R/0/M2R" preSegmentId="7" postSegmentId="6" preFractionAlong="0.21473512512156323" postFractionAlong="0.5166642598438743"/>
    </projection>
    <projection id="NCXLS_MCL_I1L" presynapticPopulation="MCL" postsynapticPopulation="I1L" synapse="Acetylcholine">
      <connection id="16" preCellId="../MCL/0/MCL" postCellId="../I1L/0/I1L" preSegmentId="2" postSegmentId="6" preFractionAlong="0.5568444131345626" postFractionAlong="0.9290208857168011"/>
    </projection>
    <projection id="NCXLS_MCL_M5" presynapticPopulation="MCL" postsynapticPopulation="M5" synapse="Acetylcholine">
      <connection id="17" preCellId="../MCL/0/MCL" postCellId="../M5/0/M5" preSegmentId="5" postSegmentId="6" preFractionAlong="0.17944523758085307" postFractionAlong="0.025420685179524893"/>
    </projection>
    <projection id="NCXLS_MCL_I5" presynapticPopulation="MCL" postsynapticPopulation="I5" synapse="Acetylcholine">
      <connection id="18" preCellId="../MCL/0/MCL" postCellId="../I5/0/I5" preSegmentId="1" postSegmentId="6" preFractionAlong="0.5875124794267791" postFractionAlong="0.06164188343682353"/>
    </projection>
    <projection id="NCXLS_MCL_I1R" presynapticPopulation="MCL" postsynapticPopulation="I1R" synapse="Acetylcholine">
      <connection id="19" preCellId="../MCL/0/MCL" postCellId="../I1R/0/I1R" preSegmentId="2" postSegmentId="1" preFractionAlong="0.6237721906508529" postFractionAlong="0.1890172827464972"/>
    </projection>
    <projection id="NCXLS_MCL_I2L" presynapticPopulation="MCL" postsynapticPopulation="I2L" synapse="Acetylcholine">
      <connection id="20" preCellId="../MCL/0/MCL" postCellId="../I2L/0/I2L" preSegmentId="2" postSegmentId="1" preFractionAlong="0.21744763400770029" postFractionAlong="0.2541777143056575"/>
    </projection>
    <electricalProjection id="NCXLS_M2L_M2R_GJ" presynapticPopulation="M2L" postsynapticPopulation="M2R">
      <electricalConnection id="21" preCell="0" postCell="0" synapse="Generic_GJ" preSegment="7" postSegment="6" preFractionAlong="0.0747459036363155" postFractionAlong="0.4606849734821338"/>
    </electricalProjection>
    <projection id="NCXLS_M2L_MCL" presynapticPopulation="M2L" postsynapticPopulation="MCL" synapse="Acetylcholine">
      <connection id="22" preCellId="../M2L/0/M2L" postCellId="../MCL/0/MCL" preSegmentId="2" postSegmentId="5" preFractionAlong="0.35748310349188284" postFractionAlong="0.729426093982715"/>
    </projection>
    <projection id="NCXLS_M2L_I2R" presynapticPopulation="M2L" postsynapticPopulation="I2R" synapse="Acetylcholine">
      <connection id="23" preCellId="../M2L/0/M2L" postCellId="../I2R/0/I2R" preSegmentId="4" postSegmentId="3" preFractionAlong="0.22569467439043023" postFractionAlong="0.02093202949207351"/>
    </projection>
    <projection id="NCXLS_M2L_MI" presynapticPopulation="M2L" postsynapticPopulation="MI" synapse="Acetylcholine">
      <connection id="24" preCellId="../M2L/0/M2L" postCellId="../MI/0/MI" preSegmentId="9" postSegmentId="9" preFractionAlong="0.033789150948248636" postFractionAlong="0.5931559955271343"/>
    </projection>
    <projection id="NCXLS_M2L_I1L" presynapticPopulation="M2L" postsynapticPopulation="I1L" synapse="Acetylcholine">
      <connection id="25" preCellId="../M2L/0/M2L" postCellId="../I1L/0/I1L" preSegmentId="3" postSegmentId="4" preFractionAlong="0.34594951786320294" postFractionAlong="0.3479686661552165"/>
    </projection>
    <electricalProjection id="NCXLS_M2L_M5_GJ" presynapticPopulation="M2L" postsynapticPopulation="M5">
      <electricalConnection id="26" preCell="0" postCell="0" synapse="Generic_GJ" preSegment="2" postSegment="5" preFractionAlong="0.14562873852545144" postFractionAlong="0.03343798556109767"/>
    </electricalProjection>
    <projection id="NCXLS_M2L_I5" presynapticPopulation="M2L" postsynapticPopulation="I5" synapse="Acetylcholine">
      <connection id="27" preCellId="../M2L/0/M2L" postCellId="../I5/0/I5" preSegmentId="8" postSegmentId="3" preFractionAlong="0.11567522364811655" postFractionAlong="0.946264493003082"/>
    </projection>
    <projection id="NCXLS_M2L_M3L" presynapticPopulation="M2L" postsynapticPopulation="M3L" synapse="Acetylcholine">
      <connection id="28" preCellId="../M2L/0/M2L" postCellId="../M3L/0/M3L" preSegmentId="2" postSegmentId="2" preFractionAlong="0.6374988029341632" postFractionAlong="0.6452777553235629"/>
    </projection>
    <projection id="NCXLS_M2L_M3R" presynapticPopulation="M2L" postsynapticPopulation="M3R" synapse="Glutamate">
      <connection id="29" preCellId="../M2L/0/M2L" postCellId="../M3R/0/M3R" preSegmentId="1" postSegmentId="4" preFractionAlong="0.5047543235655417" postFractionAlong="0.6970911382607585"/>
    </projection>
    <projection id="NCXLS_M2L_NSMR" presynapticPopulation="M2L" postsynapticPopulation="NSMR" synapse="Acetylcholine">
      <connection id="30" preCellId="../M2L/0/M2L" postCellId="../NSMR/0/NSMR" preSegmentId="5" postSegmentId="4" preFractionAlong="0.07227170901135149" postFractionAlong="0.690701039499166"/>
    </projection>
    <projection id="NCXLS_M2L_I1R" presynapticPopulation="M2L" postsynapticPopulation="I1R" synapse="Acetylcholine">
      <connection id="31" preCellId="../M2L/0/M2L" postCellId="../I1R/0/I1R" preSegmentId="5" postSegmentId="1" preFractionAlong="0.4392105109318746" postFractionAlong="0.8432620428217643"/>
    </projection>
    <projection id="NCXLS_M2L_I2L" presynapticPopulation="M2L" postsynapticPopulation="I2L" synapse="Acetylcholine">
      <connection id="32" preCellId="../M2L/0/M2L" postCellId="../I2L/0/I2L" preSegmentId="1" postSegmentId="2" preFractionAlong="0.8717977710246627" postFractionAlong="0.1558806975298057"/>
    </projection>
    <projection id="NCXLS_M5_M2R" presynapticPopulation="M5" postsynapticPopulation="M2R" synapse="Glutamate">
      <connection id="33" preCellId="../M5/0/M5" postCellId="../M2R/0/M2R" preSegmentId="1" postSegmentId="6" preFractionAlong="0.33723775083584207" postFractionAlong="0.7179370236225695"/>
    </projection>
    <projection id="NCXLS_M5_MCL" presynapticPopulation="M5" postsynapticPopulation="MCL" synapse="Acetylcholine">
      <connection id="34" preCellId="../M5/0/M5" postCellId="../MCL/0/MCL" preSegmentId="1" postSegmentId="3" preFractionAlong="0.22112326288901496" postFractionAlong="0.2742618501588997"/>
    </projection>
    <projection id="NCXLS_M5_I1L" presynapticPopulation="M5" postsynapticPopulation="I1L" synapse="Acetylcholine">
      <connection id="35" preCellId="../M5/0/M5" postCellId="../I1L/0/I1L" preSegmentId="6" postSegmentId="3" preFractionAlong="0.14451522390695026" postFractionAlong="0.13394121940000037"/>
    </projection>
    <projection id="NCXLS_M5_I5" presynapticPopulation="M5" postsynapticPopulation="I5" synapse="Acetylcholine">
      <connection id="36" preCellId="../M5/0/M5" postCellId="../I5/0/I5" preSegmentId="2" postSegmentId="6" preFractionAlong="0.06850279257189407" postFractionAlong="0.5107393295062169"/>
    </projection>
    <projection id="NCXLS_M5_I1R" presynapticPopulation="M5" postsynapticPopulation="I1R" synapse="Acetylcholine">
      <connection id="37" preCellId="../M5/0/M5" postCellId="../I1R/0/I1R" preSegmentId="4" postSegmentId="6" preFractionAlong="0.767168140344352" postFractionAlong="0.6598027014003166"/>
    </projection>
    <projection id="NCXLS_M5_I2L" presynapticPopulation="M5" postsynapticPopulation="I2L" synapse="Acetylcholine">
      <connection id="38" preCellId="../M5/0/M5" postCellId="../I2L/0/I2L" preSegmentId="2" postSegmentId="8" preFractionAlong="0.22466070010507144" postFractionAlong="0.7268635660178063"/>
    </projection>
    <projection id="NCXLS_I5_M2R" presynapticPopulation="I5" postsynapticPopulation="M2R" synapse="Acetylcholine">
      <connection id="39" preCellId="../I5/0/I5" postCellId="../M2R/0/M2R" preSegmentId="6" postSegmentId="7" preFractionAlong="0.37549862202072015" postFractionAlong="0.49775656360689635"/>
    </projection>
    <projection id="NCXLS_I5_I1R" presynapticPopulation="I5" postsynapticPopulation="I1R" synapse="Acetylcholine">
      <connection id="40" preCellId="../I5/0/I5" postCellId="../I1R/0/I1R" preSegmentId="8" postSegmentId="9" preFractionAlong="0.5199981240369218" postFractionAlong="0.7879409206729001"/>
    </projection>
    <projection id="NCXLS_M3L_M2R" presynapticPopulation="M3L" postsynapticPopulation="M2R" synapse="Acetylcholine">
      <connection id="41" preCellId="../M3L/0/M3L" postCellId="../M2R/0/M2R" preSegmentId="6" postSegmentId="2" preFractionAlong="0.49022197465374084" postFractionAlong="0.35828946362388225"/>
    </projection>
    <projection id="NCXLS_M3L_MCL" presynapticPopulation="M3L" postsynapticPopulation="MCL" synapse="Acetylcholine">
      <connection id="42" preCellId="../M3L/0/M3L" postCellId="../MCL/0/MCL" preSegmentId="2" postSegmentId="4" preFractionAlong="0.49350918266059995" postFractionAlong="0.2053681846899853"/>
    </projection>
    <projection id="NCXLS_M3L_I2R" presynapticPopulation="M3L" postsynapticPopulation="I2R" synapse="Acetylcholine">
      <connection id="43" preCellId="../M3L/0/M3L" postCellId="../I2R/0/I2R" preSegmentId="8" postSegmentId="1" preFractionAlong="0.4675438496937657" postFractionAlong="0.4042200438932162"/>
    </projection>
    <projection id="NCXLS_M3L_I1L" presynapticPopulation="M3L" postsynapticPopulation="I1L" synapse="Acetylcholine">
      <connection id="44" preCellId="../M3L/0/M3L" postCellId="../I1L/0/I1L" preSegmentId="7" postSegmentId="1" preFractionAlong="0.8502673943359241" postFractionAlong="0.7063687718503076"/>
    </projection>
    <projection id="NCXLS_M3L_M5" presynapticPopulation="M3L" postsynapticPopulation="M5" synapse="Acetylcholine">
      <connection id="45" preCellId="../M3L/0/M3L" postCellId="../M5/0/M5" preSegmentId="6" postSegmentId="9" preFractionAlong="0.9214336290244534" postFractionAlong="0.42307552279648286"/>
    </projection>
    <projection id="NCXLS_M3L_I5" presynapticPopulation="M3L" postsynapticPopulation="I5" synapse="Acetylcholine">
      <connection id="46" preCellId="../M3L/0/M3L" postCellId="../I5/0/I5" preSegmentId="3" postSegmentId="9" preFractionAlong="0.7416030197372087" postFractionAlong="0.3864433509308174"/>
    </projection>
    <projection id="NCXLS_M3L_M3R" presynapticPopulation="M3L" postsynapticPopulation="M3R" synapse="Acetylcholine">
      <connection id="47" preCellId="../M3L/0/M3L" postCellId="../M3R/0/M3R" preSegmentId="3" postSegmentId="3" preFractionAlong="0.5953557225103119" postFractionAlong="0.872204528998895"/>
    </projection>
    <projection id="NCXLS_M3L_I1R" presynapticPopulation="M3L" postsynapticPopulation="I1R" synapse="Acetylcholine">
      <connection id="48" preCellId="../M3L/0/M3L" postCellId="../I1R/0/I1R" preSegmentId="4" postSegmentId="8" preFractionAlong="0.1582407418152627" postFractionAlong="0.6953542507318696"/>
    </projection>
    <projection id="NCXLS_M3L_I2L" presynapticPopulation="M3L" postsynapticPopulation="I2L" synapse="Acetylcholine">
      <connection id="49" preCellId="../M3L/0/M3L" postCellId="../I2L/0/I2L" preSegmentId="2" postSegmentId="7" preFractionAlong="0.27555667012122875" postFractionAlong="0.8008094946768325"/>
    </projection>
    <projection id="NCXLS_M3L_MCR" presynapticPopulation="M3L" postsynapticPopulation="MCR" synapse="Acetylcholine">
      <connection id="50" preCellId="../M3L/0/M3L" postCellId="../MCR/0/MCR" preSegmentId="6" postSegmentId="3" preFractionAlong="0.8030562178911789" postFractionAlong="0.7916950992017466"/>
    </projection>
    <projection id="NCXLS_M3R_MCL" presynapticPopulation="M3R" postsynapticPopulation="MCL" synapse="Acetylcholine">
      <connection id="51" preCellId="../M3R/0/M3R" postCellId="../MCL/0/MCL" preSegmentId="8" postSegmentId="1" preFractionAlong="0.6679244735960846" postFractionAlong="0.09346793690444355"/>
    </projection>
    <projection id="NCXLS_M3R_I6" presynapticPopulation="M3R" postsynapticPopulation="I6" synapse="Acetylcholine">
      <connection id="52" preCellId="../M3R/0/M3R" postCellId="../I6/0/I6" preSegmentId="7" postSegmentId="6" preFractionAlong="0.1622355481405775" postFractionAlong="0.4163494987964317"/>
    </projection>
    <projection id="NCXLS_M3R_NSML" presynapticPopulation="M3R" postsynapticPopulation="NSML" synapse="Acetylcholine">
      <connection id="53" preCellId="../M3R/0/M3R" postCellId="../NSML/0/NSML" preSegmentId="3" postSegmentId="1" preFractionAlong="0.9871678396302044" postFractionAlong="0.3179598316596177"/>
    </projection>
    <projection id="NCXLS_M3R_I3" presynapticPopulation="M3R" postsynapticPopulation="I3" synapse="Acetylcholine">
      <connection id="54" preCellId="../M3R/0/M3R" postCellId="../I3/0/I3" preSegmentId="5" postSegmentId="7" preFractionAlong="0.5112980243704885" postFractionAlong="0.954401509831066"/>
    </projection>
    <projection id="NCXLS_M3R_M1" presynapticPopulation="M3R" postsynapticPopulation="M1" synapse="Glutamate">
      <connection id="55" preCellId="../M3R/0/M3R" postCellId="../M1/0/M1" preSegmentId="5" postSegmentId="8" preFractionAlong="0.5626887557907294" postFractionAlong="0.9449474208215045"/>
    </projection>
    <projection id="NCXLS_M3R_I4" presynapticPopulation="M3R" postsynapticPopulation="I4" synapse="Acetylcholine">
      <connection id="56" preCellId="../M3R/0/M3R" postCellId="../I4/0/I4" preSegmentId="7" postSegmentId="3" preFractionAlong="0.8172592689875229" postFractionAlong="0.5602414637830525"/>
    </projection>
    <projection id="NCXLS_M3R_M4" presynapticPopulation="M3R" postsynapticPopulation="M4" synapse="Acetylcholine">
      <connection id="57" preCellId="../M3R/0/M3R" postCellId="../M4/0/M4" preSegmentId="4" postSegmentId="3" preFractionAlong="0.03925305307099991" postFractionAlong="0.3054442265484817"/>
    </projection>
    <projection id="NCXLS_M3R_MCR" presynapticPopulation="M3R" postsynapticPopulation="MCR" synapse="Acetylcholine">
      <connection id="58" preCellId="../M3R/0/M3R" postCellId="../MCR/0/MCR" preSegmentId="1" postSegmentId="6" preFractionAlong="0.7826515628228766" postFractionAlong="0.4553184100619284"/>
    </projection>
    <electricalProjection id="NCXLS_M1_M2R_GJ" presynapticPopulation="M1" postsynapticPopulation="M2R">
      <electricalConnection id="59" preCell="0" postCell="0" synapse="Generic_GJ" preSegment="3" postSegment="6" preFractionAlong="0.3981494935229065" postFractionAlong="0.5799678202031429"/>
    </electricalProjection>
    <projection id="NCXLS_M1_MCL" presynapticPopulation="M1" postsynapticPopulation="MCL" synapse="Acetylcholine">
      <connection id="60" preCellId="../M1/0/M1" postCellId="../MCL/0/MCL" preSegmentId="7" postSegmentId="4" preFractionAlong="0.3289197782107244" postFractionAlong="0.5083116942766945"/>
    </projection>
    <electricalProjection id="NCXLS_M1_M2L_GJ" presynapticPopulation="M1" postsynapticPopulation="M2L">
      <electricalConnection id="61" preCell="0" postCell="0" synapse="Generic_GJ" preSegment="1" postSegment="4" preFractionAlong="0.3130253547015813" postFractionAlong="0.819868147527005"/>
    </electricalProjection>
    <projection id="NCXLS_M1_I2R" presynapticPopulation="M1" postsynapticPopulation="I2R" synapse="Acetylcholine">
      <connection id="62" preCellId="../M1/0/M1" postCellId="../I2R/0/I2R" preSegmentId="3" postSegmentId="2" preFractionAlong="0.4126699440035412" postFractionAlong="0.2564440174631881"/>
    </projection>
    <projection id="NCXLS_M1_MI" presynapticPopulation="M1" postsynapticPopulation="MI" synapse="Acetylcholine">
      <connection id="63" preCellId="../M1/0/M1" postCellId="../MI/0/MI" preSegmentId="1" postSegmentId="8" preFractionAlong="0.9672132068082684" postFractionAlong="0.4386553813503745"/>
    </projection>
    <projection id="NCXLS_M1_NSML" presynapticPopulation="M1" postsynapticPopulation="NSML" synapse="Acetylcholine">
      <connection id="64" preCellId="../M1/0/M1" postCellId="../NSML/0/NSML" preSegmentId="2" postSegmentId="5" preFractionAlong="0.20691618734611694" postFractionAlong="0.9002348574321095"/>
    </projection>
    <projection id="NCXLS_M1_I1L" presynapticPopulation="M1" postsynapticPopulation="I1L" synapse="Acetylcholine">
      <connection id="65" preCellId="../M1/0/M1" postCellId="../I1L/0/I1L" preSegmentId="4" postSegmentId="4" preFractionAlong="0.11450619646898141" postFractionAlong="0.40084523565347896"/>
    </projection>
    <electricalProjection id="NCXLS_M1_M5_GJ" presynapticPopulation="M1" postsynapticPopulation="M5">
      <electricalConnection id="66" preCell="0" postCell="0" synapse="Generic_GJ" preSegment="1" postSegment="7" preFractionAlong="0.21500476827002857" postFractionAlong="0.7156355505577624"/>
    </electricalProjection>
    <projection id="NCXLS_M1_I5" presynapticPopulation="M1" postsynapticPopulation="I5" synapse="Acetylcholine">
      <connection id="67" preCellId="../M1/0/M1" postCellId="../I5/0/I5" preSegmentId="6" postSegmentId="1" preFractionAlong="0.8650625299843604" postFractionAlong="0.49997726496241857"/>
    </projection>
    <electricalProjection id="NCXLS_M1_M3L_GJ" presynapticPopulation="M1" postsynapticPopulation="M3L">
      <electricalConnection id="68" preCell="0" postCell="0" synapse="Generic_GJ" preSegment="2" postSegment="6" preFractionAlong="0.8596655476664752" postFractionAlong="0.25775521562810966"/>
    </electricalProjection>
    <projection id="NCXLS_M1_M3R" presynapticPopulation="M1" postsynapticPopulation="M3R" synapse="Glutamate">
      <connection id="69" preCellId="../M1/0/M1" postCellId="../M3R/0/M3R" preSegmentId="8" postSegmentId="2" preFractionAlong="0.49885102374427426" postFractionAlong="0.21508522878509284"/>
    </projection>
    <projection id="NCXLS_M1_NSMR" presynapticPopulation="M1" postsynapticPopulation="NSMR" synapse="Acetylcholine">
      <connection id="70" preCellId="../M1/0/M1" postCellId="../NSMR/0/NSMR" preSegmentId="4" postSegmentId="7" preFractionAlong="0.16970523915524494" postFractionAlong="0.7184601783231668"/>
    </projection>
    <projection id="NCXLS_M1_I1R" presynapticPopulation="M1" postsynapticPopulation="I1R" synapse="Acetylcholine">
      <connection id="71" preCellId="../M1/0/M1" postCellId="../I1R/0/I1R" preSegmentId="2" postSegmentId="5" preFractionAlong="0.2606334547570014" postFractionAlong="0.1629165930016191"/>
    </projection>
    <projection id="NCXLS_M1_I2L" presynapticPopulation="M1" postsynapticPopulation="I2L" synapse="Acetylcholine">
      <connection id="72" preCellId="../M1/0/M1" postCellId="../I2L/0/I2L" preSegmentId="8" postSegmentId="8" preFractionAlong="0.2044834611958235" postFractionAlong="0.18616503574607024"/>
    </projection>
    <projection id="NCXLS_M4_I6" presynapticPopulation="M4" postsynapticPopulation="I6" synapse="Acetylcholine">
      <connection id="73" preCellId="../M4/0/M4" postCellId="../I6/0/I6" preSegmentId="4" postSegmentId="3" preFractionAlong="0.8420242180649508" postFractionAlong="0.31357513206403076"/>
    </projection>
    <projection id="NCXLS_M4_I3" presynapticPopulation="M4" postsynapticPopulation="I3" synapse="Acetylcholine">
      <connection id="74" preCellId="../M4/0/M4" postCellId="../I3/0/I3" preSegmentId="5" postSegmentId="6" preFractionAlong="0.4285646126017921" postFractionAlong="0.7265857658264533"/>
    </projection>
    <projection id="NCXLS_M4_I4" presynapticPopulation="M4" postsynapticPopulation="I4" synapse="Acetylcholine">
      <connection id="75" preCellId="../M4/0/M4" postCellId="../I4/0/I4" preSegmentId="5" postSegmentId="9" preFractionAlong="0.31177764680502196" postFractionAlong="0.6378221792594102"/>
    </projection>
    <projection id="NCXLS_M4_MCR" presynapticPopulation="M4" postsynapticPopulation="MCR" synapse="Acetylcholine">
      <connection id="76" preCellId="../M4/0/M4" postCellId="../MCR/0/MCR" preSegmentId="8" postSegmentId="6" preFractionAlong="0.03297694368259341" postFractionAlong="0.8518879824703832"/>
    </projection>
    <electricalProjection id="NCXLS_I2L_I1L_GJ" presynapticPopulation="I2L" postsynapticPopulation="I1L">
      <electricalConnection id="77" preCell="0" postCell="0" synapse="Generic_GJ" preSegment="9" postSegment="5" preFractionAlong="0.26536973312034395" postFractionAlong="0.687962840118709"/>
    </electricalProjection>
    <projection id="NCXLS_MCR_I3" presynapticPopulation="MCR" postsynapticPopulation="I3" synapse="Acetylcholine">
      <connection id="78" preCellId="../MCR/0/MCR" postCellId="../I3/0/I3" preSegmentId="6" postSegmentId="9" preFractionAlong="0.9327791246877345" postFractionAlong="0.3451798382956305"/>
    </projection>
    <projection id="NCXLS_MCR_I4" presynapticPopulation="MCR" postsynapticPopulation="I4" synapse="Acetylcholine">
      <connection id="79" preCellId="../MCR/0/MCR" postCellId="../I4/0/I4" preSegmentId="4" postSegmentId="2" preFractionAlong="0.4918568713931474" postFractionAlong="0.7684677956641338"/>
    </projection>
  </network>
</neuroml>
