<?xml version='1.0' encoding='UTF-8'?>
<neuroml xmlns="http://www.neuroml.org/schema/neuroml2" xmlns:xsi="http://www.w3.org/2001/XMLSchema-instance" xsi:schemaLocation="http://www.neuroml.org/schema/neuroml2 https://raw.githubusercontent.com/NeuroML/NeuroML2/development/Schemas/NeuroML2/NeuroML_v2beta4.xsd" id="gvft_network_bio_prior_lamW_0.144_DF_0.037_t80.net">
  <notes>NeuroML2 network generated from GVFT simulation on 2025-05-04 00:14:38
</notes>
  <include href="M3R.cell.nml"/>
  <include href="M1.cell.nml"/>
  <include href="I2L.cell.nml"/>
  <include href="MCL.cell.nml"/>
  <include href="I6.cell.nml"/>
  <include href="I5.cell.nml"/>
  <include href="M4.cell.nml"/>
  <include href="I1R.cell.nml"/>
  <include href="MCR.cell.nml"/>
  <include href="I3.cell.nml"/>
  <include href="M3L.cell.nml"/>
  <include href="NSML.cell.nml"/>
  <include href="M2L.cell.nml"/>
  <include href="M5.cell.nml"/>
  <include href="I4.cell.nml"/>
  <include href="MI.cell.nml"/>
  <include href="NSMR.cell.nml"/>
  <include href="I2R.cell.nml"/>
  <include href="M2R.cell.nml"/>
  <include href="I1L.cell.nml"/>
  <include href="Serotonin_Glutamate.synapse.nml"/>
  <include href="Acetylcholine.synapse.nml"/>
  <include href="Generic_GJ.synapse.nml"/>
  <include href="Glutamate.synapse.nml"/>
  <network id="gvft_network_bio_prior_lamW_0.144_DF_0.037_t80.net" type="networkWithTemperature" temperature="20.0 degC">
    <population id="M1" component="M1" type="populationList" size="1">
      <instance id="0">
        <location x="0.055276394" y="-0.7788945" z="0.0"/>
      </instance>
    </population>
    <population id="M2L" component="M2L" type="populationList" size="1">
      <instance id="0">
        <location x="-0.8894472" y="-0.6281407" z="0.0"/>
      </instance>
    </population>
    <population id="M2R" component="M2R" type="populationList" size="1">
      <instance id="0">
        <location x="0.7386935" y="-0.33668342" z="0.0"/>
      </instance>
    </population>
    <population id="M3L" component="M3L" type="populationList" size="1">
      <instance id="0">
        <location x="0.43718594" y="-0.16582915" z="0.0"/>
      </instance>
    </population>
    <population id="M3R" component="M3R" type="populationList" size="1">
      <instance id="0">
        <location x="-0.76884425" y="-0.72864324" z="0.0"/>
      </instance>
    </population>
    <population id="M4" component="M4" type="populationList" size="1">
      <instance id="0">
        <location x="0.0050251363" y="-0.12562814" z="0.0"/>
      </instance>
    </population>
    <population id="M5" component="M5" type="populationList" size="1">
      <instance id="0">
        <location x="-0.025125638" y="0.26633167" z="0.0"/>
      </instance>
    </population>
    <population id="I1L" component="I1L" type="populationList" size="1">
      <instance id="0">
        <location x="-0.7889447" y="0.59799" z="0.0"/>
      </instance>
    </population>
    <population id="I1R" component="I1R" type="populationList" size="1">
      <instance id="0">
        <location x="0.26633167" y="0.9396985" z="0.0"/>
      </instance>
    </population>
    <population id="I2L" component="I2L" type="populationList" size="1">
      <instance id="0">
        <location x="-0.65829146" y="-0.75879395" z="0.0"/>
      </instance>
    </population>
    <population id="I2R" component="I2R" type="populationList" size="1">
      <instance id="0">
        <location x="-0.5276382" y="0.9798995" z="0.0"/>
      </instance>
    </population>
    <population id="I3" component="I3" type="populationList" size="1">
      <instance id="0">
        <location x="-0.8492462" y="-0.41708544" z="0.0"/>
      </instance>
    </population>
    <population id="I4" component="I4" type="populationList" size="1">
      <instance id="0">
        <location x="-1.0" y="-0.6482412" z="0.0"/>
      </instance>
    </population>
    <population id="I5" component="I5" type="populationList" size="1">
      <instance id="0">
        <location x="0.9798995" y="0.6080402" z="0.0"/>
      </instance>
    </population>
    <population id="I6" component="I6" type="populationList" size="1">
      <instance id="0">
        <location x="0.69849247" y="-0.065326646" z="0.0"/>
      </instance>
    </population>
    <population id="MCL" component="MCL" type="populationList" size="1">
      <instance id="0">
        <location x="-0.6281407" y="0.16582915" z="0.0"/>
      </instance>
    </population>
    <population id="MCR" component="MCR" type="populationList" size="1">
      <instance id="0">
        <location x="0.8592965" y="0.638191" z="0.0"/>
      </instance>
    </population>
    <population id="MI" component="MI" type="populationList" size="1">
      <instance id="0">
        <location x="-0.12562814" y="0.40703517" z="0.0"/>
      </instance>
    </population>
    <population id="NSML" component="NSML" type="populationList" size="1">
      <instance id="0">
        <location x="0.72864324" y="-0.4874372" z="0.0"/>
      </instance>
    </population>
    <population id="NSMR" component="NSMR" type="populationList" size="1">
      <instance id="0">
        <location x="-0.8291457" y="-0.7889447" z="0.0"/>
      </instance>
    </population>
    <electricalProjection id="NCXLS_I5_I1R_GJ" presynapticPopulation="I5" postsynapticPopulation="I1R">
      <electricalConnection id="0" preCell="0" postCell="0" synapse="Generic_GJ" preSegment="3" postSegment="6" preFractionAlong="0.968691450213043" postFractionAlong="0.08384571800448104"/>
    </electricalProjection>
    <projection id="NCXLS_M2R_I2L" presynapticPopulation="M2R" postsynapticPopulation="I2L" synapse="Acetylcholine">
      <connection id="1" preCellId="../M2R/0/M2R" postCellId="../I2L/0/I2L" preSegmentId="2" postSegmentId="8" preFractionAlong="0.8314166219303112" postFractionAlong="0.2745723155510216"/>
    </projection>
    <electricalProjection id="NCXLS_M2R_M2L_GJ" presynapticPopulation="M2R" postsynapticPopulation="M2L">
      <electricalConnection id="2" preCell="0" postCell="0" synapse="Generic_GJ" preSegment="4" postSegment="3" preFractionAlong="0.26670343063721424" postFractionAlong="0.9669850180280375"/>
    </electricalProjection>
    <electricalProjection id="NCXLS_M2R_M3L_GJ" presynapticPopulation="M2R" postsynapticPopulation="M3L">
      <electricalConnection id="3" preCell="0" postCell="0" synapse="Generic_GJ" preSegment="4" postSegment="5" preFractionAlong="0.0992288960826766" postFractionAlong="0.8390491680793574"/>
    </electricalProjection>
    <projection id="NCXLS_M2R_I1L" presynapticPopulation="M2R" postsynapticPopulation="I1L" synapse="Acetylcholine">
      <connection id="4" preCellId="../M2R/0/M2R" postCellId="../I1L/0/I1L" preSegmentId="2" postSegmentId="2" preFractionAlong="0.3224452901848539" postFractionAlong="0.9261426332629309"/>
    </projection>
    <projection id="NCXLS_M2R_M1" presynapticPopulation="M2R" postsynapticPopulation="M1" synapse="Acetylcholine">
      <connection id="5" preCellId="../M2R/0/M2R" postCellId="../M1/0/M1" preSegmentId="2" postSegmentId="9" preFractionAlong="0.011765094366997686" postFractionAlong="0.5878856919297817"/>
    </projection>
    <projection id="NCXLS_M2R_I3" presynapticPopulation="M2R" postsynapticPopulation="I3" synapse="Acetylcholine">
      <connection id="6" preCellId="../M2R/0/M2R" postCellId="../I3/0/I3" preSegmentId="6" postSegmentId="7" preFractionAlong="0.08400171452062566" postFractionAlong="0.6815260298866503"/>
    </projection>
    <projection id="NCXLS_M2R_NSML" presynapticPopulation="M2R" postsynapticPopulation="NSML" synapse="Acetylcholine">
      <connection id="7" preCellId="../M2R/0/M2R" postCellId="../NSML/0/NSML" preSegmentId="7" postSegmentId="1" preFractionAlong="0.7134573604340441" postFractionAlong="0.9262081744006837"/>
    </projection>
    <projection id="NCXLS_M2R_M4" presynapticPopulation="M2R" postsynapticPopulation="M4" synapse="Acetylcholine">
      <connection id="8" preCellId="../M2R/0/M2R" postCellId="../M4/0/M4" preSegmentId="4" postSegmentId="3" preFractionAlong="0.9543693622282359" postFractionAlong="0.9213229670968134"/>
    </projection>
    <projection id="NCXLS_M2R_NSMR" presynapticPopulation="M2R" postsynapticPopulation="NSMR" synapse="Acetylcholine">
      <connection id="9" preCellId="../M2R/0/M2R" postCellId="../NSMR/0/NSMR" preSegmentId="3" postSegmentId="5" preFractionAlong="0.7190333387898875" postFractionAlong="0.49677011312716357"/>
    </projection>
    <projection id="NCXLS_M2R_I4" presynapticPopulation="M2R" postsynapticPopulation="I4" synapse="Acetylcholine">
      <connection id="10" preCellId="../M2R/0/M2R" postCellId="../I4/0/I4" preSegmentId="4" postSegmentId="1" preFractionAlong="0.8301829666176939" postFractionAlong="0.36046302914925554"/>
    </projection>
    <projection id="NCXLS_M2R_M3R" presynapticPopulation="M2R" postsynapticPopulation="M3R" synapse="Acetylcholine">
      <connection id="11" preCellId="../M2R/0/M2R" postCellId="../M3R/0/M3R" preSegmentId="7" postSegmentId="1" preFractionAlong="0.7488274636039874" postFractionAlong="0.6672132917419075"/>
    </projection>
    <projection id="NCXLS_M2R_MCL" presynapticPopulation="M2R" postsynapticPopulation="MCL" synapse="Acetylcholine">
      <connection id="12" preCellId="../M2R/0/M2R" postCellId="../MCL/0/MCL" preSegmentId="1" postSegmentId="9" preFractionAlong="0.7132190050771051" postFractionAlong="0.1640307314593894"/>
    </projection>
    <projection id="NCXLS_M2L_I1R" presynapticPopulation="M2L" postsynapticPopulation="I1R" synapse="Acetylcholine">
      <connection id="13" preCellId="../M2L/0/M2L" postCellId="../I1R/0/I1R" preSegmentId="4" postSegmentId="6" preFractionAlong="0.05933823080638989" postFractionAlong="0.6575683057846125"/>
    </projection>
    <projection id="NCXLS_M2L_I5" presynapticPopulation="M2L" postsynapticPopulation="I5" synapse="Acetylcholine">
      <connection id="14" preCellId="../M2L/0/M2L" postCellId="../I5/0/I5" preSegmentId="6" postSegmentId="2" preFractionAlong="0.820909634070616" postFractionAlong="0.7825120082058294"/>
    </projection>
    <projection id="NCXLS_M2L_M2R" presynapticPopulation="M2L" postsynapticPopulation="M2R" synapse="Glutamate">
      <connection id="15" preCellId="../M2L/0/M2L" postCellId="../M2R/0/M2R" preSegmentId="1" postSegmentId="6" preFractionAlong="0.25098648552318137" postFractionAlong="0.7384839721861057"/>
    </projection>
    <projection id="NCXLS_M2L_I2R" presynapticPopulation="M2L" postsynapticPopulation="I2R" synapse="Acetylcholine">
      <connection id="16" preCellId="../M2L/0/M2L" postCellId="../I2R/0/I2R" preSegmentId="8" postSegmentId="3" preFractionAlong="0.36798507718678664" postFractionAlong="0.07763188524979514"/>
    </projection>
    <projection id="NCXLS_M2L_I6" presynapticPopulation="M2L" postsynapticPopulation="I6" synapse="Acetylcholine">
      <connection id="17" preCellId="../M2L/0/M2L" postCellId="../I6/0/I6" preSegmentId="9" postSegmentId="2" preFractionAlong="0.04654152121906807" postFractionAlong="0.004344067784089911"/>
    </projection>
    <projection id="NCXLS_M2L_M3L" presynapticPopulation="M2L" postsynapticPopulation="M3L" synapse="Acetylcholine">
      <connection id="18" preCellId="../M2L/0/M2L" postCellId="../M3L/0/M3L" preSegmentId="2" postSegmentId="9" preFractionAlong="0.9127010103571104" postFractionAlong="0.19280279467660666"/>
    </projection>
    <projection id="NCXLS_M2L_MI" presynapticPopulation="M2L" postsynapticPopulation="MI" synapse="Acetylcholine">
      <connection id="19" preCellId="../M2L/0/M2L" postCellId="../MI/0/MI" preSegmentId="5" postSegmentId="8" preFractionAlong="0.9403118009277517" postFractionAlong="0.4271065628370424"/>
    </projection>
    <projection id="NCXLS_M2L_I1L" presynapticPopulation="M2L" postsynapticPopulation="I1L" synapse="Acetylcholine">
      <connection id="20" preCellId="../M2L/0/M2L" postCellId="../I1L/0/I1L" preSegmentId="8" postSegmentId="5" preFractionAlong="0.705595789776492" postFractionAlong="0.1908094914463071"/>
    </projection>
    <projection id="NCXLS_M2L_MCR" presynapticPopulation="M2L" postsynapticPopulation="MCR" synapse="Acetylcholine">
      <connection id="21" preCellId="../M2L/0/M2L" postCellId="../MCR/0/MCR" preSegmentId="6" postSegmentId="5" preFractionAlong="0.2532453630402508" postFractionAlong="0.9556213797813561"/>
    </projection>
    <projection id="NCXLS_M2L_I3" presynapticPopulation="M2L" postsynapticPopulation="I3" synapse="Acetylcholine">
      <connection id="22" preCellId="../M2L/0/M2L" postCellId="../I3/0/I3" preSegmentId="1" postSegmentId="6" preFractionAlong="0.19972828011123656" postFractionAlong="0.24231060638744772"/>
    </projection>
    <projection id="NCXLS_M2L_NSML" presynapticPopulation="M2L" postsynapticPopulation="NSML" synapse="Acetylcholine">
      <connection id="23" preCellId="../M2L/0/M2L" postCellId="../NSML/0/NSML" preSegmentId="1" postSegmentId="9" preFractionAlong="0.49134909026878526" postFractionAlong="0.872465523258539"/>
    </projection>
    <projection id="NCXLS_M2L_M4" presynapticPopulation="M2L" postsynapticPopulation="M4" synapse="Acetylcholine">
      <connection id="24" preCellId="../M2L/0/M2L" postCellId="../M4/0/M4" preSegmentId="8" postSegmentId="2" preFractionAlong="0.037938312935935525" postFractionAlong="0.14696040590381154"/>
    </projection>
    <projection id="NCXLS_M2L_MCL" presynapticPopulation="M2L" postsynapticPopulation="MCL" synapse="Acetylcholine">
      <connection id="25" preCellId="../M2L/0/M2L" postCellId="../MCL/0/MCL" preSegmentId="9" postSegmentId="2" preFractionAlong="0.9982774288732463" postFractionAlong="0.7805205758696064"/>
    </projection>
    <electricalProjection id="NCXLS_M2L_M5_GJ" presynapticPopulation="M2L" postsynapticPopulation="M5">
      <electricalConnection id="26" preCell="0" postCell="0" synapse="Generic_GJ" preSegment="7" postSegment="6" preFractionAlong="0.7395034549060827" postFractionAlong="0.9685135568831981"/>
    </electricalProjection>
    <projection id="NCXLS_M3L_I2L" presynapticPopulation="M3L" postsynapticPopulation="I2L" synapse="Acetylcholine">
      <connection id="27" preCellId="../M3L/0/M3L" postCellId="../I2L/0/I2L" preSegmentId="9" postSegmentId="4" preFractionAlong="0.9050781277944812" postFractionAlong="0.4346076538672534"/>
    </projection>
    <projection id="NCXLS_M3L_M2L" presynapticPopulation="M3L" postsynapticPopulation="M2L" synapse="Acetylcholine">
      <connection id="28" preCellId="../M3L/0/M3L" postCellId="../M2L/0/M2L" preSegmentId="8" postSegmentId="8" preFractionAlong="0.5209913886493571" postFractionAlong="0.48759843804956093"/>
    </projection>
    <projection id="NCXLS_M3L_MI" presynapticPopulation="M3L" postsynapticPopulation="MI" synapse="Acetylcholine">
      <connection id="29" preCellId="../M3L/0/M3L" postCellId="../MI/0/MI" preSegmentId="4" postSegmentId="1" preFractionAlong="0.6892297363629519" postFractionAlong="0.10688337508703138"/>
    </projection>
    <projection id="NCXLS_M3L_I1L" presynapticPopulation="M3L" postsynapticPopulation="I1L" synapse="Acetylcholine">
      <connection id="30" preCellId="../M3L/0/M3L" postCellId="../I1L/0/I1L" preSegmentId="8" postSegmentId="9" preFractionAlong="0.43550502745325925" postFractionAlong="0.07234850989748554"/>
    </projection>
    <projection id="NCXLS_M3L_M1" presynapticPopulation="M3L" postsynapticPopulation="M1" synapse="Glutamate">
      <connection id="31" preCellId="../M3L/0/M3L" postCellId="../M1/0/M1" preSegmentId="6" postSegmentId="6" preFractionAlong="0.3769499716862721" postFractionAlong="0.10036749509505394"/>
    </projection>
    <projection id="NCXLS_M3L_I3" presynapticPopulation="M3L" postsynapticPopulation="I3" synapse="Acetylcholine">
      <connection id="32" preCellId="../M3L/0/M3L" postCellId="../I3/0/I3" preSegmentId="4" postSegmentId="7" preFractionAlong="0.8801313534336417" postFractionAlong="0.8877535094139863"/>
    </projection>
    <projection id="NCXLS_M3L_M4" presynapticPopulation="M3L" postsynapticPopulation="M4" synapse="Glutamate">
      <connection id="33" preCellId="../M3L/0/M3L" postCellId="../M4/0/M4" preSegmentId="7" postSegmentId="3" preFractionAlong="0.867705459766688" postFractionAlong="0.002140919345475223"/>
    </projection>
    <projection id="NCXLS_M3L_NSMR" presynapticPopulation="M3L" postsynapticPopulation="NSMR" synapse="Acetylcholine">
      <connection id="34" preCellId="../M3L/0/M3L" postCellId="../NSMR/0/NSMR" preSegmentId="6" postSegmentId="9" preFractionAlong="0.34617507730612906" postFractionAlong="0.33828559220990906"/>
    </projection>
    <projection id="NCXLS_M3L_I4" presynapticPopulation="M3L" postsynapticPopulation="I4" synapse="Acetylcholine">
      <connection id="35" preCellId="../M3L/0/M3L" postCellId="../I4/0/I4" preSegmentId="5" postSegmentId="1" preFractionAlong="0.5549316443743433" postFractionAlong="0.1829239984213129"/>
    </projection>
    <projection id="NCXLS_M3L_M3R" presynapticPopulation="M3L" postsynapticPopulation="M3R" synapse="Acetylcholine">
      <connection id="36" preCellId="../M3L/0/M3L" postCellId="../M3R/0/M3R" preSegmentId="3" postSegmentId="3" preFractionAlong="0.17839825192858105" postFractionAlong="0.513069422863438"/>
    </projection>
    <projection id="NCXLS_M3L_MCL" presynapticPopulation="M3L" postsynapticPopulation="MCL" synapse="Acetylcholine">
      <connection id="37" preCellId="../M3L/0/M3L" postCellId="../MCL/0/MCL" preSegmentId="3" postSegmentId="2" preFractionAlong="0.788581765108471" postFractionAlong="0.7080237839979118"/>
    </projection>
    <electricalProjection id="NCXLS_M3L_M5_GJ" presynapticPopulation="M3L" postsynapticPopulation="M5">
      <electricalConnection id="38" preCell="0" postCell="0" synapse="Generic_GJ" preSegment="6" postSegment="9" preFractionAlong="0.34643284897091586" postFractionAlong="0.019248963848893963"/>
    </electricalProjection>
    <projection id="NCXLS_MI_I1R" presynapticPopulation="MI" postsynapticPopulation="I1R" synapse="Glutamate">
      <connection id="39" preCellId="../MI/0/MI" postCellId="../I1R/0/I1R" preSegmentId="5" postSegmentId="5" preFractionAlong="0.3095419918620881" postFractionAlong="0.5691069803628038"/>
    </projection>
    <projection id="NCXLS_MI_I2R" presynapticPopulation="MI" postsynapticPopulation="I2R" synapse="Acetylcholine">
      <connection id="40" preCellId="../MI/0/MI" postCellId="../I2R/0/I2R" preSegmentId="7" postSegmentId="5" preFractionAlong="0.49714046375220133" postFractionAlong="0.8093428287387023"/>
    </projection>
    <projection id="NCXLS_MI_I1L" presynapticPopulation="MI" postsynapticPopulation="I1L" synapse="Acetylcholine">
      <connection id="41" preCellId="../MI/0/MI" postCellId="../I1L/0/I1L" preSegmentId="5" postSegmentId="8" preFractionAlong="0.948977344119596" postFractionAlong="0.8475006203763417"/>
    </projection>
    <projection id="NCXLS_MCR_I1R" presynapticPopulation="MCR" postsynapticPopulation="I1R" synapse="Acetylcholine">
      <connection id="42" preCellId="../MCR/0/MCR" postCellId="../I1R/0/I1R" preSegmentId="3" postSegmentId="9" preFractionAlong="0.39996212458393776" postFractionAlong="0.42332672702252716"/>
    </projection>
    <projection id="NCXLS_MCR_I2R" presynapticPopulation="MCR" postsynapticPopulation="I2R" synapse="Acetylcholine">
      <connection id="43" preCellId="../MCR/0/MCR" postCellId="../I2R/0/I2R" preSegmentId="8" postSegmentId="8" preFractionAlong="0.17178910947776682" postFractionAlong="0.27871371514114895"/>
    </projection>
    <projection id="NCXLS_MCR_I1L" presynapticPopulation="MCR" postsynapticPopulation="I1L" synapse="Acetylcholine">
      <connection id="44" preCellId="../MCR/0/MCR" postCellId="../I1L/0/I1L" preSegmentId="8" postSegmentId="3" preFractionAlong="0.19566629562534243" postFractionAlong="0.9729773804203049"/>
    </projection>
    <projection id="NCXLS_M1_I1R" presynapticPopulation="M1" postsynapticPopulation="I1R" synapse="Acetylcholine">
      <connection id="45" preCellId="../M1/0/M1" postCellId="../I1R/0/I1R" preSegmentId="2" postSegmentId="7" preFractionAlong="0.5678409605517213" postFractionAlong="0.041970503406067006"/>
    </projection>
    <projection id="NCXLS_M1_I5" presynapticPopulation="M1" postsynapticPopulation="I5" synapse="Acetylcholine">
      <connection id="46" preCellId="../M1/0/M1" postCellId="../I5/0/I5" preSegmentId="8" postSegmentId="9" preFractionAlong="0.7937174257852123" postFractionAlong="0.785202867912825"/>
    </projection>
    <electricalProjection id="NCXLS_M1_M2R_GJ" presynapticPopulation="M1" postsynapticPopulation="M2R">
      <electricalConnection id="47" preCell="0" postCell="0" synapse="Generic_GJ" preSegment="1" postSegment="4" preFractionAlong="0.2952606300859739" postFractionAlong="0.1935433732395726"/>
    </electricalProjection>
    <projection id="NCXLS_M1_I2L" presynapticPopulation="M1" postsynapticPopulation="I2L" synapse="Acetylcholine">
      <connection id="48" preCellId="../M1/0/M1" postCellId="../I2L/0/I2L" preSegmentId="2" postSegmentId="7" preFractionAlong="0.4182640809025757" postFractionAlong="0.559301872076827"/>
    </projection>
    <projection id="NCXLS_M1_M2L" presynapticPopulation="M1" postsynapticPopulation="M2L" synapse="Glutamate">
      <connection id="49" preCellId="../M1/0/M1" postCellId="../M2L/0/M2L" preSegmentId="3" postSegmentId="7" preFractionAlong="0.4482265821082245" postFractionAlong="0.60102587748869"/>
    </projection>
    <projection id="NCXLS_M1_I2R" presynapticPopulation="M1" postsynapticPopulation="I2R" synapse="Acetylcholine">
      <connection id="50" preCellId="../M1/0/M1" postCellId="../I2R/0/I2R" preSegmentId="5" postSegmentId="9" preFractionAlong="0.2929057467017291" postFractionAlong="0.34611098709411514"/>
    </projection>
    <projection id="NCXLS_M1_I6" presynapticPopulation="M1" postsynapticPopulation="I6" synapse="Acetylcholine">
      <connection id="51" preCellId="../M1/0/M1" postCellId="../I6/0/I6" preSegmentId="7" postSegmentId="2" preFractionAlong="0.3763884964416109" postFractionAlong="0.2966208618339182"/>
    </projection>
    <electricalProjection id="NCXLS_M1_M3L_GJ" presynapticPopulation="M1" postsynapticPopulation="M3L">
      <electricalConnection id="52" preCell="0" postCell="0" synapse="Generic_GJ" preSegment="9" postSegment="2" preFractionAlong="0.65996627780191" postFractionAlong="0.7334602720078249"/>
    </electricalProjection>
    <projection id="NCXLS_M1_MI" presynapticPopulation="M1" postsynapticPopulation="MI" synapse="Acetylcholine">
      <connection id="53" preCellId="../M1/0/M1" postCellId="../MI/0/MI" preSegmentId="7" postSegmentId="4" preFractionAlong="0.34442804621718826" postFractionAlong="0.6937412986983286"/>
    </projection>
    <projection id="NCXLS_M1_I1L" presynapticPopulation="M1" postsynapticPopulation="I1L" synapse="Acetylcholine">
      <connection id="54" preCellId="../M1/0/M1" postCellId="../I1L/0/I1L" preSegmentId="6" postSegmentId="6" preFractionAlong="0.9728566047103429" postFractionAlong="0.26665619213250447"/>
    </projection>
    <projection id="NCXLS_M1_MCR" presynapticPopulation="M1" postsynapticPopulation="MCR" synapse="Acetylcholine">
      <connection id="55" preCellId="../M1/0/M1" postCellId="../MCR/0/MCR" preSegmentId="7" postSegmentId="9" preFractionAlong="0.6770819719511081" postFractionAlong="0.47598169034922033"/>
    </projection>
    <projection id="NCXLS_M1_I3" presynapticPopulation="M1" postsynapticPopulation="I3" synapse="Acetylcholine">
      <connection id="56" preCellId="../M1/0/M1" postCellId="../I3/0/I3" preSegmentId="9" postSegmentId="6" preFractionAlong="0.7289021357907499" postFractionAlong="0.9524913004343245"/>
    </projection>
    <projection id="NCXLS_M1_M4" presynapticPopulation="M1" postsynapticPopulation="M4" synapse="Acetylcholine">
      <connection id="57" preCellId="../M1/0/M1" postCellId="../M4/0/M4" preSegmentId="7" postSegmentId="9" preFractionAlong="0.327250307905817" postFractionAlong="0.2897376005288893"/>
    </projection>
    <projection id="NCXLS_M1_NSMR" presynapticPopulation="M1" postsynapticPopulation="NSMR" synapse="Acetylcholine">
      <connection id="58" preCellId="../M1/0/M1" postCellId="../NSMR/0/NSMR" preSegmentId="6" postSegmentId="6" preFractionAlong="0.020236232639950447" postFractionAlong="0.5239931674646672"/>
    </projection>
    <projection id="NCXLS_M1_I4" presynapticPopulation="M1" postsynapticPopulation="I4" synapse="Acetylcholine">
      <connection id="59" preCellId="../M1/0/M1" postCellId="../I4/0/I4" preSegmentId="5" postSegmentId="5" preFractionAlong="0.9740312249720638" postFractionAlong="0.9114540034548393"/>
    </projection>
    <electricalProjection id="NCXLS_M1_M3R_GJ" presynapticPopulation="M1" postsynapticPopulation="M3R">
      <electricalConnection id="60" preCell="0" postCell="0" synapse="Generic_GJ" preSegment="6" postSegment="3" preFractionAlong="0.3688825215558892" postFractionAlong="0.4239561794632619"/>
    </electricalProjection>
    <projection id="NCXLS_M1_MCL" presynapticPopulation="M1" postsynapticPopulation="MCL" synapse="Acetylcholine">
      <connection id="61" preCellId="../M1/0/M1" postCellId="../MCL/0/MCL" preSegmentId="1" postSegmentId="7" preFractionAlong="0.05208790692715093" postFractionAlong="0.43604158291295025"/>
    </projection>
    <projection id="NCXLS_M1_M5" presynapticPopulation="M1" postsynapticPopulation="M5" synapse="Acetylcholine">
      <connection id="62" preCellId="../M1/0/M1" postCellId="../M5/0/M5" preSegmentId="8" postSegmentId="9" preFractionAlong="0.1322115228202997" postFractionAlong="0.7139145840836343"/>
    </projection>
    <projection id="NCXLS_M4_I1R" presynapticPopulation="M4" postsynapticPopulation="I1R" synapse="Acetylcholine">
      <connection id="63" preCellId="../M4/0/M4" postCellId="../I1R/0/I1R" preSegmentId="1" postSegmentId="6" preFractionAlong="0.050018820902186345" postFractionAlong="0.48724956034545097"/>
    </projection>
    <projection id="NCXLS_M4_I5" presynapticPopulation="M4" postsynapticPopulation="I5" synapse="Acetylcholine">
      <connection id="64" preCellId="../M4/0/M4" postCellId="../I5/0/I5" preSegmentId="4" postSegmentId="9" preFractionAlong="0.2515130396764008" postFractionAlong="0.6946717295969576"/>
    </projection>
    <projection id="NCXLS_M4_I2R" presynapticPopulation="M4" postsynapticPopulation="I2R" synapse="Acetylcholine">
      <connection id="65" preCellId="../M4/0/M4" postCellId="../I2R/0/I2R" preSegmentId="7" postSegmentId="5" preFractionAlong="0.049447436679347256" postFractionAlong="0.848752700565235"/>
    </projection>
    <projection id="NCXLS_M4_MI" presynapticPopulation="M4" postsynapticPopulation="MI" synapse="Acetylcholine">
      <connection id="66" preCellId="../M4/0/M4" postCellId="../MI/0/MI" preSegmentId="8" postSegmentId="2" preFractionAlong="0.2464779095767362" postFractionAlong="0.009005664264475244"/>
    </projection>
    <projection id="NCXLS_M4_I1L" presynapticPopulation="M4" postsynapticPopulation="I1L" synapse="Acetylcholine">
      <connection id="67" preCellId="../M4/0/M4" postCellId="../I1L/0/I1L" preSegmentId="4" postSegmentId="5" preFractionAlong="0.7109296367478833" postFractionAlong="0.3038071257363676"/>
    </projection>
    <projection id="NCXLS_M4_MCR" presynapticPopulation="M4" postsynapticPopulation="MCR" synapse="Acetylcholine">
      <connection id="68" preCellId="../M4/0/M4" postCellId="../MCR/0/MCR" preSegmentId="2" postSegmentId="6" preFractionAlong="0.2980416983469145" postFractionAlong="0.035064949018718705"/>
    </projection>
    <projection id="NCXLS_M4_MCL" presynapticPopulation="M4" postsynapticPopulation="MCL" synapse="Acetylcholine">
      <connection id="69" preCellId="../M4/0/M4" postCellId="../MCL/0/MCL" preSegmentId="1" postSegmentId="4" preFractionAlong="0.026347332193917605" postFractionAlong="0.7391246671365462"/>
    </projection>
    <projection id="NCXLS_M4_M5" presynapticPopulation="M4" postsynapticPopulation="M5" synapse="Acetylcholine">
      <connection id="70" preCellId="../M4/0/M4" postCellId="../M5/0/M5" preSegmentId="7" postSegmentId="9" preFractionAlong="0.43173282384284917" postFractionAlong="0.45299810082996383"/>
    </projection>
    <projection id="NCXLS_NSMR_M2L" presynapticPopulation="NSMR" postsynapticPopulation="M2L" synapse="Serotonin_Glutamate">
      <connection id="71" preCellId="../NSMR/0/NSMR" postCellId="../M2L/0/M2L" preSegmentId="7" postSegmentId="5" preFractionAlong="0.7130314563751039" postFractionAlong="0.27350286582970706"/>
    </projection>
    <projection id="NCXLS_NSMR_I4" presynapticPopulation="NSMR" postsynapticPopulation="I4" synapse="Serotonin_Glutamate">
      <connection id="72" preCellId="../NSMR/0/NSMR" postCellId="../I4/0/I4" preSegmentId="7" postSegmentId="9" preFractionAlong="0.5560573351914615" postFractionAlong="0.32697762324273927"/>
    </projection>
    <projection id="NCXLS_M3R_I5" presynapticPopulation="M3R" postsynapticPopulation="I5" synapse="Acetylcholine">
      <connection id="73" preCellId="../M3R/0/M3R" postCellId="../I5/0/I5" preSegmentId="9" postSegmentId="7" preFractionAlong="0.33011179785524114" postFractionAlong="0.3222974734029085"/>
    </projection>
    <projection id="NCXLS_M3R_M2R" presynapticPopulation="M3R" postsynapticPopulation="M2R" synapse="Glutamate">
      <connection id="74" preCellId="../M3R/0/M3R" postCellId="../M2R/0/M2R" preSegmentId="9" postSegmentId="6" preFractionAlong="0.7397963719360992" postFractionAlong="0.70593661771162"/>
    </projection>
    <projection id="NCXLS_M3R_I2L" presynapticPopulation="M3R" postsynapticPopulation="I2L" synapse="Acetylcholine">
      <connection id="75" preCellId="../M3R/0/M3R" postCellId="../I2L/0/I2L" preSegmentId="8" postSegmentId="6" preFractionAlong="0.9921264713522762" postFractionAlong="0.08961372399532264"/>
    </projection>
    <projection id="NCXLS_M3R_I6" presynapticPopulation="M3R" postsynapticPopulation="I6" synapse="Acetylcholine">
      <connection id="76" preCellId="../M3R/0/M3R" postCellId="../I6/0/I6" preSegmentId="5" postSegmentId="2" preFractionAlong="0.8647558956038492" postFractionAlong="0.44545868837093394"/>
    </projection>
    <projection id="NCXLS_M3R_M3L" presynapticPopulation="M3R" postsynapticPopulation="M3L" synapse="Glutamate">
      <connection id="77" preCellId="../M3R/0/M3R" postCellId="../M3L/0/M3L" preSegmentId="5" postSegmentId="5" preFractionAlong="0.04312778821882868" postFractionAlong="0.5739504229932586"/>
    </projection>
    <projection id="NCXLS_M3R_MCR" presynapticPopulation="M3R" postsynapticPopulation="MCR" synapse="Acetylcholine">
      <connection id="78" preCellId="../M3R/0/M3R" postCellId="../MCR/0/MCR" preSegmentId="8" postSegmentId="2" preFractionAlong="0.054134408402320755" postFractionAlong="0.596856860784491"/>
    </projection>
    <projection id="NCXLS_M3R_M1" presynapticPopulation="M3R" postsynapticPopulation="M1" synapse="Acetylcholine">
      <connection id="79" preCellId="../M3R/0/M3R" postCellId="../M1/0/M1" preSegmentId="5" postSegmentId="1" preFractionAlong="0.0031742981845032103" postFractionAlong="0.9595725876290657"/>
    </projection>
    <projection id="NCXLS_M3R_NSML" presynapticPopulation="M3R" postsynapticPopulation="NSML" synapse="Acetylcholine">
      <connection id="80" preCellId="../M3R/0/M3R" postCellId="../NSML/0/NSML" preSegmentId="7" postSegmentId="5" preFractionAlong="0.8195179187100712" postFractionAlong="0.8253015623427146"/>
    </projection>
    <electricalProjection id="NCXLS_M3R_M4_GJ" presynapticPopulation="M3R" postsynapticPopulation="M4">
      <electricalConnection id="81" preCell="0" postCell="0" synapse="Generic_GJ" preSegment="4" postSegment="1" preFractionAlong="0.7672783010536482" postFractionAlong="0.9053731882624274"/>
    </electricalProjection>
    <projection id="NCXLS_M3R_M5" presynapticPopulation="M3R" postsynapticPopulation="M5" synapse="Acetylcholine">
      <connection id="82" preCellId="../M3R/0/M3R" postCellId="../M5/0/M5" preSegmentId="3" postSegmentId="5" preFractionAlong="0.8654294050826861" postFractionAlong="0.29650157102393904"/>
    </projection>
    <projection id="NCXLS_MCL_I2L" presynapticPopulation="MCL" postsynapticPopulation="I2L" synapse="Acetylcholine">
      <connection id="83" preCellId="../MCL/0/MCL" postCellId="../I2L/0/I2L" preSegmentId="7" postSegmentId="4" preFractionAlong="0.4679853661039419" postFractionAlong="0.12729253309507838"/>
    </projection>
    <projection id="NCXLS_MCL_M2L" presynapticPopulation="MCL" postsynapticPopulation="M2L" synapse="Acetylcholine">
      <connection id="84" preCellId="../MCL/0/MCL" postCellId="../M2L/0/M2L" preSegmentId="7" postSegmentId="4" preFractionAlong="0.5098899482056102" postFractionAlong="0.10482264094076554"/>
    </projection>
    <projection id="NCXLS_MCL_I3" presynapticPopulation="MCL" postsynapticPopulation="I3" synapse="Acetylcholine">
      <connection id="85" preCellId="../MCL/0/MCL" postCellId="../I3/0/I3" preSegmentId="2" postSegmentId="1" preFractionAlong="0.30976458318518707" postFractionAlong="0.971297460306592"/>
    </projection>
    <projection id="NCXLS_MCL_NSMR" presynapticPopulation="MCL" postsynapticPopulation="NSMR" synapse="Acetylcholine">
      <connection id="86" preCellId="../MCL/0/MCL" postCellId="../NSMR/0/NSMR" preSegmentId="4" postSegmentId="8" preFractionAlong="0.9582511722325032" postFractionAlong="0.09101180688251698"/>
    </projection>
    <projection id="NCXLS_MCL_I4" presynapticPopulation="MCL" postsynapticPopulation="I4" synapse="Acetylcholine">
      <connection id="87" preCellId="../MCL/0/MCL" postCellId="../I4/0/I4" preSegmentId="6" postSegmentId="6" preFractionAlong="0.04657994208654159" postFractionAlong="0.7051131466389949"/>
    </projection>
    <projection id="NCXLS_MCL_M3R" presynapticPopulation="MCL" postsynapticPopulation="M3R" synapse="Acetylcholine">
      <connection id="88" preCellId="../MCL/0/MCL" postCellId="../M3R/0/M3R" preSegmentId="9" postSegmentId="6" preFractionAlong="0.5902990717555996" postFractionAlong="0.6300071354465232"/>
    </projection>
    <projection id="NCXLS_M5_I1R" presynapticPopulation="M5" postsynapticPopulation="I1R" synapse="Acetylcholine">
      <connection id="89" preCellId="../M5/0/M5" postCellId="../I1R/0/I1R" preSegmentId="6" postSegmentId="2" preFractionAlong="0.3542657213276258" postFractionAlong="0.9059519191946444"/>
    </projection>
    <projection id="NCXLS_M5_I5" presynapticPopulation="M5" postsynapticPopulation="I5" synapse="Acetylcholine">
      <connection id="90" preCellId="../M5/0/M5" postCellId="../I5/0/I5" preSegmentId="8" postSegmentId="6" preFractionAlong="0.8237242861369873" postFractionAlong="0.40983847810959406"/>
    </projection>
    <electricalProjection id="NCXLS_M5_M2R_GJ" presynapticPopulation="M5" postsynapticPopulation="M2R">
      <electricalConnection id="91" preCell="0" postCell="0" synapse="Generic_GJ" preSegment="7" postSegment="8" preFractionAlong="0.47228096432880107" postFractionAlong="0.5538360825022206"/>
    </electricalProjection>
    <projection id="NCXLS_M5_I6" presynapticPopulation="M5" postsynapticPopulation="I6" synapse="Acetylcholine">
      <connection id="92" preCellId="../M5/0/M5" postCellId="../I6/0/I6" preSegmentId="5" postSegmentId="1" preFractionAlong="0.3210215262744667" postFractionAlong="0.22495004387703388"/>
    </projection>
    <projection id="NCXLS_M5_M3L" presynapticPopulation="M5" postsynapticPopulation="M3L" synapse="Acetylcholine">
      <connection id="93" preCellId="../M5/0/M5" postCellId="../M3L/0/M3L" preSegmentId="7" postSegmentId="6" preFractionAlong="0.5630942778724928" postFractionAlong="0.5936876193370206"/>
    </projection>
    <projection id="NCXLS_M5_MCR" presynapticPopulation="M5" postsynapticPopulation="MCR" synapse="Acetylcholine">
      <connection id="94" preCellId="../M5/0/M5" postCellId="../MCR/0/MCR" preSegmentId="9" postSegmentId="9" preFractionAlong="0.8597287835022325" postFractionAlong="0.700188259294053"/>
    </projection>
    <projection id="NCXLS_M5_NSML" presynapticPopulation="M5" postsynapticPopulation="NSML" synapse="Acetylcholine">
      <connection id="95" preCellId="../M5/0/M5" postCellId="../NSML/0/NSML" preSegmentId="4" postSegmentId="4" preFractionAlong="0.09106618208218098" postFractionAlong="0.4739197609111919"/>
    </projection>
  </network>
</neuroml>
