<?xml version='1.0' encoding='UTF-8'?>
<neuroml xmlns="http://www.neuroml.org/schema/neuroml2" xmlns:xsi="http://www.w3.org/2001/XMLSchema-instance" xsi:schemaLocation="http://www.neuroml.org/schema/neuroml2 https://raw.githubusercontent.com/NeuroML/NeuroML2/development/Schemas/NeuroML2/NeuroML_v2beta4.xsd" id="gvft_network_bio_prior_lamW_0_189_DF_0_013_t10_net">
  <notes>NeuroML2 network generated from GVFT simulation on 2025-05-04 15:58:21
</notes>
  <include href="AVAL.cell.nml"/>
  <include href="AVAR.cell.nml"/>
  <include href="AVKL.cell.nml"/>
  <include href="AVKR.cell.nml"/>
  <include href="RIS.cell.nml"/>
  <include href="RMDDL.cell.nml"/>
  <include href="RMDDR.cell.nml"/>
  <include href="RMDVL.cell.nml"/>
  <include href="RMDVR.cell.nml"/>
  <include href="SMBVL.cell.nml"/>
  <include href="SMBVR.cell.nml"/>
  <include href="URXL.cell.nml"/>
  <include href="URXR.cell.nml"/>
  <include href="I2R.cell.nml"/>
  <include href="M4.cell.nml"/>
  <include href="NSMR.cell.nml"/>
  <include href="M2L.cell.nml"/>
  <include href="M3L.cell.nml"/>
  <include href="M2R.cell.nml"/>
  <include href="NSML.cell.nml"/>
  <include href="I6.cell.nml"/>
  <include href="MCL.cell.nml"/>
  <include href="MCR.cell.nml"/>
  <include href="I5.cell.nml"/>
  <include href="I1R.cell.nml"/>
  <include href="I1L.cell.nml"/>
  <include href="I2L.cell.nml"/>
  <include href="MI.cell.nml"/>
  <include href="M3R.cell.nml"/>
  <include href="I3.cell.nml"/>
  <include href="I4.cell.nml"/>
  <include href="M1.cell.nml"/>
  <include href="M5.cell.nml"/>
  <include href="Serotonin_Glutamate.synapse.nml"/>
  <include href="Acetylcholine.synapse.nml"/>
  <include href="Generic_GJ.nml"/>
  <include href="Glutamate.synapse.nml"/>
  <network id="gvft_network_bio_prior_lamW_0_189_DF_0_013_t10_net" type="networkWithTemperature" temperature="20.0 degC">
    <population id="M1" component="M1" type="populationList" size="1">
      <instance id="0">
        <location x="-0.959799" y="-0.7487437" z="0.0"/>
      </instance>
    </population>
    <population id="M2L" component="M2L" type="populationList" size="1">
      <instance id="0">
        <location x="0.0753769" y="0.03517589" z="0.0"/>
      </instance>
    </population>
    <population id="M2R" component="M2R" type="populationList" size="1">
      <instance id="0">
        <location x="-0.61809045" y="0.67839193" z="0.0"/>
      </instance>
    </population>
    <population id="M3L" component="M3L" type="populationList" size="1">
      <instance id="0">
        <location x="0.2763819" y="0.23618092" z="0.0"/>
      </instance>
    </population>
    <population id="M3R" component="M3R" type="populationList" size="1">
      <instance id="0">
        <location x="-0.7487437" y="0.14572865" z="0.0"/>
      </instance>
    </population>
    <population id="M4" component="M4" type="populationList" size="1">
      <instance id="0">
        <location x="0.46733668" y="-0.7085427" z="0.0"/>
      </instance>
    </population>
    <population id="M5" component="M5" type="populationList" size="1">
      <instance id="0">
        <location x="-0.8492462" y="-0.0050251363" z="0.0"/>
      </instance>
    </population>
    <population id="I1L" component="I1L" type="populationList" size="1">
      <instance id="0">
        <location x="0.9798995" y="0.26633167" z="0.0"/>
      </instance>
    </population>
    <population id="I1R" component="I1R" type="populationList" size="1">
      <instance id="0">
        <location x="-0.9698492" y="0.51758796" z="0.0"/>
      </instance>
    </population>
    <population id="I2L" component="I2L" type="populationList" size="1">
      <instance id="0">
        <location x="0.9296482" y="-0.19597991" z="0.0"/>
      </instance>
    </population>
    <population id="I2R" component="I2R" type="populationList" size="1">
      <instance id="0">
        <location x="0.7085427" y="0.39698493" z="0.0"/>
      </instance>
    </population>
    <population id="I3" component="I3" type="populationList" size="1">
      <instance id="0">
        <location x="-0.065326646" y="0.9798995" z="0.0"/>
      </instance>
    </population>
    <population id="I4" component="I4" type="populationList" size="1">
      <instance id="0">
        <location x="0.7085427" y="-0.49748746" z="0.0"/>
      </instance>
    </population>
    <population id="I5" component="I5" type="populationList" size="1">
      <instance id="0">
        <location x="0.46733668" y="0.72864324" z="0.0"/>
      </instance>
    </population>
    <population id="I6" component="I6" type="populationList" size="1">
      <instance id="0">
        <location x="0.57788944" y="-0.6281407" z="0.0"/>
      </instance>
    </population>
    <population id="MCL" component="MCL" type="populationList" size="1">
      <instance id="0">
        <location x="-0.43718594" y="0.8190955" z="0.0"/>
      </instance>
    </population>
    <population id="MCR" component="MCR" type="populationList" size="1">
      <instance id="0">
        <location x="-0.3467337" y="0.5678392" z="0.0"/>
      </instance>
    </population>
    <population id="MI" component="MI" type="populationList" size="1">
      <instance id="0">
        <location x="-0.10552765" y="0.75879395" z="0.0"/>
      </instance>
    </population>
    <population id="NSML" component="NSML" type="populationList" size="1">
      <instance id="0">
        <location x="-0.3467337" y="0.7889447" z="0.0"/>
      </instance>
    </population>
    <population id="NSMR" component="NSMR" type="populationList" size="1">
      <instance id="0">
        <location x="-0.959799" y="-0.015075387" z="0.0"/>
      </instance>
    </population>
    <population id="AVAL" component="AVAL" type="populationList" size="1">
      <instance id="0">
        <location x="5.0" y="0.0" z="0.0"/>
      </instance>
    </population>
    <population id="AVAR" component="AVAR" type="populationList" size="1">
      <instance id="0">
        <location x="5.0" y="0.0" z="0.0"/>
      </instance>
    </population>
    <population id="AVKL" component="AVKL" type="populationList" size="1">
      <instance id="0">
        <location x="5.0" y="0.0" z="0.0"/>
      </instance>
    </population>
    <population id="AVKR" component="AVKR" type="populationList" size="1">
      <instance id="0">
        <location x="5.0" y="0.0" z="0.0"/>
      </instance>
    </population>
    <population id="RIS" component="RIS" type="populationList" size="1">
      <instance id="0">
        <location x="5.0" y="0.0" z="0.0"/>
      </instance>
    </population>
    <population id="RMDDL" component="RMDDL" type="populationList" size="1">
      <instance id="0">
        <location x="5.0" y="0.0" z="0.0"/>
      </instance>
    </population>
    <population id="RMDDR" component="RMDDR" type="populationList" size="1">
      <instance id="0">
        <location x="5.0" y="0.0" z="0.0"/>
      </instance>
    </population>
    <population id="RMDVL" component="RMDVL" type="populationList" size="1">
      <instance id="0">
        <location x="5.0" y="0.0" z="0.0"/>
      </instance>
    </population>
    <population id="RMDVR" component="RMDVR" type="populationList" size="1">
      <instance id="0">
        <location x="5.0" y="0.0" z="0.0"/>
      </instance>
    </population>
    <population id="SMBVL" component="SMBVL" type="populationList" size="1">
      <instance id="0">
        <location x="5.0" y="0.0" z="0.0"/>
      </instance>
    </population>
    <population id="SMBVR" component="SMBVR" type="populationList" size="1">
      <instance id="0">
        <location x="5.0" y="0.0" z="0.0"/>
      </instance>
    </population>
    <population id="URXL" component="URXL" type="populationList" size="1">
      <instance id="0">
        <location x="5.0" y="0.0" z="0.0"/>
      </instance>
    </population>
    <population id="URXR" component="URXR" type="populationList" size="1">
      <instance id="0">
        <location x="5.0" y="0.0" z="0.0"/>
      </instance>
    </population>
    <projection id="NCXLS_I1R_MCL" presynapticPopulation="I1R" postsynapticPopulation="MCL" synapse="Acetylcholine">
      <connection id="0" preCellId="../I1R/0/I1R" postCellId="../MCL/0/MCL" preSegmentId="5" postSegmentId="2" preFractionAlong="0.6842330265121569" postFractionAlong="0.4401524937396013"/>
    </projection>
    <projection id="NCXLS_M1_I1R" presynapticPopulation="M1" postsynapticPopulation="I1R" synapse="Acetylcholine">
      <connection id="1" preCellId="../M1/0/M1" postCellId="../I1R/0/I1R" preSegmentId="7" postSegmentId="8" preFractionAlong="0.034388521115218396" postFractionAlong="0.9093204020787821"/>
    </projection>
    <projection id="NCXLS_M1_MCR" presynapticPopulation="M1" postsynapticPopulation="MCR" synapse="Acetylcholine">
      <connection id="2" preCellId="../M1/0/M1" postCellId="../MCR/0/MCR" preSegmentId="4" postSegmentId="2" preFractionAlong="0.662522284353982" postFractionAlong="0.31171107608941095"/>
    </projection>
    <projection id="NCXLS_M1_I2R" presynapticPopulation="M1" postsynapticPopulation="I2R" synapse="Acetylcholine">
      <connection id="3" preCellId="../M1/0/M1" postCellId="../I2R/0/I2R" preSegmentId="6" postSegmentId="6" preFractionAlong="0.5467102793432796" postFractionAlong="0.18485445552552704"/>
    </projection>
    <projection id="NCXLS_M1_I3" presynapticPopulation="M1" postsynapticPopulation="I3" synapse="Acetylcholine">
      <connection id="4" preCellId="../M1/0/M1" postCellId="../I3/0/I3" preSegmentId="2" postSegmentId="2" preFractionAlong="0.3951502360018144" postFractionAlong="0.9266588657937942"/>
    </projection>
    <projection id="NCXLS_M1_MCL" presynapticPopulation="M1" postsynapticPopulation="MCL" synapse="Acetylcholine">
      <connection id="5" preCellId="../M1/0/M1" postCellId="../MCL/0/MCL" preSegmentId="8" postSegmentId="7" preFractionAlong="0.5208342600258237" postFractionAlong="0.9611720243493491"/>
    </projection>
    <projection id="NCXLS_M1_M2L" presynapticPopulation="M1" postsynapticPopulation="M2L" synapse="Glutamate">
      <connection id="6" preCellId="../M1/0/M1" postCellId="../M2L/0/M2L" preSegmentId="5" postSegmentId="2" preFractionAlong="0.5396921323890798" postFractionAlong="0.5867511656638482"/>
    </projection>
    <projection id="NCXLS_M1_I1L" presynapticPopulation="M1" postsynapticPopulation="I1L" synapse="Acetylcholine">
      <connection id="7" preCellId="../M1/0/M1" postCellId="../I1L/0/I1L" preSegmentId="9" postSegmentId="9" preFractionAlong="0.2962735057040824" postFractionAlong="0.1652669390630025"/>
    </projection>
    <projection id="NCXLS_M1_I2L" presynapticPopulation="M1" postsynapticPopulation="I2L" synapse="Acetylcholine">
      <connection id="8" preCellId="../M1/0/M1" postCellId="../I2L/0/I2L" preSegmentId="9" postSegmentId="7" preFractionAlong="0.4234014807063696" postFractionAlong="0.3948815181755697"/>
    </projection>
    <projection id="NCXLS_M1_MI" presynapticPopulation="M1" postsynapticPopulation="MI" synapse="Acetylcholine">
      <connection id="9" preCellId="../M1/0/M1" postCellId="../MI/0/MI" preSegmentId="8" postSegmentId="8" preFractionAlong="0.014079822715084456" postFractionAlong="0.19884240408880516"/>
    </projection>
    <projection id="NCXLS_M1_M3R" presynapticPopulation="M1" postsynapticPopulation="M3R" synapse="Acetylcholine">
      <connection id="10" preCellId="../M1/0/M1" postCellId="../M3R/0/M3R" preSegmentId="8" postSegmentId="3" preFractionAlong="0.7901755405312056" postFractionAlong="0.6059599747810114"/>
    </projection>
    <projection id="NCXLS_M1_NSMR" presynapticPopulation="M1" postsynapticPopulation="NSMR" synapse="Acetylcholine">
      <connection id="11" preCellId="../M1/0/M1" postCellId="../NSMR/0/NSMR" preSegmentId="7" postSegmentId="9" preFractionAlong="0.9149596755437808" postFractionAlong="0.8500385777897993"/>
    </projection>
    <projection id="NCXLS_M1_I4" presynapticPopulation="M1" postsynapticPopulation="I4" synapse="Acetylcholine">
      <connection id="12" preCellId="../M1/0/M1" postCellId="../I4/0/I4" preSegmentId="2" postSegmentId="1" preFractionAlong="0.06355835028602363" postFractionAlong="0.3109823217156622"/>
    </projection>
    <projection id="NCXLS_M1_M3L" presynapticPopulation="M1" postsynapticPopulation="M3L" synapse="Glutamate">
      <connection id="13" preCellId="../M1/0/M1" postCellId="../M3L/0/M3L" preSegmentId="8" postSegmentId="5" preFractionAlong="0.7296061783380641" postFractionAlong="0.6375574713552131"/>
    </projection>
    <projection id="NCXLS_M1_M2R" presynapticPopulation="M1" postsynapticPopulation="M2R" synapse="Acetylcholine">
      <connection id="14" preCellId="../M1/0/M1" postCellId="../M2R/0/M2R" preSegmentId="3" postSegmentId="1" preFractionAlong="0.38292687475378984" postFractionAlong="0.9717120953891037"/>
    </projection>
    <projection id="NCXLS_M1_NSML" presynapticPopulation="M1" postsynapticPopulation="NSML" synapse="Acetylcholine">
      <connection id="15" preCellId="../M1/0/M1" postCellId="../NSML/0/NSML" preSegmentId="3" postSegmentId="1" preFractionAlong="0.7217295211648732" postFractionAlong="0.23598491974895575"/>
    </projection>
    <projection id="NCXLS_M1_M5" presynapticPopulation="M1" postsynapticPopulation="M5" synapse="Glutamate">
      <connection id="16" preCellId="../M1/0/M1" postCellId="../M5/0/M5" preSegmentId="7" postSegmentId="9" preFractionAlong="0.7106628896857874" postFractionAlong="0.11089082081183133"/>
    </projection>
    <projection id="NCXLS_M1_I6" presynapticPopulation="M1" postsynapticPopulation="I6" synapse="Acetylcholine">
      <connection id="17" preCellId="../M1/0/M1" postCellId="../I6/0/I6" preSegmentId="3" postSegmentId="7" preFractionAlong="0.47537022318211175" postFractionAlong="0.5632755719763837"/>
    </projection>
    <projection id="NCXLS_M1_I5" presynapticPopulation="M1" postsynapticPopulation="I5" synapse="Acetylcholine">
      <connection id="18" preCellId="../M1/0/M1" postCellId="../I5/0/I5" preSegmentId="4" postSegmentId="5" preFractionAlong="0.24929222914887494" postFractionAlong="0.41038292303562973"/>
    </projection>
    <projection id="NCXLS_MCL_I1R" presynapticPopulation="MCL" postsynapticPopulation="I1R" synapse="Acetylcholine">
      <connection id="19" preCellId="../MCL/0/MCL" postCellId="../I1R/0/I1R" preSegmentId="4" postSegmentId="7" preFractionAlong="0.289751452913768" postFractionAlong="0.16122128725400442"/>
    </projection>
    <projection id="NCXLS_MCL_M2R" presynapticPopulation="MCL" postsynapticPopulation="M2R" synapse="Acetylcholine">
      <connection id="20" preCellId="../MCL/0/MCL" postCellId="../M2R/0/M2R" preSegmentId="2" postSegmentId="9" preFractionAlong="0.10549425983027061" postFractionAlong="0.45653457048291024"/>
    </projection>
    <projection id="NCXLS_M2L_MCR" presynapticPopulation="M2L" postsynapticPopulation="MCR" synapse="Acetylcholine">
      <connection id="21" preCellId="../M2L/0/M2L" postCellId="../MCR/0/MCR" preSegmentId="4" postSegmentId="7" preFractionAlong="0.8960912999234932" postFractionAlong="0.3180034749718639"/>
    </projection>
    <projection id="NCXLS_M2L_I2R" presynapticPopulation="M2L" postsynapticPopulation="I2R" synapse="Acetylcholine">
      <connection id="22" preCellId="../M2L/0/M2L" postCellId="../I2R/0/I2R" preSegmentId="1" postSegmentId="1" preFractionAlong="0.22793516254194168" postFractionAlong="0.4271077886262563"/>
    </projection>
    <projection id="NCXLS_M2L_I3" presynapticPopulation="M2L" postsynapticPopulation="I3" synapse="Acetylcholine">
      <connection id="23" preCellId="../M2L/0/M2L" postCellId="../I3/0/I3" preSegmentId="4" postSegmentId="9" preFractionAlong="0.30478125815802903" postFractionAlong="0.16465585314294173"/>
    </projection>
    <projection id="NCXLS_M2L_MCL" presynapticPopulation="M2L" postsynapticPopulation="MCL" synapse="Acetylcholine">
      <connection id="24" preCellId="../M2L/0/M2L" postCellId="../MCL/0/MCL" preSegmentId="9" postSegmentId="5" preFractionAlong="0.6924360328902703" postFractionAlong="0.2694123337985215"/>
    </projection>
    <projection id="NCXLS_M2L_I1L" presynapticPopulation="M2L" postsynapticPopulation="I1L" synapse="Acetylcholine">
      <connection id="25" preCellId="../M2L/0/M2L" postCellId="../I1L/0/I1L" preSegmentId="8" postSegmentId="6" preFractionAlong="0.21876421957307024" postFractionAlong="0.5581020020173412"/>
    </projection>
    <projection id="NCXLS_M2L_I2L" presynapticPopulation="M2L" postsynapticPopulation="I2L" synapse="Acetylcholine">
      <connection id="26" preCellId="../M2L/0/M2L" postCellId="../I2L/0/I2L" preSegmentId="4" postSegmentId="1" preFractionAlong="0.06489224710898156" postFractionAlong="0.2539154139343447"/>
    </projection>
    <projection id="NCXLS_M2L_MI" presynapticPopulation="M2L" postsynapticPopulation="MI" synapse="Acetylcholine">
      <connection id="27" preCellId="../M2L/0/M2L" postCellId="../MI/0/MI" preSegmentId="7" postSegmentId="2" preFractionAlong="0.712270589924442" postFractionAlong="0.1480869299533999"/>
    </projection>
    <projection id="NCXLS_M2L_M3L" presynapticPopulation="M2L" postsynapticPopulation="M3L" synapse="Glutamate">
      <connection id="28" preCellId="../M2L/0/M2L" postCellId="../M3L/0/M3L" preSegmentId="8" postSegmentId="1" preFractionAlong="0.266781014275285" postFractionAlong="0.9766149558326529"/>
    </projection>
    <projection id="NCXLS_M2L_NSML" presynapticPopulation="M2L" postsynapticPopulation="NSML" synapse="Acetylcholine">
      <connection id="29" preCellId="../M2L/0/M2L" postCellId="../NSML/0/NSML" preSegmentId="6" postSegmentId="7" preFractionAlong="0.27864646423661144" postFractionAlong="0.9082658859666537"/>
    </projection>
    <projection id="NCXLS_M2L_I5" presynapticPopulation="M2L" postsynapticPopulation="I5" synapse="Acetylcholine">
      <connection id="30" preCellId="../M2L/0/M2L" postCellId="../I5/0/I5" preSegmentId="3" postSegmentId="2" preFractionAlong="0.5309345833171364" postFractionAlong="0.44778316457309164"/>
    </projection>
    <projection id="NCXLS_I1L_I5" presynapticPopulation="I1L" postsynapticPopulation="I5" synapse="Acetylcholine">
      <connection id="31" preCellId="../I1L/0/I1L" postCellId="../I5/0/I5" preSegmentId="6" postSegmentId="7" preFractionAlong="0.6721355474058786" postFractionAlong="0.7616196153287176"/>
    </projection>
    <projection id="NCXLS_MI_I3" presynapticPopulation="MI" postsynapticPopulation="I3" synapse="Acetylcholine">
      <connection id="32" preCellId="../MI/0/MI" postCellId="../I3/0/I3" preSegmentId="1" postSegmentId="6" preFractionAlong="0.3677831327192532" postFractionAlong="0.6323058305935795"/>
    </projection>
    <projection id="NCXLS_MI_NSML" presynapticPopulation="MI" postsynapticPopulation="NSML" synapse="Acetylcholine">
      <connection id="33" preCellId="../MI/0/MI" postCellId="../NSML/0/NSML" preSegmentId="6" postSegmentId="6" preFractionAlong="0.5357746840747585" postFractionAlong="0.0902897700544083"/>
    </projection>
    <projection id="NCXLS_M3R_I1R" presynapticPopulation="M3R" postsynapticPopulation="I1R" synapse="Acetylcholine">
      <connection id="34" preCellId="../M3R/0/M3R" postCellId="../I1R/0/I1R" preSegmentId="1" postSegmentId="9" preFractionAlong="0.32078006497173583" postFractionAlong="0.18651851039985423"/>
    </projection>
    <projection id="NCXLS_M3R_MCL" presynapticPopulation="M3R" postsynapticPopulation="MCL" synapse="Acetylcholine">
      <connection id="35" preCellId="../M3R/0/M3R" postCellId="../MCL/0/MCL" preSegmentId="3" postSegmentId="4" preFractionAlong="0.32595890520188475" postFractionAlong="0.2202410475655483"/>
    </projection>
    <projection id="NCXLS_M3R_NSMR" presynapticPopulation="M3R" postsynapticPopulation="NSMR" synapse="Acetylcholine">
      <connection id="36" preCellId="../M3R/0/M3R" postCellId="../NSMR/0/NSMR" preSegmentId="3" postSegmentId="3" preFractionAlong="0.3486659872917294" postFractionAlong="0.09617655109142076"/>
    </projection>
    <projection id="NCXLS_M3R_M2R" presynapticPopulation="M3R" postsynapticPopulation="M2R" synapse="Acetylcholine">
      <connection id="37" preCellId="../M3R/0/M3R" postCellId="../M2R/0/M2R" preSegmentId="9" postSegmentId="1" preFractionAlong="0.3975720210875223" postFractionAlong="0.5177513505274801"/>
    </projection>
    <projection id="NCXLS_M3R_M5" presynapticPopulation="M3R" postsynapticPopulation="M5" synapse="Glutamate">
      <connection id="38" preCellId="../M3R/0/M3R" postCellId="../M5/0/M5" preSegmentId="8" postSegmentId="1" preFractionAlong="0.6756901170392807" postFractionAlong="0.7352161192407721"/>
    </projection>
    <projection id="NCXLS_M4_I1L" presynapticPopulation="M4" postsynapticPopulation="I1L" synapse="Acetylcholine">
      <connection id="39" preCellId="../M4/0/M4" postCellId="../I1L/0/I1L" preSegmentId="2" postSegmentId="7" preFractionAlong="0.5414479738275658" postFractionAlong="0.6957843993450822"/>
    </projection>
    <projection id="NCXLS_M4_I2L" presynapticPopulation="M4" postsynapticPopulation="I2L" synapse="Acetylcholine">
      <connection id="40" preCellId="../M4/0/M4" postCellId="../I2L/0/I2L" preSegmentId="7" postSegmentId="9" preFractionAlong="0.5166358912710143" postFractionAlong="0.260829174830409"/>
    </projection>
    <projection id="NCXLS_M4_I4" presynapticPopulation="M4" postsynapticPopulation="I4" synapse="Acetylcholine">
      <connection id="41" preCellId="../M4/0/M4" postCellId="../I4/0/I4" preSegmentId="1" postSegmentId="5" preFractionAlong="0.9004180571633305" postFractionAlong="0.6331014572732679"/>
    </projection>
    <projection id="NCXLS_M4_I6" presynapticPopulation="M4" postsynapticPopulation="I6" synapse="Acetylcholine">
      <connection id="42" preCellId="../M4/0/M4" postCellId="../I6/0/I6" preSegmentId="9" postSegmentId="9" preFractionAlong="0.3492095746126609" postFractionAlong="0.7259556788702394"/>
    </projection>
    <projection id="NCXLS_NSMR_I1R" presynapticPopulation="NSMR" postsynapticPopulation="I1R" synapse="Serotonin_Glutamate">
      <connection id="43" preCellId="../NSMR/0/NSMR" postCellId="../I1R/0/I1R" preSegmentId="3" postSegmentId="4" preFractionAlong="0.8870864242651173" postFractionAlong="0.7798755458576239"/>
    </projection>
    <projection id="NCXLS_M3L_I2R" presynapticPopulation="M3L" postsynapticPopulation="I2R" synapse="Acetylcholine">
      <connection id="44" preCellId="../M3L/0/M3L" postCellId="../I2R/0/I2R" preSegmentId="8" postSegmentId="4" preFractionAlong="0.08413996499504883" postFractionAlong="0.16162871409461377"/>
    </projection>
    <projection id="NCXLS_M3L_I1L" presynapticPopulation="M3L" postsynapticPopulation="I1L" synapse="Acetylcholine">
      <connection id="45" preCellId="../M3L/0/M3L" postCellId="../I1L/0/I1L" preSegmentId="6" postSegmentId="8" preFractionAlong="0.6064290596595899" postFractionAlong="0.009197051616629648"/>
    </projection>
    <projection id="NCXLS_M3L_I2L" presynapticPopulation="M3L" postsynapticPopulation="I2L" synapse="Acetylcholine">
      <connection id="46" preCellId="../M3L/0/M3L" postCellId="../I2L/0/I2L" preSegmentId="9" postSegmentId="3" preFractionAlong="0.9736638367553173" postFractionAlong="0.2839209747374657"/>
    </projection>
    <projection id="NCXLS_M3L_I4" presynapticPopulation="M3L" postsynapticPopulation="I4" synapse="Acetylcholine">
      <connection id="47" preCellId="../M3L/0/M3L" postCellId="../I4/0/I4" preSegmentId="2" postSegmentId="2" preFractionAlong="0.6918951976926933" postFractionAlong="0.6519612595026005"/>
    </projection>
    <projection id="NCXLS_M3L_I6" presynapticPopulation="M3L" postsynapticPopulation="I6" synapse="Acetylcholine">
      <connection id="48" preCellId="../M3L/0/M3L" postCellId="../I6/0/I6" preSegmentId="9" postSegmentId="4" preFractionAlong="0.7121792213475359" postFractionAlong="0.23724908749680007"/>
    </projection>
    <projection id="NCXLS_M2R_MCR" presynapticPopulation="M2R" postsynapticPopulation="MCR" synapse="Acetylcholine">
      <connection id="49" preCellId="../M2R/0/M2R" postCellId="../MCR/0/MCR" preSegmentId="5" postSegmentId="4" preFractionAlong="0.3664687845828599" postFractionAlong="0.7441705230565623"/>
    </projection>
    <projection id="NCXLS_M2R_I2R" presynapticPopulation="M2R" postsynapticPopulation="I2R" synapse="Acetylcholine">
      <connection id="50" preCellId="../M2R/0/M2R" postCellId="../I2R/0/I2R" preSegmentId="3" postSegmentId="1" preFractionAlong="0.3080607918523892" postFractionAlong="0.5425402305548993"/>
    </projection>
    <projection id="NCXLS_M2R_I3" presynapticPopulation="M2R" postsynapticPopulation="I3" synapse="Acetylcholine">
      <connection id="51" preCellId="../M2R/0/M2R" postCellId="../I3/0/I3" preSegmentId="3" postSegmentId="6" preFractionAlong="0.26520236768172545" postFractionAlong="0.24398964337908358"/>
    </projection>
    <projection id="NCXLS_M2R_MCL" presynapticPopulation="M2R" postsynapticPopulation="MCL" synapse="Acetylcholine">
      <connection id="52" preCellId="../M2R/0/M2R" postCellId="../MCL/0/MCL" preSegmentId="6" postSegmentId="6" preFractionAlong="0.3930977246667604" postFractionAlong="0.8920465551771133"/>
    </projection>
    <projection id="NCXLS_M2R_I1L" presynapticPopulation="M2R" postsynapticPopulation="I1L" synapse="Acetylcholine">
      <connection id="53" preCellId="../M2R/0/M2R" postCellId="../I1L/0/I1L" preSegmentId="2" postSegmentId="5" preFractionAlong="0.5026370931051921" postFractionAlong="0.5769038846263591"/>
    </projection>
    <projection id="NCXLS_M2R_I2L" presynapticPopulation="M2R" postsynapticPopulation="I2L" synapse="Acetylcholine">
      <connection id="54" preCellId="../M2R/0/M2R" postCellId="../I2L/0/I2L" preSegmentId="1" postSegmentId="5" preFractionAlong="0.23018526824155527" postFractionAlong="0.4991933798847523"/>
    </projection>
    <projection id="NCXLS_M2R_MI" presynapticPopulation="M2R" postsynapticPopulation="MI" synapse="Acetylcholine">
      <connection id="55" preCellId="../M2R/0/M2R" postCellId="../MI/0/MI" preSegmentId="4" postSegmentId="3" preFractionAlong="0.768554014306309" postFractionAlong="0.04360377175443375"/>
    </projection>
    <projection id="NCXLS_M2R_I4" presynapticPopulation="M2R" postsynapticPopulation="I4" synapse="Acetylcholine">
      <connection id="56" preCellId="../M2R/0/M2R" postCellId="../I4/0/I4" preSegmentId="5" postSegmentId="6" preFractionAlong="0.3701587002554444" postFractionAlong="0.015456616528867428"/>
    </projection>
    <projection id="NCXLS_M2R_M3L" presynapticPopulation="M2R" postsynapticPopulation="M3L" synapse="Glutamate">
      <connection id="57" preCellId="../M2R/0/M2R" postCellId="../M3L/0/M3L" preSegmentId="8" postSegmentId="1" preFractionAlong="0.5527649668354899" postFractionAlong="0.5722924691708383"/>
    </projection>
    <projection id="NCXLS_M2R_NSML" presynapticPopulation="M2R" postsynapticPopulation="NSML" synapse="Acetylcholine">
      <connection id="58" preCellId="../M2R/0/M2R" postCellId="../NSML/0/NSML" preSegmentId="1" postSegmentId="4" preFractionAlong="0.2944488920695857" postFractionAlong="0.38509772860192526"/>
    </projection>
    <projection id="NCXLS_M2R_I6" presynapticPopulation="M2R" postsynapticPopulation="I6" synapse="Acetylcholine">
      <connection id="59" preCellId="../M2R/0/M2R" postCellId="../I6/0/I6" preSegmentId="7" postSegmentId="1" preFractionAlong="0.31692200515627766" postFractionAlong="0.1694927466860925"/>
    </projection>
    <projection id="NCXLS_M2R_I5" presynapticPopulation="M2R" postsynapticPopulation="I5" synapse="Acetylcholine">
      <connection id="60" preCellId="../M2R/0/M2R" postCellId="../I5/0/I5" preSegmentId="9" postSegmentId="6" preFractionAlong="0.696029796674973" postFractionAlong="0.570061170089365"/>
    </projection>
    <projection id="NCXLS_NSML_I1R" presynapticPopulation="NSML" postsynapticPopulation="I1R" synapse="Serotonin_Glutamate">
      <connection id="61" preCellId="../NSML/0/NSML" postCellId="../I1R/0/I1R" preSegmentId="8" postSegmentId="2" preFractionAlong="0.6150072266991697" postFractionAlong="0.9900538501042633"/>
    </projection>
    <projection id="NCXLS_NSML_MCL" presynapticPopulation="NSML" postsynapticPopulation="MCL" synapse="Serotonin_Glutamate">
      <connection id="62" preCellId="../NSML/0/NSML" postCellId="../MCL/0/MCL" preSegmentId="2" postSegmentId="2" preFractionAlong="0.3225507642386005" postFractionAlong="0.8486697949246744"/>
    </projection>
    <projection id="NCXLS_NSML_M2R" presynapticPopulation="NSML" postsynapticPopulation="M2R" synapse="Serotonin_Glutamate">
      <connection id="63" preCellId="../NSML/0/NSML" postCellId="../M2R/0/M2R" preSegmentId="9" postSegmentId="6" preFractionAlong="0.35949115121975517" postFractionAlong="0.29359184426449336"/>
    </projection>
    <projection id="NCXLS_M5_I1R" presynapticPopulation="M5" postsynapticPopulation="I1R" synapse="Acetylcholine">
      <connection id="64" preCellId="../M5/0/M5" postCellId="../I1R/0/I1R" preSegmentId="7" postSegmentId="3" preFractionAlong="0.25620694359445806" postFractionAlong="0.6115137108656805"/>
    </projection>
    <projection id="NCXLS_M5_M1" presynapticPopulation="M5" postsynapticPopulation="M1" synapse="Acetylcholine">
      <connection id="65" preCellId="../M5/0/M5" postCellId="../M1/0/M1" preSegmentId="7" postSegmentId="9" preFractionAlong="0.6278944149486361" postFractionAlong="0.19427395351204224"/>
    </projection>
    <projection id="NCXLS_M5_NSMR" presynapticPopulation="M5" postsynapticPopulation="NSMR" synapse="Acetylcholine">
      <connection id="66" preCellId="../M5/0/M5" postCellId="../NSMR/0/NSMR" preSegmentId="8" postSegmentId="3" preFractionAlong="0.3379951568515358" postFractionAlong="0.375582952639944"/>
    </projection>
    <projection id="NC_I1L_RMDDL" presynapticPopulation="I1L" postsynapticPopulation="RMDDL" synapse="Acetylcholine">
      <connection id="67" preCellId="../I1L/0/I1L" postCellId="../RMDDL/0/RMDDL" preSegmentId="2" postSegmentId="7" preFractionAlong="0.6720261352951994" postFractionAlong="0.32815266747473193"/>
    </projection>
    <projection id="NC_I1L_RMDVL" presynapticPopulation="I1L" postsynapticPopulation="RMDVL" synapse="Acetylcholine">
      <connection id="68" preCellId="../I1L/0/I1L" postCellId="../RMDVL/0/RMDVL" preSegmentId="6" postSegmentId="6" preFractionAlong="0.25025136051586405" postFractionAlong="0.0388347344294232"/>
    </projection>
    <projection id="NC_I1R_RMDDR" presynapticPopulation="I1R" postsynapticPopulation="RMDDR" synapse="Acetylcholine">
      <connection id="69" preCellId="../I1R/0/I1R" postCellId="../RMDDR/0/RMDDR" preSegmentId="6" postSegmentId="5" preFractionAlong="0.5222432600548044" postFractionAlong="0.7699935530986108"/>
    </projection>
    <projection id="NC_I1R_RMDVR" presynapticPopulation="I1R" postsynapticPopulation="RMDVR" synapse="Acetylcholine">
      <connection id="70" preCellId="../I1R/0/I1R" postCellId="../RMDVR/0/RMDVR" preSegmentId="5" postSegmentId="7" preFractionAlong="0.085347464993768" postFractionAlong="0.0516817211686077"/>
    </projection>
    <projection id="NC_I2L_URXL" presynapticPopulation="I2L" postsynapticPopulation="URXL" synapse="Glutamate">
      <connection id="71" preCellId="../I2L/0/I2L" postCellId="../URXL/0/URXL" preSegmentId="4" postSegmentId="3" preFractionAlong="0.6374299014982066" postFractionAlong="0.7260913337226615"/>
    </projection>
    <projection id="NC_I2R_URXR" presynapticPopulation="I2R" postsynapticPopulation="URXR" synapse="Glutamate">
      <connection id="72" preCellId="../I2R/0/I2R" postCellId="../URXR/0/URXR" preSegmentId="2" postSegmentId="3" preFractionAlong="0.7951861947687037" postFractionAlong="0.2708322512620742"/>
    </projection>
    <projection id="NC_AVKL_I1L" presynapticPopulation="AVKL" postsynapticPopulation="I1L" synapse="Acetylcholine">
      <connection id="73" preCellId="../AVKL/0/AVKL" postCellId="../I1L/0/I1L" preSegmentId="7" postSegmentId="5" preFractionAlong="0.18433367433137005" postFractionAlong="0.08087296661719767"/>
    </projection>
    <projection id="NC_AVKR_I1R" presynapticPopulation="AVKR" postsynapticPopulation="I1R" synapse="Acetylcholine">
      <connection id="74" preCellId="../AVKR/0/AVKR" postCellId="../I1R/0/I1R" preSegmentId="9" postSegmentId="5" preFractionAlong="0.05819359550844361" postFractionAlong="0.9152137276264805"/>
    </projection>
    <projection id="NC_RIS_I1L" presynapticPopulation="RIS" postsynapticPopulation="I1L" synapse="Glutamate">
      <connection id="75" preCellId="../RIS/0/RIS" postCellId="../I1L/0/I1L" preSegmentId="2" postSegmentId="6" preFractionAlong="0.7145959227000623" postFractionAlong="0.6601973767177313"/>
    </projection>
    <projection id="NC_RIS_I1R" presynapticPopulation="RIS" postsynapticPopulation="I1R" synapse="Glutamate">
      <connection id="76" preCellId="../RIS/0/RIS" postCellId="../I1R/0/I1R" preSegmentId="5" postSegmentId="1" preFractionAlong="0.9548652806631941" postFractionAlong="0.7378969166957685"/>
    </projection>
    <projection id="NC_AVAL_I2L" presynapticPopulation="AVAL" postsynapticPopulation="I2L" synapse="Acetylcholine">
      <connection id="77" preCellId="../AVAL/0/AVAL" postCellId="../I2L/0/I2L" preSegmentId="5" postSegmentId="6" preFractionAlong="0.7300393165618185" postFractionAlong="0.04771612769164879"/>
    </projection>
    <projection id="NC_AVAR_I2R" presynapticPopulation="AVAR" postsynapticPopulation="I2R" synapse="Acetylcholine">
      <connection id="78" preCellId="../AVAR/0/AVAR" postCellId="../I2R/0/I2R" preSegmentId="3" postSegmentId="5" preFractionAlong="0.12016464780564218" postFractionAlong="0.3418796667164016"/>
    </projection>
    <projection id="NC_SMBVL_I4" presynapticPopulation="SMBVL" postsynapticPopulation="I4" synapse="Acetylcholine">
      <connection id="79" preCellId="../SMBVL/0/SMBVL" postCellId="../I4/0/I4" preSegmentId="5" postSegmentId="1" preFractionAlong="0.3114133093912942" postFractionAlong="0.9795105286215086"/>
    </projection>
    <projection id="NC_SMBVR_I4" presynapticPopulation="SMBVR" postsynapticPopulation="I4" synapse="Acetylcholine">
      <connection id="80" preCellId="../SMBVR/0/SMBVR" postCellId="../I4/0/I4" preSegmentId="5" postSegmentId="5" preFractionAlong="0.4734717707805657" postFractionAlong="0.17320186991001518"/>
    </projection>
    <electricalProjection id="NCXLS_M1_M4_GJ" presynapticPopulation="M1" postsynapticPopulation="M4">
      <electricalConnection id="81" preCell="0" postCell="0" synapse="Generic_GJ" preSegment="5" postSegment="7" preFractionAlong="0.048058924197033726" postFractionAlong="0.9491457315913859"/>
    </electricalProjection>
    <electricalProjection id="NCXLS_I2R_I1L_GJ" presynapticPopulation="I2R" postsynapticPopulation="I1L">
      <electricalConnection id="82" preCell="0" postCell="0" synapse="Generic_GJ" preSegment="4" postSegment="2" preFractionAlong="0.26089362334171395" postFractionAlong="0.01530454029038475"/>
    </electricalProjection>
    <electricalProjection id="NCXLS_MCL_NSMR_GJ" presynapticPopulation="MCL" postsynapticPopulation="NSMR">
      <electricalConnection id="83" preCell="0" postCell="0" synapse="Generic_GJ" preSegment="3" postSegment="1" preFractionAlong="0.5393774484000625" postFractionAlong="0.6839637693981411"/>
    </electricalProjection>
    <electricalProjection id="NCXLS_MI_MCL_GJ" presynapticPopulation="MI" postsynapticPopulation="MCL">
      <electricalConnection id="84" preCell="0" postCell="0" synapse="Generic_GJ" preSegment="8" postSegment="7" preFractionAlong="0.9442515971251674" postFractionAlong="0.8671989335550038"/>
    </electricalProjection>
    <electricalProjection id="NCXLS_M3L_M4_GJ" presynapticPopulation="M3L" postsynapticPopulation="M4">
      <electricalConnection id="85" preCell="0" postCell="0" synapse="Generic_GJ" preSegment="4" postSegment="8" preFractionAlong="0.6771683423829817" postFractionAlong="0.5733670416719333"/>
    </electricalProjection>
    <electricalProjection id="NCXLS_M2R_M2L_GJ" presynapticPopulation="M2R" postsynapticPopulation="M2L">
      <electricalConnection id="86" preCell="0" postCell="0" synapse="Generic_GJ" preSegment="1" postSegment="1" preFractionAlong="0.811204176736003" postFractionAlong="0.8206394757439553"/>
    </electricalProjection>
  </network>
</neuroml>
