<?xml version='1.0' encoding='UTF-8'?>
<neuroml xmlns="http://www.neuroml.org/schema/neuroml2" xmlns:xsi="http://www.w3.org/2001/XMLSchema-instance" xsi:schemaLocation="http://www.neuroml.org/schema/neuroml2 https://raw.githubusercontent.com/NeuroML/NeuroML2/development/Schemas/NeuroML2/NeuroML_v2beta4.xsd" id="gvft_network_bio_prior_lamW_0.189_DF_0.033_t40.net">
  <notes>NeuroML2 network generated from GVFT simulation on 2025-05-04 12:20:24
</notes>
  <include href="AVAL.cell.nml"/>
  <include href="AVAR.cell.nml"/>
  <include href="AVKL.cell.nml"/>
  <include href="AVKR.cell.nml"/>
  <include href="RIS.cell.nml"/>
  <include href="RMDDL.cell.nml"/>
  <include href="RMDDR.cell.nml"/>
  <include href="RMDVL.cell.nml"/>
  <include href="RMDVR.cell.nml"/>
  <include href="SMBVL.cell.nml"/>
  <include href="SMBVR.cell.nml"/>
  <include href="URXL.cell.nml"/>
  <include href="URXR.cell.nml"/>
  <include href="I6.cell.nml"/>
  <include href="M3L.cell.nml"/>
  <include href="I5.cell.nml"/>
  <include href="M1.cell.nml"/>
  <include href="I1R.cell.nml"/>
  <include href="MCR.cell.nml"/>
  <include href="I2R.cell.nml"/>
  <include href="I4.cell.nml"/>
  <include href="NSMR.cell.nml"/>
  <include href="M4.cell.nml"/>
  <include href="I3.cell.nml"/>
  <include href="MI.cell.nml"/>
  <include href="I2L.cell.nml"/>
  <include href="M5.cell.nml"/>
  <include href="NSML.cell.nml"/>
  <include href="M2R.cell.nml"/>
  <include href="M3R.cell.nml"/>
  <include href="MCL.cell.nml"/>
  <include href="I1L.cell.nml"/>
  <include href="M2L.cell.nml"/>
  <include href="Acetylcholine.synapse.nml"/>
  <include href="Glutamate.synapse.nml"/>
  <include href="Generic_GJ.synapse.nml"/>
  <include href="Serotonin_Glutamate.synapse.nml"/>
  <network id="gvft_network_bio_prior_lamW_0.189_DF_0.033_t40.net" type="networkWithTemperature" temperature="20.0 degC">
    <population id="M1" component="M1" type="populationList" size="1">
      <instance id="0">
        <location x="-0.94974875" y="0.67839193" z="0.0"/>
      </instance>
    </population>
    <population id="M2L" component="M2L" type="populationList" size="1">
      <instance id="0">
        <location x="-0.1356784" y="-0.51758796" z="0.0"/>
      </instance>
    </population>
    <population id="M2R" component="M2R" type="populationList" size="1">
      <instance id="0">
        <location x="0.8492462" y="0.015075387" z="0.0"/>
      </instance>
    </population>
    <population id="M3L" component="M3L" type="populationList" size="1">
      <instance id="0">
        <location x="0.53768843" y="0.1758794" z="0.0"/>
      </instance>
    </population>
    <population id="M3R" component="M3R" type="populationList" size="1">
      <instance id="0">
        <location x="-0.42713568" y="0.31658292" z="0.0"/>
      </instance>
    </population>
    <population id="M4" component="M4" type="populationList" size="1">
      <instance id="0">
        <location x="-0.98994976" y="-0.6482412" z="0.0"/>
      </instance>
    </population>
    <population id="M5" component="M5" type="populationList" size="1">
      <instance id="0">
        <location x="-0.2562814" y="-0.57788944" z="0.0"/>
      </instance>
    </population>
    <population id="I1L" component="I1L" type="populationList" size="1">
      <instance id="0">
        <location x="-0.5477387" y="-0.919598" z="0.0"/>
      </instance>
    </population>
    <population id="I1R" component="I1R" type="populationList" size="1">
      <instance id="0">
        <location x="-0.5276382" y="0.8190955" z="0.0"/>
      </instance>
    </population>
    <population id="I2L" component="I2L" type="populationList" size="1">
      <instance id="0">
        <location x="0.6482412" y="0.61809045" z="0.0"/>
      </instance>
    </population>
    <population id="I2R" component="I2R" type="populationList" size="1">
      <instance id="0">
        <location x="0.53768843" y="0.72864324" z="0.0"/>
      </instance>
    </population>
    <population id="I3" component="I3" type="populationList" size="1">
      <instance id="0">
        <location x="-0.1155779" y="0.9396985" z="0.0"/>
      </instance>
    </population>
    <population id="I4" component="I4" type="populationList" size="1">
      <instance id="0">
        <location x="0.24623117" y="0.9396985" z="0.0"/>
      </instance>
    </population>
    <population id="I5" component="I5" type="populationList" size="1">
      <instance id="0">
        <location x="0.9698492" y="0.39698493" z="0.0"/>
      </instance>
    </population>
    <population id="I6" component="I6" type="populationList" size="1">
      <instance id="0">
        <location x="0.37688443" y="-0.5075377" z="0.0"/>
      </instance>
    </population>
    <population id="MCL" component="MCL" type="populationList" size="1">
      <instance id="0">
        <location x="-0.2964824" y="0.80904526" z="0.0"/>
      </instance>
    </population>
    <population id="MCR" component="MCR" type="populationList" size="1">
      <instance id="0">
        <location x="-0.8492462" y="-0.025125638" z="0.0"/>
      </instance>
    </population>
    <population id="MI" component="MI" type="populationList" size="1">
      <instance id="0">
        <location x="-0.35678393" y="0.7788945" z="0.0"/>
      </instance>
    </population>
    <population id="NSML" component="NSML" type="populationList" size="1">
      <instance id="0">
        <location x="-0.43718594" y="-0.8592965" z="0.0"/>
      </instance>
    </population>
    <population id="NSMR" component="NSMR" type="populationList" size="1">
      <instance id="0">
        <location x="0.7889447" y="0.1557789" z="0.0"/>
      </instance>
    </population>
    <population id="AVAL" component="AVAL" type="populationList" size="1">
      <instance id="0">
        <location x="5.0" y="0.0" z="0.0"/>
      </instance>
    </population>
    <population id="AVAR" component="AVAR" type="populationList" size="1">
      <instance id="0">
        <location x="5.0" y="0.0" z="0.0"/>
      </instance>
    </population>
    <population id="AVKL" component="AVKL" type="populationList" size="1">
      <instance id="0">
        <location x="5.0" y="0.0" z="0.0"/>
      </instance>
    </population>
    <population id="AVKR" component="AVKR" type="populationList" size="1">
      <instance id="0">
        <location x="5.0" y="0.0" z="0.0"/>
      </instance>
    </population>
    <population id="RIS" component="RIS" type="populationList" size="1">
      <instance id="0">
        <location x="5.0" y="0.0" z="0.0"/>
      </instance>
    </population>
    <population id="RMDDL" component="RMDDL" type="populationList" size="1">
      <instance id="0">
        <location x="5.0" y="0.0" z="0.0"/>
      </instance>
    </population>
    <population id="RMDDR" component="RMDDR" type="populationList" size="1">
      <instance id="0">
        <location x="5.0" y="0.0" z="0.0"/>
      </instance>
    </population>
    <population id="RMDVL" component="RMDVL" type="populationList" size="1">
      <instance id="0">
        <location x="5.0" y="0.0" z="0.0"/>
      </instance>
    </population>
    <population id="RMDVR" component="RMDVR" type="populationList" size="1">
      <instance id="0">
        <location x="5.0" y="0.0" z="0.0"/>
      </instance>
    </population>
    <population id="SMBVL" component="SMBVL" type="populationList" size="1">
      <instance id="0">
        <location x="5.0" y="0.0" z="0.0"/>
      </instance>
    </population>
    <population id="SMBVR" component="SMBVR" type="populationList" size="1">
      <instance id="0">
        <location x="5.0" y="0.0" z="0.0"/>
      </instance>
    </population>
    <population id="URXL" component="URXL" type="populationList" size="1">
      <instance id="0">
        <location x="5.0" y="0.0" z="0.0"/>
      </instance>
    </population>
    <population id="URXR" component="URXR" type="populationList" size="1">
      <instance id="0">
        <location x="5.0" y="0.0" z="0.0"/>
      </instance>
    </population>
    <projection id="NCXLS_MCR_M2L" presynapticPopulation="MCR" postsynapticPopulation="M2L" synapse="Acetylcholine">
      <connection id="0" preCellId="../MCR/0/MCR" postCellId="../M2L/0/M2L" preSegmentId="2" postSegmentId="9" preFractionAlong="0.4975751441541355" postFractionAlong="0.006495015999256504"/>
    </projection>
    <projection id="NCXLS_MCR_M5" presynapticPopulation="MCR" postsynapticPopulation="M5" synapse="Acetylcholine">
      <connection id="1" preCellId="../MCR/0/MCR" postCellId="../M5/0/M5" preSegmentId="8" postSegmentId="8" preFractionAlong="0.9027760477645449" postFractionAlong="0.9622915416725868"/>
    </projection>
    <electricalProjection id="NCXLS_MCR_NSML_GJ" presynapticPopulation="MCR" postsynapticPopulation="NSML">
      <electricalConnection id="2" preCell="0" postCell="0" synapse="Generic_GJ" preSegment="1" postSegment="6" preFractionAlong="0.5252022002307971" postFractionAlong="0.20832694686003972"/>
    </electricalProjection>
    <projection id="NCXLS_MCR_M4" presynapticPopulation="MCR" postsynapticPopulation="M4" synapse="Acetylcholine">
      <connection id="3" preCellId="../MCR/0/MCR" postCellId="../M4/0/M4" preSegmentId="2" postSegmentId="8" preFractionAlong="0.5550826014376511" postFractionAlong="0.7424575642135566"/>
    </projection>
    <projection id="NCXLS_MCR_I1L" presynapticPopulation="MCR" postsynapticPopulation="I1L" synapse="Acetylcholine">
      <connection id="4" preCellId="../MCR/0/MCR" postCellId="../I1L/0/I1L" preSegmentId="5" postSegmentId="5" preFractionAlong="0.6824930337371488" postFractionAlong="0.847569048102495"/>
    </projection>
    <projection id="NCXLS_M2L_I2L" presynapticPopulation="M2L" postsynapticPopulation="I2L" synapse="Acetylcholine">
      <connection id="5" preCellId="../M2L/0/M2L" postCellId="../I2L/0/I2L" preSegmentId="9" postSegmentId="9" preFractionAlong="0.9321023654572216" postFractionAlong="0.7172635253579271"/>
    </projection>
    <projection id="NCXLS_M2L_MCR" presynapticPopulation="M2L" postsynapticPopulation="MCR" synapse="Acetylcholine">
      <connection id="6" preCellId="../M2L/0/M2L" postCellId="../MCR/0/MCR" preSegmentId="4" postSegmentId="1" preFractionAlong="0.4195396445267118" postFractionAlong="0.4850553309559652"/>
    </projection>
    <projection id="NCXLS_M2L_MCL" presynapticPopulation="M2L" postsynapticPopulation="MCL" synapse="Acetylcholine">
      <connection id="7" preCellId="../M2L/0/M2L" postCellId="../MCL/0/MCL" preSegmentId="9" postSegmentId="6" preFractionAlong="0.07415910577403073" postFractionAlong="0.8914538731447493"/>
    </projection>
    <electricalProjection id="NCXLS_M2L_M2R_GJ" presynapticPopulation="M2L" postsynapticPopulation="M2R">
      <electricalConnection id="8" preCell="0" postCell="0" synapse="Generic_GJ" preSegment="3" postSegment="9" preFractionAlong="0.9925898759338447" postFractionAlong="0.6793934881124261"/>
    </electricalProjection>
    <projection id="NCXLS_M2L_MI" presynapticPopulation="M2L" postsynapticPopulation="MI" synapse="Acetylcholine">
      <connection id="9" preCellId="../M2L/0/M2L" postCellId="../MI/0/MI" preSegmentId="2" postSegmentId="7" preFractionAlong="0.8269490250841108" postFractionAlong="0.8444263331200869"/>
    </projection>
    <projection id="NCXLS_M2L_I2R" presynapticPopulation="M2L" postsynapticPopulation="I2R" synapse="Acetylcholine">
      <connection id="10" preCellId="../M2L/0/M2L" postCellId="../I2R/0/I2R" preSegmentId="7" postSegmentId="5" preFractionAlong="0.6000144774806355" postFractionAlong="0.180818479002395"/>
    </projection>
    <projection id="NCXLS_M2L_I3" presynapticPopulation="M2L" postsynapticPopulation="I3" synapse="Acetylcholine">
      <connection id="11" preCellId="../M2L/0/M2L" postCellId="../I3/0/I3" preSegmentId="8" postSegmentId="1" preFractionAlong="0.8820481860076986" postFractionAlong="0.4443938189157698"/>
    </projection>
    <projection id="NCXLS_M2L_I5" presynapticPopulation="M2L" postsynapticPopulation="I5" synapse="Acetylcholine">
      <connection id="12" preCellId="../M2L/0/M2L" postCellId="../I5/0/I5" preSegmentId="9" postSegmentId="7" preFractionAlong="0.003387847982639136" postFractionAlong="0.24529009364364296"/>
    </projection>
    <electricalProjection id="NCXLS_M2L_M1_GJ" presynapticPopulation="M2L" postsynapticPopulation="M1">
      <electricalConnection id="13" preCell="0" postCell="0" synapse="Generic_GJ" preSegment="9" postSegment="6" preFractionAlong="0.0991945301128786" postFractionAlong="0.9088874403864678"/>
    </electricalProjection>
    <projection id="NCXLS_M2L_NSMR" presynapticPopulation="M2L" postsynapticPopulation="NSMR" synapse="Acetylcholine">
      <connection id="14" preCellId="../M2L/0/M2L" postCellId="../NSMR/0/NSMR" preSegmentId="8" postSegmentId="1" preFractionAlong="0.18150796162149552" postFractionAlong="0.013981712971364746"/>
    </projection>
    <projection id="NCXLS_M2L_I6" presynapticPopulation="M2L" postsynapticPopulation="I6" synapse="Acetylcholine">
      <connection id="15" preCellId="../M2L/0/M2L" postCellId="../I6/0/I6" preSegmentId="7" postSegmentId="3" preFractionAlong="0.7052836240393124" postFractionAlong="0.5674858777835963"/>
    </projection>
    <projection id="NCXLS_M2L_I4" presynapticPopulation="M2L" postsynapticPopulation="I4" synapse="Acetylcholine">
      <connection id="16" preCellId="../M2L/0/M2L" postCellId="../I4/0/I4" preSegmentId="8" postSegmentId="7" preFractionAlong="0.597795832722833" postFractionAlong="0.014868974345519703"/>
    </projection>
    <projection id="NCXLS_M2L_I1R" presynapticPopulation="M2L" postsynapticPopulation="I1R" synapse="Acetylcholine">
      <connection id="17" preCellId="../M2L/0/M2L" postCellId="../I1R/0/I1R" preSegmentId="7" postSegmentId="8" preFractionAlong="0.731645903919888" postFractionAlong="0.4394482232929203"/>
    </projection>
    <projection id="NCXLS_M2L_M3R" presynapticPopulation="M2L" postsynapticPopulation="M3R" synapse="Acetylcholine">
      <connection id="18" preCellId="../M2L/0/M2L" postCellId="../M3R/0/M3R" preSegmentId="6" postSegmentId="2" preFractionAlong="0.45591593702211375" postFractionAlong="0.07120671754123253"/>
    </projection>
    <projection id="NCXLS_M2L_M3L" presynapticPopulation="M2L" postsynapticPopulation="M3L" synapse="Acetylcholine">
      <connection id="19" preCellId="../M2L/0/M2L" postCellId="../M3L/0/M3L" preSegmentId="2" postSegmentId="8" preFractionAlong="0.24330192798296713" postFractionAlong="0.7254121231929704"/>
    </projection>
    <projection id="NCXLS_M5_MCR" presynapticPopulation="M5" postsynapticPopulation="MCR" synapse="Acetylcholine">
      <connection id="20" preCellId="../M5/0/M5" postCellId="../MCR/0/MCR" preSegmentId="2" postSegmentId="2" preFractionAlong="0.22463877642910912" postFractionAlong="0.8111060402001594"/>
    </projection>
    <projection id="NCXLS_M5_NSML" presynapticPopulation="M5" postsynapticPopulation="NSML" synapse="Acetylcholine">
      <connection id="21" preCellId="../M5/0/M5" postCellId="../NSML/0/NSML" preSegmentId="5" postSegmentId="5" preFractionAlong="0.07145138060942235" postFractionAlong="0.03246014176227641"/>
    </projection>
    <projection id="NCXLS_M5_M4" presynapticPopulation="M5" postsynapticPopulation="M4" synapse="Acetylcholine">
      <connection id="22" preCellId="../M5/0/M5" postCellId="../M4/0/M4" preSegmentId="7" postSegmentId="9" preFractionAlong="0.13299858707463919" postFractionAlong="0.02236653449442927"/>
    </projection>
    <projection id="NCXLS_M5_I1L" presynapticPopulation="M5" postsynapticPopulation="I1L" synapse="Acetylcholine">
      <connection id="23" preCellId="../M5/0/M5" postCellId="../I1L/0/I1L" preSegmentId="3" postSegmentId="1" preFractionAlong="0.26367545859548913" postFractionAlong="0.0650054894108063"/>
    </projection>
    <projection id="NCXLS_MCL_I2L" presynapticPopulation="MCL" postsynapticPopulation="I2L" synapse="Acetylcholine">
      <connection id="24" preCellId="../MCL/0/MCL" postCellId="../I2L/0/I2L" preSegmentId="5" postSegmentId="3" preFractionAlong="0.6264638552540559" postFractionAlong="0.5380795428740542"/>
    </projection>
    <projection id="NCXLS_MCL_I2R" presynapticPopulation="MCL" postsynapticPopulation="I2R" synapse="Acetylcholine">
      <connection id="25" preCellId="../MCL/0/MCL" postCellId="../I2R/0/I2R" preSegmentId="1" postSegmentId="8" preFractionAlong="0.6593751874194929" postFractionAlong="0.316747183257435"/>
    </projection>
    <projection id="NCXLS_MCL_I3" presynapticPopulation="MCL" postsynapticPopulation="I3" synapse="Acetylcholine">
      <connection id="26" preCellId="../MCL/0/MCL" postCellId="../I3/0/I3" preSegmentId="9" postSegmentId="6" preFractionAlong="0.13625201405638188" postFractionAlong="0.8978833777644819"/>
    </projection>
    <projection id="NCXLS_MCL_I4" presynapticPopulation="MCL" postsynapticPopulation="I4" synapse="Acetylcholine">
      <connection id="27" preCellId="../MCL/0/MCL" postCellId="../I4/0/I4" preSegmentId="8" postSegmentId="9" preFractionAlong="0.195422586638349" postFractionAlong="0.0111545873118305"/>
    </projection>
    <projection id="NCXLS_M2R_MCR" presynapticPopulation="M2R" postsynapticPopulation="MCR" synapse="Acetylcholine">
      <connection id="28" preCellId="../M2R/0/M2R" postCellId="../MCR/0/MCR" preSegmentId="2" postSegmentId="1" preFractionAlong="0.09487071267517977" postFractionAlong="0.9968488878594198"/>
    </projection>
    <electricalProjection id="NCXLS_M2R_M2L_GJ" presynapticPopulation="M2R" postsynapticPopulation="M2L">
      <electricalConnection id="29" preCell="0" postCell="0" synapse="Generic_GJ" preSegment="8" postSegment="2" preFractionAlong="0.16554079482308726" postFractionAlong="0.731353971777378"/>
    </electricalProjection>
    <projection id="NCXLS_M2R_M5" presynapticPopulation="M2R" postsynapticPopulation="M5" synapse="Glutamate">
      <connection id="30" preCellId="../M2R/0/M2R" postCellId="../M5/0/M5" preSegmentId="1" postSegmentId="1" preFractionAlong="0.6340007674159881" postFractionAlong="0.3641528191046055"/>
    </projection>
    <projection id="NCXLS_M2R_NSML" presynapticPopulation="M2R" postsynapticPopulation="NSML" synapse="Acetylcholine">
      <connection id="31" preCellId="../M2R/0/M2R" postCellId="../NSML/0/NSML" preSegmentId="5" postSegmentId="2" preFractionAlong="0.7565526600578163" postFractionAlong="0.61051316409216"/>
    </projection>
    <projection id="NCXLS_M2R_M4" presynapticPopulation="M2R" postsynapticPopulation="M4" synapse="Acetylcholine">
      <connection id="32" preCellId="../M2R/0/M2R" postCellId="../M4/0/M4" preSegmentId="9" postSegmentId="9" preFractionAlong="0.2099318316734844" postFractionAlong="0.7761518641056229"/>
    </projection>
    <projection id="NCXLS_M2R_MI" presynapticPopulation="M2R" postsynapticPopulation="MI" synapse="Acetylcholine">
      <connection id="33" preCellId="../M2R/0/M2R" postCellId="../MI/0/MI" preSegmentId="4" postSegmentId="3" preFractionAlong="0.49207818653564606" postFractionAlong="0.39394426469058463"/>
    </projection>
    <projection id="NCXLS_M2R_I1L" presynapticPopulation="M2R" postsynapticPopulation="I1L" synapse="Acetylcholine">
      <connection id="34" preCellId="../M2R/0/M2R" postCellId="../I1L/0/I1L" preSegmentId="4" postSegmentId="1" preFractionAlong="0.2289871853003117" postFractionAlong="0.5266422635251975"/>
    </projection>
    <electricalProjection id="NCXLS_M2R_M1_GJ" presynapticPopulation="M2R" postsynapticPopulation="M1">
      <electricalConnection id="35" preCell="0" postCell="0" synapse="Generic_GJ" preSegment="8" postSegment="3" preFractionAlong="0.018457225539944222" postFractionAlong="0.8318880637567295"/>
    </electricalProjection>
    <projection id="NCXLS_M2R_I6" presynapticPopulation="M2R" postsynapticPopulation="I6" synapse="Acetylcholine">
      <connection id="36" preCellId="../M2R/0/M2R" postCellId="../I6/0/I6" preSegmentId="9" postSegmentId="5" preFractionAlong="0.015366250734723308" postFractionAlong="0.4264438057143032"/>
    </projection>
    <projection id="NCXLS_M2R_I1R" presynapticPopulation="M2R" postsynapticPopulation="I1R" synapse="Acetylcholine">
      <connection id="37" preCellId="../M2R/0/M2R" postCellId="../I1R/0/I1R" preSegmentId="4" postSegmentId="1" preFractionAlong="0.75247309093576" postFractionAlong="0.030605496336904237"/>
    </projection>
    <projection id="NCXLS_M2R_M3R" presynapticPopulation="M2R" postsynapticPopulation="M3R" synapse="Acetylcholine">
      <connection id="38" preCellId="../M2R/0/M2R" postCellId="../M3R/0/M3R" preSegmentId="3" postSegmentId="5" preFractionAlong="0.04505958191972548" postFractionAlong="0.18603406137127865"/>
    </projection>
    <projection id="NCXLS_M2R_M3L" presynapticPopulation="M2R" postsynapticPopulation="M3L" synapse="Acetylcholine">
      <connection id="39" preCellId="../M2R/0/M2R" postCellId="../M3L/0/M3L" preSegmentId="5" postSegmentId="5" preFractionAlong="0.9768342651801892" postFractionAlong="0.7397499473904856"/>
    </projection>
    <projection id="NCXLS_NSML_M4" presynapticPopulation="NSML" postsynapticPopulation="M4" synapse="Serotonin_Glutamate">
      <connection id="40" preCellId="../NSML/0/NSML" postCellId="../M4/0/M4" preSegmentId="1" postSegmentId="3" preFractionAlong="0.260517445435969" postFractionAlong="0.6457903577950729"/>
    </projection>
    <projection id="NCXLS_NSML_I1L" presynapticPopulation="NSML" postsynapticPopulation="I1L" synapse="Serotonin_Glutamate">
      <connection id="41" preCellId="../NSML/0/NSML" postCellId="../I1L/0/I1L" preSegmentId="5" postSegmentId="9" preFractionAlong="0.9483093804303666" postFractionAlong="0.22481289951018457"/>
    </projection>
    <projection id="NCXLS_M4_MCR" presynapticPopulation="M4" postsynapticPopulation="MCR" synapse="Acetylcholine">
      <connection id="42" preCellId="../M4/0/M4" postCellId="../MCR/0/MCR" preSegmentId="9" postSegmentId="6" preFractionAlong="0.7714299889929364" postFractionAlong="0.0021840945055572325"/>
    </projection>
    <projection id="NCXLS_M4_MCL" presynapticPopulation="M4" postsynapticPopulation="MCL" synapse="Acetylcholine">
      <connection id="43" preCellId="../M4/0/M4" postCellId="../MCL/0/MCL" preSegmentId="3" postSegmentId="6" preFractionAlong="0.6679367445480653" postFractionAlong="0.8063552807935896"/>
    </projection>
    <projection id="NCXLS_M4_MI" presynapticPopulation="M4" postsynapticPopulation="MI" synapse="Acetylcholine">
      <connection id="44" preCellId="../M4/0/M4" postCellId="../MI/0/MI" preSegmentId="4" postSegmentId="2" preFractionAlong="0.5024027934801267" postFractionAlong="0.9169787490185026"/>
    </projection>
    <projection id="NCXLS_M4_I3" presynapticPopulation="M4" postsynapticPopulation="I3" synapse="Acetylcholine">
      <connection id="45" preCellId="../M4/0/M4" postCellId="../I3/0/I3" preSegmentId="9" postSegmentId="6" preFractionAlong="0.08504362130607113" postFractionAlong="0.21999112689693068"/>
    </projection>
    <projection id="NCXLS_M4_M1" presynapticPopulation="M4" postsynapticPopulation="M1" synapse="Acetylcholine">
      <connection id="46" preCellId="../M4/0/M4" postCellId="../M1/0/M1" preSegmentId="4" postSegmentId="5" preFractionAlong="0.8627885456713906" postFractionAlong="0.5090833066899516"/>
    </projection>
    <projection id="NCXLS_M4_I4" presynapticPopulation="M4" postsynapticPopulation="I4" synapse="Acetylcholine">
      <connection id="47" preCellId="../M4/0/M4" postCellId="../I4/0/I4" preSegmentId="9" postSegmentId="5" preFractionAlong="0.7072679186664391" postFractionAlong="0.6716660572094705"/>
    </projection>
    <projection id="NCXLS_M4_I1R" presynapticPopulation="M4" postsynapticPopulation="I1R" synapse="Acetylcholine">
      <connection id="48" preCellId="../M4/0/M4" postCellId="../I1R/0/I1R" preSegmentId="1" postSegmentId="6" preFractionAlong="0.3487028108429784" postFractionAlong="0.7636470325232199"/>
    </projection>
    <electricalProjection id="NCXLS_M4_M3R_GJ" presynapticPopulation="M4" postsynapticPopulation="M3R">
      <electricalConnection id="49" preCell="0" postCell="0" synapse="Generic_GJ" preSegment="1" postSegment="6" preFractionAlong="0.35121701963848806" postFractionAlong="0.8372399995154594"/>
    </electricalProjection>
    <projection id="NCXLS_MI_MCR" presynapticPopulation="MI" postsynapticPopulation="MCR" synapse="Serotonin_Glutamate">
      <connection id="50" preCellId="../MI/0/MI" postCellId="../MCR/0/MCR" preSegmentId="7" postSegmentId="7" preFractionAlong="0.08856817382508009" postFractionAlong="0.29127252225573697"/>
    </projection>
    <projection id="NCXLS_MI_M4" presynapticPopulation="MI" postsynapticPopulation="M4" synapse="Acetylcholine">
      <connection id="51" preCellId="../MI/0/MI" postCellId="../M4/0/M4" preSegmentId="6" postSegmentId="3" preFractionAlong="0.5959268121167338" postFractionAlong="0.6443657004925674"/>
    </projection>
    <projection id="NCXLS_MI_M1" presynapticPopulation="MI" postsynapticPopulation="M1" synapse="Glutamate">
      <connection id="52" preCellId="../MI/0/MI" postCellId="../M1/0/M1" preSegmentId="9" postSegmentId="3" preFractionAlong="0.25615088517374884" postFractionAlong="0.2546093292953059"/>
    </projection>
    <projection id="NCXLS_MI_I1R" presynapticPopulation="MI" postsynapticPopulation="I1R" synapse="Glutamate">
      <connection id="53" preCellId="../MI/0/MI" postCellId="../I1R/0/I1R" preSegmentId="7" postSegmentId="3" preFractionAlong="0.15590124353994683" postFractionAlong="0.7222485780842599"/>
    </projection>
    <projection id="NCXLS_M1_I2L" presynapticPopulation="M1" postsynapticPopulation="I2L" synapse="Acetylcholine">
      <connection id="54" preCellId="../M1/0/M1" postCellId="../I2L/0/I2L" preSegmentId="4" postSegmentId="2" preFractionAlong="0.1347204450906636" postFractionAlong="0.4079914834695869"/>
    </projection>
    <projection id="NCXLS_M1_MCR" presynapticPopulation="M1" postsynapticPopulation="MCR" synapse="Acetylcholine">
      <connection id="55" preCellId="../M1/0/M1" postCellId="../MCR/0/MCR" preSegmentId="4" postSegmentId="9" preFractionAlong="0.6974612672267269" postFractionAlong="0.5062310360908802"/>
    </projection>
    <electricalProjection id="NCXLS_M1_M2L_GJ" presynapticPopulation="M1" postsynapticPopulation="M2L">
      <electricalConnection id="56" preCell="0" postCell="0" synapse="Generic_GJ" preSegment="4" postSegment="9" preFractionAlong="0.9247474758643617" postFractionAlong="0.8518368088189332"/>
    </electricalProjection>
    <projection id="NCXLS_M1_M5" presynapticPopulation="M1" postsynapticPopulation="M5" synapse="Acetylcholine">
      <connection id="57" preCellId="../M1/0/M1" postCellId="../M5/0/M5" preSegmentId="5" postSegmentId="3" preFractionAlong="0.22894233613944526" postFractionAlong="0.12162289068009424"/>
    </projection>
    <projection id="NCXLS_M1_MCL" presynapticPopulation="M1" postsynapticPopulation="MCL" synapse="Acetylcholine">
      <connection id="58" preCellId="../M1/0/M1" postCellId="../MCL/0/MCL" preSegmentId="3" postSegmentId="5" preFractionAlong="0.2554282810460905" postFractionAlong="0.5066912010062987"/>
    </projection>
    <projection id="NCXLS_M1_M2R" presynapticPopulation="M1" postsynapticPopulation="M2R" synapse="Acetylcholine">
      <connection id="59" preCellId="../M1/0/M1" postCellId="../M2R/0/M2R" preSegmentId="9" postSegmentId="7" preFractionAlong="0.8899310558900979" postFractionAlong="0.6508788374957772"/>
    </projection>
    <projection id="NCXLS_M1_NSML" presynapticPopulation="M1" postsynapticPopulation="NSML" synapse="Acetylcholine">
      <connection id="60" preCellId="../M1/0/M1" postCellId="../NSML/0/NSML" preSegmentId="4" postSegmentId="8" preFractionAlong="0.8546075627333712" postFractionAlong="0.4713681101729975"/>
    </projection>
    <projection id="NCXLS_M1_M4" presynapticPopulation="M1" postsynapticPopulation="M4" synapse="Glutamate">
      <connection id="61" preCellId="../M1/0/M1" postCellId="../M4/0/M4" preSegmentId="1" postSegmentId="3" preFractionAlong="0.550038740998604" postFractionAlong="0.0971646819659655"/>
    </projection>
    <projection id="NCXLS_M1_MI" presynapticPopulation="M1" postsynapticPopulation="MI" synapse="Acetylcholine">
      <connection id="62" preCellId="../M1/0/M1" postCellId="../MI/0/MI" preSegmentId="7" postSegmentId="7" preFractionAlong="0.8890923982489601" postFractionAlong="0.9378272069923832"/>
    </projection>
    <projection id="NCXLS_M1_I1L" presynapticPopulation="M1" postsynapticPopulation="I1L" synapse="Acetylcholine">
      <connection id="63" preCellId="../M1/0/M1" postCellId="../I1L/0/I1L" preSegmentId="2" postSegmentId="9" preFractionAlong="0.8573278235335529" postFractionAlong="0.10447298581593623"/>
    </projection>
    <projection id="NCXLS_M1_I2R" presynapticPopulation="M1" postsynapticPopulation="I2R" synapse="Acetylcholine">
      <connection id="64" preCellId="../M1/0/M1" postCellId="../I2R/0/I2R" preSegmentId="5" postSegmentId="5" preFractionAlong="0.7087285799048996" postFractionAlong="0.13443108283573402"/>
    </projection>
    <projection id="NCXLS_M1_I3" presynapticPopulation="M1" postsynapticPopulation="I3" synapse="Acetylcholine">
      <connection id="65" preCellId="../M1/0/M1" postCellId="../I3/0/I3" preSegmentId="3" postSegmentId="6" preFractionAlong="0.9495374371136518" postFractionAlong="0.3395289191306933"/>
    </projection>
    <projection id="NCXLS_M1_I5" presynapticPopulation="M1" postsynapticPopulation="I5" synapse="Acetylcholine">
      <connection id="66" preCellId="../M1/0/M1" postCellId="../I5/0/I5" preSegmentId="9" postSegmentId="8" preFractionAlong="0.5065012010369253" postFractionAlong="0.08581077170943885"/>
    </projection>
    <projection id="NCXLS_M1_NSMR" presynapticPopulation="M1" postsynapticPopulation="NSMR" synapse="Acetylcholine">
      <connection id="67" preCellId="../M1/0/M1" postCellId="../NSMR/0/NSMR" preSegmentId="9" postSegmentId="2" preFractionAlong="0.03868495825719154" postFractionAlong="0.753503901107308"/>
    </projection>
    <projection id="NCXLS_M1_I6" presynapticPopulation="M1" postsynapticPopulation="I6" synapse="Acetylcholine">
      <connection id="68" preCellId="../M1/0/M1" postCellId="../I6/0/I6" preSegmentId="8" postSegmentId="2" preFractionAlong="0.06584216450865465" postFractionAlong="0.6221669241736077"/>
    </projection>
    <projection id="NCXLS_M1_I4" presynapticPopulation="M1" postsynapticPopulation="I4" synapse="Acetylcholine">
      <connection id="69" preCellId="../M1/0/M1" postCellId="../I4/0/I4" preSegmentId="1" postSegmentId="7" preFractionAlong="0.28088327306759975" postFractionAlong="0.9102217014103121"/>
    </projection>
    <projection id="NCXLS_M1_I1R" presynapticPopulation="M1" postsynapticPopulation="I1R" synapse="Acetylcholine">
      <connection id="70" preCellId="../M1/0/M1" postCellId="../I1R/0/I1R" preSegmentId="5" postSegmentId="3" preFractionAlong="0.44972541059210613" postFractionAlong="0.5437624559186557"/>
    </projection>
    <electricalProjection id="NCXLS_M1_M3R_GJ" presynapticPopulation="M1" postsynapticPopulation="M3R">
      <electricalConnection id="71" preCell="0" postCell="0" synapse="Generic_GJ" preSegment="6" postSegment="4" preFractionAlong="0.08142768870693551" postFractionAlong="0.43584036887272604"/>
    </electricalProjection>
    <projection id="NCXLS_M1_M3L" presynapticPopulation="M1" postsynapticPopulation="M3L" synapse="Acetylcholine">
      <connection id="72" preCellId="../M1/0/M1" postCellId="../M3L/0/M3L" preSegmentId="3" postSegmentId="4" preFractionAlong="0.40515620708616484" postFractionAlong="0.21057919050494334"/>
    </projection>
    <projection id="NCXLS_M3R_I2L" presynapticPopulation="M3R" postsynapticPopulation="I2L" synapse="Acetylcholine">
      <connection id="73" preCellId="../M3R/0/M3R" postCellId="../I2L/0/I2L" preSegmentId="3" postSegmentId="3" preFractionAlong="0.05548394206791063" postFractionAlong="0.2845406102720561"/>
    </projection>
    <electricalProjection id="NCXLS_M3R_M2L_GJ" presynapticPopulation="M3R" postsynapticPopulation="M2L">
      <electricalConnection id="74" preCell="0" postCell="0" synapse="Generic_GJ" preSegment="2" postSegment="2" preFractionAlong="0.8344542148916962" postFractionAlong="0.3607884010787267"/>
    </electricalProjection>
    <projection id="NCXLS_M3R_M5" presynapticPopulation="M3R" postsynapticPopulation="M5" synapse="Acetylcholine">
      <connection id="75" preCellId="../M3R/0/M3R" postCellId="../M5/0/M5" preSegmentId="1" postSegmentId="9" preFractionAlong="0.06616872172518085" postFractionAlong="0.21593820402013508"/>
    </projection>
    <projection id="NCXLS_M3R_M2R" presynapticPopulation="M3R" postsynapticPopulation="M2R" synapse="Acetylcholine">
      <connection id="76" preCellId="../M3R/0/M3R" postCellId="../M2R/0/M2R" preSegmentId="3" postSegmentId="7" preFractionAlong="0.3124058976796318" postFractionAlong="0.5143832465110202"/>
    </projection>
    <projection id="NCXLS_M3R_NSML" presynapticPopulation="M3R" postsynapticPopulation="NSML" synapse="Acetylcholine">
      <connection id="77" preCellId="../M3R/0/M3R" postCellId="../NSML/0/NSML" preSegmentId="9" postSegmentId="7" preFractionAlong="0.7921691362279645" postFractionAlong="0.4947572395858043"/>
    </projection>
    <projection id="NCXLS_M3R_M4" presynapticPopulation="M3R" postsynapticPopulation="M4" synapse="Acetylcholine">
      <connection id="78" preCellId="../M3R/0/M3R" postCellId="../M4/0/M4" preSegmentId="4" postSegmentId="5" preFractionAlong="0.16037423516667204" postFractionAlong="0.6475855888018073"/>
    </projection>
    <projection id="NCXLS_M3R_I1L" presynapticPopulation="M3R" postsynapticPopulation="I1L" synapse="Acetylcholine">
      <connection id="79" preCellId="../M3R/0/M3R" postCellId="../I1L/0/I1L" preSegmentId="5" postSegmentId="5" preFractionAlong="0.15361855350435116" postFractionAlong="0.18001804505080676"/>
    </projection>
    <projection id="NCXLS_M3R_I2R" presynapticPopulation="M3R" postsynapticPopulation="I2R" synapse="Acetylcholine">
      <connection id="80" preCellId="../M3R/0/M3R" postCellId="../I2R/0/I2R" preSegmentId="8" postSegmentId="9" preFractionAlong="0.8901151363098093" postFractionAlong="0.8590463297066561"/>
    </projection>
    <projection id="NCXLS_M3R_I5" presynapticPopulation="M3R" postsynapticPopulation="I5" synapse="Acetylcholine">
      <connection id="81" preCellId="../M3R/0/M3R" postCellId="../I5/0/I5" preSegmentId="2" postSegmentId="7" preFractionAlong="0.08148997730927654" postFractionAlong="0.6430129801847662"/>
    </projection>
    <projection id="NCXLS_M3R_NSMR" presynapticPopulation="M3R" postsynapticPopulation="NSMR" synapse="Acetylcholine">
      <connection id="82" preCellId="../M3R/0/M3R" postCellId="../NSMR/0/NSMR" preSegmentId="2" postSegmentId="2" preFractionAlong="0.010073661993231453" postFractionAlong="0.4810187798004618"/>
    </projection>
    <projection id="NCXLS_M3R_I6" presynapticPopulation="M3R" postsynapticPopulation="I6" synapse="Acetylcholine">
      <connection id="83" preCellId="../M3R/0/M3R" postCellId="../I6/0/I6" preSegmentId="4" postSegmentId="1" preFractionAlong="0.1067138599937687" postFractionAlong="0.92320883587219"/>
    </projection>
    <projection id="NCXLS_M3R_M3L" presynapticPopulation="M3R" postsynapticPopulation="M3L" synapse="Glutamate">
      <connection id="84" preCellId="../M3R/0/M3R" postCellId="../M3L/0/M3L" preSegmentId="1" postSegmentId="6" preFractionAlong="0.23008590842000187" postFractionAlong="0.2559807588429972"/>
    </projection>
    <projection id="NCXLS_M3L_I2L" presynapticPopulation="M3L" postsynapticPopulation="I2L" synapse="Acetylcholine">
      <connection id="85" preCellId="../M3L/0/M3L" postCellId="../I2L/0/I2L" preSegmentId="4" postSegmentId="7" preFractionAlong="0.29671745157904095" postFractionAlong="0.5846220089133536"/>
    </projection>
    <projection id="NCXLS_M3L_MCR" presynapticPopulation="M3L" postsynapticPopulation="MCR" synapse="Acetylcholine">
      <connection id="86" preCellId="../M3L/0/M3L" postCellId="../MCR/0/MCR" preSegmentId="7" postSegmentId="2" preFractionAlong="0.9044253423171502" postFractionAlong="0.19810419424108738"/>
    </projection>
    <projection id="NCXLS_M3L_MCL" presynapticPopulation="M3L" postsynapticPopulation="MCL" synapse="Acetylcholine">
      <connection id="87" preCellId="../M3L/0/M3L" postCellId="../MCL/0/MCL" preSegmentId="4" postSegmentId="5" preFractionAlong="0.6616750607175304" postFractionAlong="0.3110417050569839"/>
    </projection>
    <projection id="NCXLS_M3L_MI" presynapticPopulation="M3L" postsynapticPopulation="MI" synapse="Acetylcholine">
      <connection id="88" preCellId="../M3L/0/M3L" postCellId="../MI/0/MI" preSegmentId="2" postSegmentId="1" preFractionAlong="0.9491705051076303" postFractionAlong="0.8257584576169683"/>
    </projection>
    <projection id="NCXLS_M3L_I2R" presynapticPopulation="M3L" postsynapticPopulation="I2R" synapse="Acetylcholine">
      <connection id="89" preCellId="../M3L/0/M3L" postCellId="../I2R/0/I2R" preSegmentId="3" postSegmentId="9" preFractionAlong="0.18715219259893" postFractionAlong="0.032624221406380216"/>
    </projection>
    <projection id="NCXLS_M3L_I3" presynapticPopulation="M3L" postsynapticPopulation="I3" synapse="Acetylcholine">
      <connection id="90" preCellId="../M3L/0/M3L" postCellId="../I3/0/I3" preSegmentId="3" postSegmentId="1" preFractionAlong="0.40357039244960136" postFractionAlong="0.7023961425404268"/>
    </projection>
    <projection id="NCXLS_M3L_I5" presynapticPopulation="M3L" postsynapticPopulation="I5" synapse="Acetylcholine">
      <connection id="91" preCellId="../M3L/0/M3L" postCellId="../I5/0/I5" preSegmentId="2" postSegmentId="4" preFractionAlong="0.661000298820853" postFractionAlong="0.3947875091707139"/>
    </projection>
    <projection id="NCXLS_M3L_M1" presynapticPopulation="M3L" postsynapticPopulation="M1" synapse="Glutamate">
      <connection id="92" preCellId="../M3L/0/M3L" postCellId="../M1/0/M1" preSegmentId="5" postSegmentId="4" preFractionAlong="0.8970473882101909" postFractionAlong="0.926158330525868"/>
    </projection>
    <projection id="NCXLS_M3L_I4" presynapticPopulation="M3L" postsynapticPopulation="I4" synapse="Acetylcholine">
      <connection id="93" preCellId="../M3L/0/M3L" postCellId="../I4/0/I4" preSegmentId="2" postSegmentId="6" preFractionAlong="0.657494229984942" postFractionAlong="0.19461925432456517"/>
    </projection>
    <projection id="NCXLS_M3L_I1R" presynapticPopulation="M3L" postsynapticPopulation="I1R" synapse="Acetylcholine">
      <connection id="94" preCellId="../M3L/0/M3L" postCellId="../I1R/0/I1R" preSegmentId="7" postSegmentId="1" preFractionAlong="0.9465638429787437" postFractionAlong="0.246617422690674"/>
    </projection>
    <projection id="NCXLS_M3L_M3R" presynapticPopulation="M3L" postsynapticPopulation="M3R" synapse="Acetylcholine">
      <connection id="95" preCellId="../M3L/0/M3L" postCellId="../M3R/0/M3R" preSegmentId="8" postSegmentId="4" preFractionAlong="0.7401493936975908" postFractionAlong="0.44812869946515954"/>
    </projection>
    <projection id="NC_I1L_RMDDL" presynapticPopulation="I1L" postsynapticPopulation="RMDDL" synapse="Acetylcholine">
      <connection id="1000" preCellId="../I1L/0/I1L" postCellId="../RMDDL/0/RMDDL" preSegmentId="4" postSegmentId="4" preFractionAlong="0.45792457986089785" postFractionAlong="0.569335201776094"/>
    </projection>
    <projection id="NC_I1L_RMDVL" presynapticPopulation="I1L" postsynapticPopulation="RMDVL" synapse="Acetylcholine">
      <connection id="1001" preCellId="../I1L/0/I1L" postCellId="../RMDVL/0/RMDVL" preSegmentId="6" postSegmentId="9" preFractionAlong="0.5611197417877434" postFractionAlong="0.30022545424765834"/>
    </projection>
    <projection id="NC_I1R_RMDDR" presynapticPopulation="I1R" postsynapticPopulation="RMDDR" synapse="Acetylcholine">
      <connection id="1002" preCellId="../I1R/0/I1R" postCellId="../RMDDR/0/RMDDR" preSegmentId="8" postSegmentId="8" preFractionAlong="0.037782968064595135" postFractionAlong="0.043013964380055336"/>
    </projection>
    <projection id="NC_I1R_RMDVR" presynapticPopulation="I1R" postsynapticPopulation="RMDVR" synapse="Acetylcholine">
      <connection id="1003" preCellId="../I1R/0/I1R" postCellId="../RMDVR/0/RMDVR" preSegmentId="9" postSegmentId="9" preFractionAlong="0.6783931464059073" postFractionAlong="0.6605324154364861"/>
    </projection>
    <projection id="NC_I2L_URXL" presynapticPopulation="I2L" postsynapticPopulation="URXL" synapse="Glutamate">
      <connection id="1004" preCellId="../I2L/0/I2L" postCellId="../URXL/0/URXL" preSegmentId="8" postSegmentId="9" preFractionAlong="0.1749460136910298" postFractionAlong="0.5963854184032292"/>
    </projection>
    <projection id="NC_I2R_URXR" presynapticPopulation="I2R" postsynapticPopulation="URXR" synapse="Glutamate">
      <connection id="1005" preCellId="../I2R/0/I2R" postCellId="../URXR/0/URXR" preSegmentId="7" postSegmentId="8" preFractionAlong="0.9267075043390905" postFractionAlong="0.6986569800812401"/>
    </projection>
    <projection id="NC_AVKL_I1L" presynapticPopulation="AVKL" postsynapticPopulation="I1L" synapse="Acetylcholine">
      <connection id="1006" preCellId="../AVKL/0/AVKL" postCellId="../I1L/0/I1L" preSegmentId="3" postSegmentId="7" preFractionAlong="0.5640849216886251" postFractionAlong="0.5330305614882556"/>
    </projection>
    <projection id="NC_AVKR_I1R" presynapticPopulation="AVKR" postsynapticPopulation="I1R" synapse="Acetylcholine">
      <connection id="1007" preCellId="../AVKR/0/AVKR" postCellId="../I1R/0/I1R" preSegmentId="1" postSegmentId="3" preFractionAlong="0.31478562371695795" postFractionAlong="0.05234876680960243"/>
    </projection>
    <projection id="NC_RIS_I1L" presynapticPopulation="RIS" postsynapticPopulation="I1L" synapse="Glutamate">
      <connection id="1008" preCellId="../RIS/0/RIS" postCellId="../I1L/0/I1L" preSegmentId="7" postSegmentId="3" preFractionAlong="0.6758918887082934" postFractionAlong="0.9936354484929419"/>
    </projection>
    <projection id="NC_RIS_I1R" presynapticPopulation="RIS" postsynapticPopulation="I1R" synapse="Glutamate">
      <connection id="1009" preCellId="../RIS/0/RIS" postCellId="../I1R/0/I1R" preSegmentId="4" postSegmentId="6" preFractionAlong="0.9602523252014376" postFractionAlong="0.2536694591216965"/>
    </projection>
    <projection id="NC_AVAL_I2L" presynapticPopulation="AVAL" postsynapticPopulation="I2L" synapse="Acetylcholine">
      <connection id="1010" preCellId="../AVAL/0/AVAL" postCellId="../I2L/0/I2L" preSegmentId="5" postSegmentId="7" preFractionAlong="0.5218232249499523" postFractionAlong="0.19347584941436813"/>
    </projection>
    <projection id="NC_AVAR_I2R" presynapticPopulation="AVAR" postsynapticPopulation="I2R" synapse="Acetylcholine">
      <connection id="1011" preCellId="../AVAR/0/AVAR" postCellId="../I2R/0/I2R" preSegmentId="7" postSegmentId="2" preFractionAlong="0.05052022667233469" postFractionAlong="0.6658493646001281"/>
    </projection>
    <projection id="NC_SMBVL_I4" presynapticPopulation="SMBVL" postsynapticPopulation="I4" synapse="Acetylcholine">
      <connection id="1012" preCellId="../SMBVL/0/SMBVL" postCellId="../I4/0/I4" preSegmentId="1" postSegmentId="3" preFractionAlong="0.46032698477783285" postFractionAlong="0.5664666059796343"/>
    </projection>
    <projection id="NC_SMBVR_I4" presynapticPopulation="SMBVR" postsynapticPopulation="I4" synapse="Acetylcholine">
      <connection id="1013" preCellId="../SMBVR/0/SMBVR" postCellId="../I4/0/I4" preSegmentId="1" postSegmentId="9" preFractionAlong="0.09345391266887793" postFractionAlong="0.7068194450101439"/>
    </projection>
  </network>
</neuroml>
