<?xml version='1.0' encoding='UTF-8'?>
<neuroml xmlns="http://www.neuroml.org/schema/neuroml2" xmlns:xsi="http://www.w3.org/2001/XMLSchema-instance" xsi:schemaLocation="http://www.neuroml.org/schema/neuroml2 https://raw.githubusercontent.com/NeuroML/NeuroML2/development/Schemas/NeuroML2/NeuroML_v2beta4.xsd" id="gvft_network_bio_prior_lamW_0.367_DF_0.013_t100.net">
  <notes>NeuroML2 network generated from GVFT simulation on 2025-05-04 10:23:08
</notes>
  <include href="I1L.cell.nml"/>
  <include href="I1R.cell.nml"/>
  <include href="I2L.cell.nml"/>
  <include href="I2R.cell.nml"/>
  <include href="I3.cell.nml"/>
  <include href="I4.cell.nml"/>
  <include href="M1.cell.nml"/>
  <include href="M2L.cell.nml"/>
  <include href="M2R.cell.nml"/>
  <include href="MI.cell.nml"/>
  <include href="NSML.cell.nml"/>
  <include href="NSMR.cell.nml"/>
  <include href="Acetylcholine.synapse.nml"/>
  <include href="Generic_GJ.nml"/>
  <include href="Glutamate.synapse.nml"/>
  <include href="Serotonin_Glutamate.synapse.nml"/>
  <network id="gvft_network_bio_prior_lamW_0.367_DF_0.013_t100.net" type="networkWithTemperature" temperature="20.0 degC">
    <population id="I1L" component="I1L" type="populationList" size="3">
      <instance id="0">
        <location x="0.5979899764060974" y="0.9698492288589478" z="0.0"/>
      </instance>
      <instance id="1">
        <location x="0.6683416962623596" y="0.5778894424438477" z="0.0"/>
      </instance>
      <instance id="2">
        <location x="0.4773869514465332" y="0.8793969750404358" z="0.0"/>
      </instance>
    </population>
    <population id="I1R" component="I1R" type="populationList" size="1">
      <instance id="0">
        <location x="-0.7386934757232666" y="-0.3366834223270416" z="0.0"/>
      </instance>
    </population>
    <population id="I2L" component="I2L" type="populationList" size="1">
      <instance id="0">
        <location x="-0.49748745560646057" y="-0.9195979833602905" z="0.0"/>
      </instance>
    </population>
    <population id="I2R" component="I2R" type="populationList" size="1">
      <instance id="0">
        <location x="-0.6080402135848999" y="-0.5678392052650452" z="0.0"/>
      </instance>
    </population>
    <population id="I3" component="I3" type="populationList" size="1">
      <instance id="0">
        <location x="-0.6381909847259521" y="0.2261306643486023" z="0.0"/>
      </instance>
    </population>
    <population id="I4" component="I4" type="populationList" size="1">
      <instance id="0">
        <location x="-0.05527639389038086" y="0.6582914590835571" z="0.0"/>
      </instance>
    </population>
    <population id="M1" component="M1" type="populationList" size="1">
      <instance id="0">
        <location x="-0.5979899764060974" y="-0.5075377225875854" z="0.0"/>
      </instance>
    </population>
    <population id="M2L" component="M2L" type="populationList" size="1">
      <instance id="0">
        <location x="0.18592965602874756" y="0.4673366844654083" z="0.0"/>
      </instance>
    </population>
    <population id="M2R" component="M2R" type="populationList" size="3">
      <instance id="0">
        <location x="0.13567839562892914" y="-0.03517588973045349" z="0.0"/>
      </instance>
      <instance id="1">
        <location x="0.5175879597663879" y="-0.1557788997888565" z="0.0"/>
      </instance>
      <instance id="2">
        <location x="-0.005025136284530163" y="-0.26633167266845703" z="0.0"/>
      </instance>
    </population>
    <population id="MI" component="MI" type="populationList" size="2">
      <instance id="0">
        <location x="-0.979899525642395" y="-0.24623116850852966" z="0.0"/>
      </instance>
      <instance id="1">
        <location x="0.18592965602874756" y="0.20603016018867493" z="0.0"/>
      </instance>
    </population>
    <population id="NSML" component="NSML" type="populationList" size="2">
      <instance id="0">
        <location x="0.26633167266845703" y="0.49748745560646057" z="0.0"/>
      </instance>
      <instance id="1">
        <location x="-0.2763819098472595" y="-0.5577889680862427" z="0.0"/>
      </instance>
    </population>
    <population id="NSMR" component="NSMR" type="populationList" size="3">
      <instance id="0">
        <location x="0.979899525642395" y="-0.356783926486969" z="0.0"/>
      </instance>
      <instance id="1">
        <location x="0.38693466782569885" y="0.17587940394878387" z="0.0"/>
      </instance>
      <instance id="2">
        <location x="-0.5577889680862427" y="0.3366834223270416" z="0.0"/>
      </instance>
    </population>
    <projection id="NCXLS_M2R_I1R" presynapticPopulation="M2R" postsynapticPopulation="I1R" synapse="Acetylcholine">
      <connection id="0" preCellId="../M2R/0/M2R" postCellId="../I1R/0/I1R" preSegmentId="6" postSegmentId="6" preFractionAlong="0.854" postFractionAlong="0.459"/>
    </projection>
    <projection id="NCXLS_M2R_M1" presynapticPopulation="M2R" postsynapticPopulation="M1" synapse="Acetylcholine">
      <connection id="1" preCellId="../M2R/0/M2R" postCellId="../M1/0/M1" preSegmentId="6" postSegmentId="8" preFractionAlong="0.854" postFractionAlong="0.291"/>
    </projection>
    <projection id="NCXLS_M2R_I2L" presynapticPopulation="M2R" postsynapticPopulation="I2L" synapse="Acetylcholine">
      <connection id="2" preCellId="../M2R/0/M2R" postCellId="../I2L/0/I2L" preSegmentId="6" postSegmentId="8" preFractionAlong="0.854" postFractionAlong="0.031"/>
      <connection id="11" preCellId="../M2R/1/M2R" postCellId="../I2L/0/I2L" preSegmentId="9" postSegmentId="8" preFractionAlong="0.163" postFractionAlong="0.031"/>
      <connection id="35" preCellId="../M2R/2/M2R" postCellId="../I2L/0/I2L" preSegmentId="1" postSegmentId="8" preFractionAlong="0.863" postFractionAlong="0.031"/>
    </projection>
    <projection id="NCXLS_M2R_M2R" presynapticPopulation="M2R" postsynapticPopulation="M2R" synapse="Acetylcholine">
      <connection id="3" preCellId="../M2R/0/M2R" postCellId="../M2R/2/M2R" preSegmentId="6" postSegmentId="7" preFractionAlong="0.854" postFractionAlong="0.184"/>
    </projection>
    <projection id="NCXLS_M2R_I3" presynapticPopulation="M2R" postsynapticPopulation="I3" synapse="Acetylcholine">
      <connection id="4" preCellId="../M2R/0/M2R" postCellId="../I3/0/I3" preSegmentId="6" postSegmentId="7" preFractionAlong="0.854" postFractionAlong="0.388"/>
    </projection>
    <projection id="NCXLS_M2R_NSMR" presynapticPopulation="M2R" postsynapticPopulation="NSMR" synapse="Acetylcholine">
      <connection id="5" preCellId="../M2R/0/M2R" postCellId="../NSMR/2/NSMR" preSegmentId="6" postSegmentId="3" preFractionAlong="0.854" postFractionAlong="0.704"/>
      <connection id="10" preCellId="../M2R/1/M2R" postCellId="../NSMR/0/NSMR" preSegmentId="9" postSegmentId="1" preFractionAlong="0.163" postFractionAlong="0.995"/>
    </projection>
    <projection id="NCXLS_M2R_I2R" presynapticPopulation="M2R" postsynapticPopulation="I2R" synapse="Acetylcholine">
      <connection id="6" preCellId="../M2R/0/M2R" postCellId="../I2R/0/I2R" preSegmentId="6" postSegmentId="9" preFractionAlong="0.854" postFractionAlong="0.207"/>
      <connection id="12" preCellId="../M2R/1/M2R" postCellId="../I2R/0/I2R" preSegmentId="9" postSegmentId="9" preFractionAlong="0.163" postFractionAlong="0.207"/>
      <connection id="36" preCellId="../M2R/2/M2R" postCellId="../I2R/0/I2R" preSegmentId="1" postSegmentId="9" preFractionAlong="0.863" postFractionAlong="0.207"/>
    </projection>
    <projection id="NCXLS_M2R_MI" presynapticPopulation="M2R" postsynapticPopulation="MI" synapse="Acetylcholine">
      <connection id="7" preCellId="../M2R/0/M2R" postCellId="../MI/0/MI" preSegmentId="6" postSegmentId="2" preFractionAlong="0.854" postFractionAlong="0.685"/>
    </projection>
    <projection id="NCXLS_M2R_I4" presynapticPopulation="M2R" postsynapticPopulation="I4" synapse="Acetylcholine">
      <connection id="8" preCellId="../M2R/0/M2R" postCellId="../I4/0/I4" preSegmentId="6" postSegmentId="10" preFractionAlong="0.854" postFractionAlong="0.486"/>
    </projection>
    <projection id="NCXLS_M2R_NSML" presynapticPopulation="M2R" postsynapticPopulation="NSML" synapse="Acetylcholine">
      <connection id="9" preCellId="../M2R/0/M2R" postCellId="../NSML/1/NSML" preSegmentId="6" postSegmentId="5" preFractionAlong="0.854" postFractionAlong="0.554"/>
      <connection id="13" preCellId="../M2R/1/M2R" postCellId="../NSML/1/NSML" preSegmentId="9" postSegmentId="5" preFractionAlong="0.163" postFractionAlong="0.554"/>
      <connection id="37" preCellId="../M2R/2/M2R" postCellId="../NSML/1/NSML" preSegmentId="1" postSegmentId="5" preFractionAlong="0.863" postFractionAlong="0.554"/>
    </projection>
    <projection id="NCXLS_NSMR_I2L" presynapticPopulation="NSMR" postsynapticPopulation="I2L" synapse="Serotonin_Glutamate">
      <connection id="14" preCellId="../NSMR/0/NSMR" postCellId="../I2L/0/I2L" preSegmentId="10" postSegmentId="8" preFractionAlong="0.339" postFractionAlong="0.031"/>
    </projection>
    <projection id="NCXLS_NSMR_I2R" presynapticPopulation="NSMR" postsynapticPopulation="I2R" synapse="Serotonin_Glutamate">
      <connection id="15" preCellId="../NSMR/0/NSMR" postCellId="../I2R/0/I2R" preSegmentId="10" postSegmentId="9" preFractionAlong="0.339" postFractionAlong="0.207"/>
    </projection>
    <projection id="NCXLS_NSMR_NSML" presynapticPopulation="NSMR" postsynapticPopulation="NSML" synapse="Serotonin_Glutamate">
      <connection id="16" preCellId="../NSMR/0/NSMR" postCellId="../NSML/1/NSML" preSegmentId="10" postSegmentId="5" preFractionAlong="0.339" postFractionAlong="0.554"/>
    </projection>
    <projection id="NCXLS_I1R_MI" presynapticPopulation="I1R" postsynapticPopulation="MI" synapse="Acetylcholine">
      <connection id="17" preCellId="../I1R/0/I1R" postCellId="../MI/0/MI" preSegmentId="3" postSegmentId="2" preFractionAlong="0.075" postFractionAlong="0.685"/>
    </projection>
    <projection id="NCXLS_M1_I1L" presynapticPopulation="M1" postsynapticPopulation="I1L" synapse="Acetylcholine">
      <connection id="18" preCellId="../M1/0/M1" postCellId="../I1L/0/I1L" preSegmentId="1" postSegmentId="2" preFractionAlong="0.864" postFractionAlong="0.217"/>
      <connection id="19" preCellId="../M1/0/M1" postCellId="../I1L/1/I1L" preSegmentId="1" postSegmentId="6" preFractionAlong="0.864" postFractionAlong="0.752"/>
      <connection id="24" preCellId="../M1/0/M1" postCellId="../I1L/2/I1L" preSegmentId="1" postSegmentId="8" preFractionAlong="0.864" postFractionAlong="0.948"/>
    </projection>
    <electricalProjection id="NCXLS_M1_M2R_GJ" presynapticPopulation="M1" postsynapticPopulation="M2R">
      <electricalConnection id="20" preCell="0" postCell="0" synapse="Generic_GJ" preSegment="1" postSegment="1" preFractionAlong="0.864" postFractionAlong="0.469"/>
      <electricalConnection id="21" preCell="0" postCell="1" synapse="Generic_GJ" preSegment="1" postSegment="10" preFractionAlong="0.864" postFractionAlong="0.348"/>
    </electricalProjection>
    <projection id="NCXLS_M1_NSMR" presynapticPopulation="M1" postsynapticPopulation="NSMR" synapse="Acetylcholine">
      <connection id="22" preCellId="../M1/0/M1" postCellId="../NSMR/0/NSMR" preSegmentId="1" postSegmentId="1" preFractionAlong="0.864" postFractionAlong="0.995"/>
      <connection id="23" preCellId="../M1/0/M1" postCellId="../NSMR/1/NSMR" preSegmentId="1" postSegmentId="4" preFractionAlong="0.864" postFractionAlong="0.183"/>
      <connection id="27" preCellId="../M1/0/M1" postCellId="../NSMR/2/NSMR" preSegmentId="1" postSegmentId="3" preFractionAlong="0.864" postFractionAlong="0.704"/>
    </projection>
    <projection id="NCXLS_M1_M2R" presynapticPopulation="M1" postsynapticPopulation="M2R" synapse="Glutamate">
      <connection id="25" preCellId="../M1/0/M1" postCellId="../M2R/2/M2R" preSegmentId="1" postSegmentId="7" preFractionAlong="0.864" postFractionAlong="0.184"/>
    </projection>
    <projection id="NCXLS_M1_I3" presynapticPopulation="M1" postsynapticPopulation="I3" synapse="Acetylcholine">
      <connection id="26" preCellId="../M1/0/M1" postCellId="../I3/0/I3" preSegmentId="1" postSegmentId="7" preFractionAlong="0.864" postFractionAlong="0.388"/>
    </projection>
    <projection id="NCXLS_M1_NSML" presynapticPopulation="M1" postsynapticPopulation="NSML" synapse="Acetylcholine">
      <connection id="28" preCellId="../M1/0/M1" postCellId="../NSML/0/NSML" preSegmentId="1" postSegmentId="10" preFractionAlong="0.864" postFractionAlong="0.544"/>
      <connection id="32" preCellId="../M1/0/M1" postCellId="../NSML/1/NSML" preSegmentId="1" postSegmentId="5" preFractionAlong="0.864" postFractionAlong="0.554"/>
    </projection>
    <projection id="NCXLS_M1_M2L" presynapticPopulation="M1" postsynapticPopulation="M2L" synapse="Acetylcholine">
      <connection id="29" preCellId="../M1/0/M1" postCellId="../M2L/0/M2L" preSegmentId="1" postSegmentId="5" preFractionAlong="0.864" postFractionAlong="0.962"/>
    </projection>
    <projection id="NCXLS_M1_MI" presynapticPopulation="M1" postsynapticPopulation="MI" synapse="Acetylcholine">
      <connection id="30" preCellId="../M1/0/M1" postCellId="../MI/1/MI" preSegmentId="1" postSegmentId="3" preFractionAlong="0.864" postFractionAlong="0.384"/>
    </projection>
    <projection id="NCXLS_M1_I4" presynapticPopulation="M1" postsynapticPopulation="I4" synapse="Acetylcholine">
      <connection id="31" preCellId="../M1/0/M1" postCellId="../I4/0/I4" preSegmentId="1" postSegmentId="10" preFractionAlong="0.864" postFractionAlong="0.486"/>
    </projection>
    <projection id="NCXLS_I1L_I1L" presynapticPopulation="I1L" postsynapticPopulation="I1L" synapse="Acetylcholine">
      <connection id="33" preCellId="../I1L/2/I1L" postCellId="../I1L/0/I1L" preSegmentId="8" postSegmentId="2" preFractionAlong="0.466" postFractionAlong="0.217"/>
    </projection>
    <electricalProjection id="NCXLS_M2R_M1_GJ" presynapticPopulation="M2R" postsynapticPopulation="M1">
      <electricalConnection id="34" preCell="2" postCell="0" synapse="Generic_GJ" preSegment="1" postSegment="8" preFractionAlong="0.863" postFractionAlong="0.291"/>
    </electricalProjection>
    <projection id="NCXLS_NSML_I1L" presynapticPopulation="NSML" postsynapticPopulation="I1L" synapse="Serotonin_Glutamate">
      <connection id="38" preCellId="../NSML/0/NSML" postCellId="../I1L/0/I1L" preSegmentId="7" postSegmentId="2" preFractionAlong="0.302" postFractionAlong="0.217"/>
      <connection id="39" preCellId="../NSML/0/NSML" postCellId="../I1L/1/I1L" preSegmentId="7" postSegmentId="6" preFractionAlong="0.302" postFractionAlong="0.752"/>
      <connection id="40" preCellId="../NSML/0/NSML" postCellId="../I1L/2/I1L" preSegmentId="7" postSegmentId="8" preFractionAlong="0.302" postFractionAlong="0.948"/>
    </projection>
    <projection id="NCXLS_M2L_I1L" presynapticPopulation="M2L" postsynapticPopulation="I1L" synapse="Acetylcholine">
      <connection id="41" preCellId="../M2L/0/M2L" postCellId="../I1L/0/I1L" preSegmentId="8" postSegmentId="2" preFractionAlong="0.001" postFractionAlong="0.217"/>
      <connection id="42" preCellId="../M2L/0/M2L" postCellId="../I1L/1/I1L" preSegmentId="8" postSegmentId="6" preFractionAlong="0.001" postFractionAlong="0.752"/>
      <connection id="43" preCellId="../M2L/0/M2L" postCellId="../I1L/2/I1L" preSegmentId="8" postSegmentId="8" preFractionAlong="0.001" postFractionAlong="0.948"/>
    </projection>
    <projection id="NCXLS_M2L_NSML" presynapticPopulation="M2L" postsynapticPopulation="NSML" synapse="Acetylcholine">
      <connection id="44" preCellId="../M2L/0/M2L" postCellId="../NSML/0/NSML" preSegmentId="8" postSegmentId="10" preFractionAlong="0.001" postFractionAlong="0.544"/>
    </projection>
    <projection id="NCXLS_M2L_I4" presynapticPopulation="M2L" postsynapticPopulation="I4" synapse="Acetylcholine">
      <connection id="45" preCellId="../M2L/0/M2L" postCellId="../I4/0/I4" preSegmentId="8" postSegmentId="10" preFractionAlong="0.001" postFractionAlong="0.486"/>
    </projection>
    <projection id="NCXLS_I2R_I1R" presynapticPopulation="I2R" postsynapticPopulation="I1R" synapse="Acetylcholine">
      <connection id="46" preCellId="../I2R/0/I2R" postCellId="../I1R/0/I1R" preSegmentId="7" postSegmentId="6" preFractionAlong="0.037" postFractionAlong="0.459"/>
    </projection>
    <projection id="NCXLS_I2R_MI" presynapticPopulation="I2R" postsynapticPopulation="MI" synapse="Acetylcholine">
      <connection id="47" preCellId="../I2R/0/I2R" postCellId="../MI/0/MI" preSegmentId="7" postSegmentId="2" preFractionAlong="0.037" postFractionAlong="0.685"/>
    </projection>
    <projection id="NCXLS_MI_I1L" presynapticPopulation="MI" postsynapticPopulation="I1L" synapse="Acetylcholine">
      <connection id="48" preCellId="../MI/0/MI" postCellId="../I1L/0/I1L" preSegmentId="5" postSegmentId="2" preFractionAlong="0.5" postFractionAlong="0.217"/>
      <connection id="49" preCellId="../MI/0/MI" postCellId="../I1L/1/I1L" preSegmentId="5" postSegmentId="6" preFractionAlong="0.5" postFractionAlong="0.752"/>
      <connection id="51" preCellId="../MI/0/MI" postCellId="../I1L/2/I1L" preSegmentId="5" postSegmentId="8" preFractionAlong="0.5" postFractionAlong="0.948"/>
    </projection>
    <projection id="NCXLS_MI_NSMR" presynapticPopulation="MI" postsynapticPopulation="NSMR" synapse="Acetylcholine">
      <connection id="50" preCellId="../MI/0/MI" postCellId="../NSMR/1/NSMR" preSegmentId="5" postSegmentId="4" preFractionAlong="0.5" postFractionAlong="0.183"/>
      <connection id="53" preCellId="../MI/0/MI" postCellId="../NSMR/2/NSMR" preSegmentId="5" postSegmentId="3" preFractionAlong="0.5" postFractionAlong="0.704"/>
      <connection id="62" preCellId="../MI/1/MI" postCellId="../NSMR/2/NSMR" preSegmentId="6" postSegmentId="3" preFractionAlong="0.858" postFractionAlong="0.704"/>
    </projection>
    <projection id="NCXLS_MI_I3" presynapticPopulation="MI" postsynapticPopulation="I3" synapse="Acetylcholine">
      <connection id="52" preCellId="../MI/0/MI" postCellId="../I3/0/I3" preSegmentId="5" postSegmentId="7" preFractionAlong="0.5" postFractionAlong="0.388"/>
      <connection id="61" preCellId="../MI/1/MI" postCellId="../I3/0/I3" preSegmentId="6" postSegmentId="7" preFractionAlong="0.858" postFractionAlong="0.388"/>
    </projection>
    <projection id="NCXLS_MI_NSML" presynapticPopulation="MI" postsynapticPopulation="NSML" synapse="Acetylcholine">
      <connection id="54" preCellId="../MI/0/MI" postCellId="../NSML/0/NSML" preSegmentId="5" postSegmentId="10" preFractionAlong="0.5" postFractionAlong="0.544"/>
      <connection id="67" preCellId="../MI/1/MI" postCellId="../NSML/1/NSML" preSegmentId="6" postSegmentId="5" preFractionAlong="0.858" postFractionAlong="0.554"/>
    </projection>
    <electricalProjection id="NCXLS_MI_M2L_GJ" presynapticPopulation="MI" postsynapticPopulation="M2L">
      <electricalConnection id="55" preCell="0" postCell="0" synapse="Generic_GJ" preSegment="5" postSegment="5" preFractionAlong="0.5" postFractionAlong="0.962"/>
      <electricalConnection id="63" preCell="1" postCell="0" synapse="Generic_GJ" preSegment="6" postSegment="5" preFractionAlong="0.858" postFractionAlong="0.962"/>
    </electricalProjection>
    <projection id="NCXLS_MI_MI" presynapticPopulation="MI" postsynapticPopulation="MI" synapse="Acetylcholine">
      <connection id="56" preCellId="../MI/0/MI" postCellId="../MI/1/MI" preSegmentId="5" postSegmentId="3" preFractionAlong="0.5" postFractionAlong="0.384"/>
    </projection>
    <projection id="NCXLS_MI_I4" presynapticPopulation="MI" postsynapticPopulation="I4" synapse="Acetylcholine">
      <connection id="57" preCellId="../MI/0/MI" postCellId="../I4/0/I4" preSegmentId="5" postSegmentId="10" preFractionAlong="0.5" postFractionAlong="0.486"/>
      <connection id="66" preCellId="../MI/1/MI" postCellId="../I4/0/I4" preSegmentId="6" postSegmentId="10" preFractionAlong="0.858" postFractionAlong="0.486"/>
    </projection>
    <projection id="NCXLS_MI_I1R" presynapticPopulation="MI" postsynapticPopulation="I1R" synapse="Acetylcholine">
      <connection id="58" preCellId="../MI/1/MI" postCellId="../I1R/0/I1R" preSegmentId="6" postSegmentId="6" preFractionAlong="0.858" postFractionAlong="0.459"/>
    </projection>
    <electricalProjection id="NCXLS_MI_M1_GJ" presynapticPopulation="MI" postsynapticPopulation="M1">
      <electricalConnection id="59" preCell="1" postCell="0" synapse="Generic_GJ" preSegment="6" postSegment="8" preFractionAlong="0.858" postFractionAlong="0.291"/>
    </electricalProjection>
    <projection id="NCXLS_MI_I2L" presynapticPopulation="MI" postsynapticPopulation="I2L" synapse="Acetylcholine">
      <connection id="60" preCellId="../MI/1/MI" postCellId="../I2L/0/I2L" preSegmentId="6" postSegmentId="8" preFractionAlong="0.858" postFractionAlong="0.031"/>
    </projection>
    <projection id="NCXLS_MI_I2R" presynapticPopulation="MI" postsynapticPopulation="I2R" synapse="Acetylcholine">
      <connection id="64" preCellId="../MI/1/MI" postCellId="../I2R/0/I2R" preSegmentId="6" postSegmentId="9" preFractionAlong="0.858" postFractionAlong="0.207"/>
    </projection>
    <projection id="NCXLS_MI_MI" presynapticPopulation="MI" postsynapticPopulation="MI" synapse="Glutamate">
      <connection id="65" preCellId="../MI/1/MI" postCellId="../MI/0/MI" preSegmentId="6" postSegmentId="2" preFractionAlong="0.858" postFractionAlong="0.685"/>
    </projection>
    <projection id="NCXLS_NSML_I1R" presynapticPopulation="NSML" postsynapticPopulation="I1R" synapse="Serotonin_Glutamate">
      <connection id="68" preCellId="../NSML/1/NSML" postCellId="../I1R/0/I1R" preSegmentId="5" postSegmentId="6" preFractionAlong="0.574" postFractionAlong="0.459"/>
    </projection>
    <projection id="NCXLS_NSML_M1" presynapticPopulation="NSML" postsynapticPopulation="M1" synapse="Serotonin_Glutamate">
      <connection id="69" preCellId="../NSML/1/NSML" postCellId="../M1/0/M1" preSegmentId="5" postSegmentId="8" preFractionAlong="0.574" postFractionAlong="0.291"/>
    </projection>
    <projection id="NCXLS_NSML_I2L" presynapticPopulation="NSML" postsynapticPopulation="I2L" synapse="Serotonin_Glutamate">
      <connection id="70" preCellId="../NSML/1/NSML" postCellId="../I2L/0/I2L" preSegmentId="5" postSegmentId="8" preFractionAlong="0.574" postFractionAlong="0.031"/>
    </projection>
    <projection id="NCXLS_NSML_I2R" presynapticPopulation="NSML" postsynapticPopulation="I2R" synapse="Serotonin_Glutamate">
      <connection id="71" preCellId="../NSML/1/NSML" postCellId="../I2R/0/I2R" preSegmentId="5" postSegmentId="9" preFractionAlong="0.574" postFractionAlong="0.207"/>
    </projection>
    <projection id="NCXLS_NSML_MI" presynapticPopulation="NSML" postsynapticPopulation="MI" synapse="Serotonin_Glutamate">
      <connection id="72" preCellId="../NSML/1/NSML" postCellId="../MI/0/MI" preSegmentId="5" postSegmentId="2" preFractionAlong="0.574" postFractionAlong="0.685"/>
    </projection>
  </network>
</neuroml>
