<?xml version='1.0' encoding='UTF-8'?>
<neuroml xmlns="http://www.neuroml.org/schema/neuroml2" xmlns:xsi="http://www.w3.org/2001/XMLSchema-instance" xsi:schemaLocation="http://www.neuroml.org/schema/neuroml2 https://raw.githubusercontent.com/NeuroML/NeuroML2/development/Schemas/NeuroML2/NeuroML_v2beta4.xsd" id="gvft_network_bio_prior_lamW_0.367_DF_0.013_t50.net">
  <notes>NeuroML2 network generated from GVFT simulation on 2025-05-04 10:22:54
</notes>
  <include href="I1L.cell.nml"/>
  <include href="I1R.cell.nml"/>
  <include href="I2L.cell.nml"/>
  <include href="I2R.cell.nml"/>
  <include href="I3.cell.nml"/>
  <include href="I4.cell.nml"/>
  <include href="M1.cell.nml"/>
  <include href="M2L.cell.nml"/>
  <include href="M2R.cell.nml"/>
  <include href="MI.cell.nml"/>
  <include href="NSML.cell.nml"/>
  <include href="NSMR.cell.nml"/>
  <include href="Acetylcholine.synapse.nml"/>
  <include href="Generic_GJ.nml"/>
  <include href="Glutamate.synapse.nml"/>
  <include href="Serotonin_Glutamate.synapse.nml"/>
  <network id="gvft_network_bio_prior_lamW_0.367_DF_0.013_t50.net" type="networkWithTemperature" temperature="20.0 degC">
    <population id="I1L" component="I1L" type="populationList" size="1">
      <instance id="0">
        <location x="0.31658291816711426" y="-0.7788944840431213" z="0.0"/>
      </instance>
    </population>
    <population id="I1R" component="I1R" type="populationList" size="1">
      <instance id="0">
        <location x="-0.6783919334411621" y="-0.6582914590835571" z="0.0"/>
      </instance>
    </population>
    <population id="I2L" component="I2L" type="populationList" size="1">
      <instance id="0">
        <location x="-0.909547746181488" y="-0.8190954923629761" z="0.0"/>
      </instance>
    </population>
    <population id="I2R" component="I2R" type="populationList" size="1">
      <instance id="0">
        <location x="-0.7989949584007263" y="0.045226141810417175" z="0.0"/>
      </instance>
    </population>
    <population id="I3" component="I3" type="populationList" size="1">
      <instance id="0">
        <location x="-1.0" y="0.45728644728660583" z="0.0"/>
      </instance>
    </population>
    <population id="I4" component="I4" type="populationList" size="3">
      <instance id="0">
        <location x="0.9597989916801453" y="-0.6482412219047546" z="0.0"/>
      </instance>
      <instance id="1">
        <location x="0.8693467378616333" y="0.44723618030548096" z="0.0"/>
      </instance>
      <instance id="2">
        <location x="0.9899497628211975" y="-0.2864321768283844" z="0.0"/>
      </instance>
    </population>
    <population id="M1" component="M1" type="populationList" size="3">
      <instance id="0">
        <location x="0.2864321768283844" y="-0.7085427045822144" z="0.0"/>
      </instance>
      <instance id="1">
        <location x="-0.6482412219047546" y="0.06532664597034454" z="0.0"/>
      </instance>
      <instance id="2">
        <location x="0.8994975090026855" y="-0.4170854389667511" z="0.0"/>
      </instance>
    </population>
    <population id="M2L" component="M2L" type="populationList" size="1">
      <instance id="0">
        <location x="-0.045226141810417175" y="0.3467336893081665" z="0.0"/>
      </instance>
    </population>
    <population id="M2R" component="M2R" type="populationList" size="1">
      <instance id="0">
        <location x="0.8492462038993835" y="0.9597989916801453" z="0.0"/>
      </instance>
    </population>
    <population id="MI" component="MI" type="populationList" size="2">
      <instance id="0">
        <location x="-0.30653268098831177" y="0.4773869514465332" z="0.0"/>
      </instance>
      <instance id="1">
        <location x="-0.929648220539093" y="0.6582914590835571" z="0.0"/>
      </instance>
    </population>
    <population id="NSML" component="NSML" type="populationList" size="3">
      <instance id="0">
        <location x="0.3366834223270416" y="0.12562814354896545" z="0.0"/>
      </instance>
      <instance id="1">
        <location x="-0.005025136284530163" y="-0.025125637650489807" z="0.0"/>
      </instance>
      <instance id="2">
        <location x="0.6783919334411621" y="-0.19597990810871124" z="0.0"/>
      </instance>
    </population>
    <population id="NSMR" component="NSMR" type="populationList" size="2">
      <instance id="0">
        <location x="0.5175879597663879" y="0.3668341636657715" z="0.0"/>
      </instance>
      <instance id="1">
        <location x="0.8894472122192383" y="0.5778894424438477" z="0.0"/>
      </instance>
    </population>
    <projection id="NCXLS_M1_I2R" presynapticPopulation="M1" postsynapticPopulation="I2R" synapse="Acetylcholine">
      <connection id="0" preCellId="../M1/0/M1" postCellId="../I2R/0/I2R" preSegmentId="1" postSegmentId="9" preFractionAlong="0.864" postFractionAlong="0.207"/>
    </projection>
    <projection id="NCXLS_M1_I1L" presynapticPopulation="M1" postsynapticPopulation="I1L" synapse="Acetylcholine">
      <connection id="1" preCellId="../M1/0/M1" postCellId="../I1L/0/I1L" preSegmentId="1" postSegmentId="2" preFractionAlong="0.864" postFractionAlong="0.217"/>
      <connection id="15" preCellId="../M1/1/M1" postCellId="../I1L/0/I1L" preSegmentId="9" postSegmentId="2" preFractionAlong="0.979" postFractionAlong="0.217"/>
      <connection id="50" preCellId="../M1/2/M1" postCellId="../I1L/0/I1L" preSegmentId="1" postSegmentId="2" preFractionAlong="0.147" postFractionAlong="0.217"/>
    </projection>
    <projection id="NCXLS_M1_I1R" presynapticPopulation="M1" postsynapticPopulation="I1R" synapse="Acetylcholine">
      <connection id="2" preCellId="../M1/0/M1" postCellId="../I1R/0/I1R" preSegmentId="1" postSegmentId="6" preFractionAlong="0.864" postFractionAlong="0.459"/>
      <connection id="17" preCellId="../M1/1/M1" postCellId="../I1R/0/I1R" preSegmentId="9" postSegmentId="6" preFractionAlong="0.979" postFractionAlong="0.459"/>
      <connection id="52" preCellId="../M1/2/M1" postCellId="../I1R/0/I1R" preSegmentId="1" postSegmentId="6" preFractionAlong="0.147" postFractionAlong="0.459"/>
    </projection>
    <projection id="NCXLS_M1_I2L" presynapticPopulation="M1" postsynapticPopulation="I2L" synapse="Acetylcholine">
      <connection id="3" preCellId="../M1/0/M1" postCellId="../I2L/0/I2L" preSegmentId="1" postSegmentId="8" preFractionAlong="0.864" postFractionAlong="0.031"/>
      <connection id="18" preCellId="../M1/1/M1" postCellId="../I2L/0/I2L" preSegmentId="9" postSegmentId="8" preFractionAlong="0.979" postFractionAlong="0.031"/>
      <connection id="53" preCellId="../M1/2/M1" postCellId="../I2L/0/I2L" preSegmentId="1" postSegmentId="8" preFractionAlong="0.147" postFractionAlong="0.031"/>
    </projection>
    <electricalProjection id="NCXLS_I2R_I3_GJ" presynapticPopulation="I2R" postsynapticPopulation="I3">
      <electricalConnection id="4" preCell="0" postCell="0" synapse="Generic_GJ" preSegment="7" postSegment="7" preFractionAlong="0.037" postFractionAlong="0.388"/>
    </electricalProjection>
    <projection id="NCXLS_I2R_MI" presynapticPopulation="I2R" postsynapticPopulation="MI" synapse="Acetylcholine">
      <connection id="5" preCellId="../I2R/0/I2R" postCellId="../MI/1/MI" preSegmentId="7" postSegmentId="3" preFractionAlong="0.037" postFractionAlong="0.384"/>
    </projection>
    <projection id="NCXLS_M2L_M2R" presynapticPopulation="M2L" postsynapticPopulation="M2R" synapse="Acetylcholine">
      <connection id="6" preCellId="../M2L/0/M2L" postCellId="../M2R/0/M2R" preSegmentId="8" postSegmentId="1" preFractionAlong="0.001" postFractionAlong="0.469"/>
    </projection>
    <projection id="NCXLS_M2L_I4" presynapticPopulation="M2L" postsynapticPopulation="I4" synapse="Acetylcholine">
      <connection id="7" preCellId="../M2L/0/M2L" postCellId="../I4/1/I4" preSegmentId="8" postSegmentId="7" preFractionAlong="0.001" postFractionAlong="0.364"/>
    </projection>
    <projection id="NCXLS_M2L_NSMR" presynapticPopulation="M2L" postsynapticPopulation="NSMR" synapse="Acetylcholine">
      <connection id="8" preCellId="../M2L/0/M2L" postCellId="../NSMR/0/NSMR" preSegmentId="8" postSegmentId="1" preFractionAlong="0.001" postFractionAlong="0.995"/>
      <connection id="9" preCellId="../M2L/0/M2L" postCellId="../NSMR/1/NSMR" preSegmentId="8" postSegmentId="4" preFractionAlong="0.001" postFractionAlong="0.183"/>
    </projection>
    <projection id="NCXLS_MI_I2R" presynapticPopulation="MI" postsynapticPopulation="I2R" synapse="Acetylcholine">
      <connection id="10" preCellId="../MI/0/MI" postCellId="../I2R/0/I2R" preSegmentId="5" postSegmentId="9" preFractionAlong="0.5" postFractionAlong="0.207"/>
      <connection id="29" preCellId="../MI/1/MI" postCellId="../I2R/0/I2R" preSegmentId="6" postSegmentId="9" preFractionAlong="0.858" postFractionAlong="0.207"/>
    </projection>
    <projection id="NCXLS_MI_I3" presynapticPopulation="MI" postsynapticPopulation="I3" synapse="Acetylcholine">
      <connection id="11" preCellId="../MI/0/MI" postCellId="../I3/0/I3" preSegmentId="5" postSegmentId="7" preFractionAlong="0.5" postFractionAlong="0.388"/>
      <connection id="30" preCellId="../MI/1/MI" postCellId="../I3/0/I3" preSegmentId="6" postSegmentId="7" preFractionAlong="0.858" postFractionAlong="0.388"/>
    </projection>
    <projection id="NCXLS_MI_M1" presynapticPopulation="MI" postsynapticPopulation="M1" synapse="Acetylcholine">
      <connection id="12" preCellId="../MI/0/MI" postCellId="../M1/1/M1" preSegmentId="5" postSegmentId="7" preFractionAlong="0.5" postFractionAlong="0.891"/>
      <connection id="27" preCellId="../MI/1/MI" postCellId="../M1/0/M1" preSegmentId="6" postSegmentId="8" preFractionAlong="0.858" postFractionAlong="0.291"/>
      <connection id="38" preCellId="../MI/1/MI" postCellId="../M1/1/M1" preSegmentId="6" postSegmentId="7" preFractionAlong="0.858" postFractionAlong="0.891"/>
      <connection id="45" preCellId="../MI/1/MI" postCellId="../M1/2/M1" preSegmentId="6" postSegmentId="10" preFractionAlong="0.858" postFractionAlong="0.654"/>
    </projection>
    <electricalProjection id="NCXLS_MI_MI_GJ" presynapticPopulation="MI" postsynapticPopulation="MI">
      <electricalConnection id="13" preCell="0" postCell="1" synapse="Generic_GJ" preSegment="5" postSegment="3" preFractionAlong="0.5" postFractionAlong="0.384"/>
      <electricalConnection id="37" preCell="1" postCell="0" synapse="Generic_GJ" preSegment="6" postSegment="2" preFractionAlong="0.858" postFractionAlong="0.685"/>
    </electricalProjection>
    <electricalProjection id="NCXLS_M1_M1_GJ" presynapticPopulation="M1" postsynapticPopulation="M1">
      <electricalConnection id="14" preCell="1" postCell="0" synapse="Generic_GJ" preSegment="9" postSegment="8" preFractionAlong="0.979" postFractionAlong="0.291"/>
    </electricalProjection>
    <projection id="NCXLS_M1_I4" presynapticPopulation="M1" postsynapticPopulation="I4" synapse="Acetylcholine">
      <connection id="16" preCellId="../M1/1/M1" postCellId="../I4/0/I4" preSegmentId="9" postSegmentId="10" preFractionAlong="0.979" postFractionAlong="0.486"/>
      <connection id="20" preCellId="../M1/1/M1" postCellId="../I4/2/I4" preSegmentId="9" postSegmentId="9" preFractionAlong="0.979" postFractionAlong="0.52"/>
      <connection id="51" preCellId="../M1/2/M1" postCellId="../I4/0/I4" preSegmentId="1" postSegmentId="10" preFractionAlong="0.147" postFractionAlong="0.486"/>
    </projection>
    <projection id="NCXLS_M1_NSML" presynapticPopulation="M1" postsynapticPopulation="NSML" synapse="Acetylcholine">
      <connection id="19" preCellId="../M1/1/M1" postCellId="../NSML/2/NSML" preSegmentId="9" postSegmentId="10" preFractionAlong="0.979" postFractionAlong="0.724"/>
    </projection>
    <projection id="NCXLS_M1_M1" presynapticPopulation="M1" postsynapticPopulation="M1" synapse="Acetylcholine">
      <connection id="21" preCellId="../M1/1/M1" postCellId="../M1/2/M1" preSegmentId="9" postSegmentId="10" preFractionAlong="0.979" postFractionAlong="0.654"/>
      <connection id="49" preCellId="../M1/2/M1" postCellId="../M1/0/M1" preSegmentId="1" postSegmentId="8" preFractionAlong="0.147" postFractionAlong="0.291"/>
    </projection>
    <projection id="NCXLS_M2R_I4" presynapticPopulation="M2R" postsynapticPopulation="I4" synapse="Acetylcholine">
      <connection id="22" preCellId="../M2R/0/M2R" postCellId="../I4/0/I4" preSegmentId="6" postSegmentId="10" preFractionAlong="0.854" postFractionAlong="0.486"/>
      <connection id="23" preCellId="../M2R/0/M2R" postCellId="../I4/1/I4" preSegmentId="6" postSegmentId="7" preFractionAlong="0.854" postFractionAlong="0.364"/>
      <connection id="24" preCellId="../M2R/0/M2R" postCellId="../I4/2/I4" preSegmentId="6" postSegmentId="9" preFractionAlong="0.854" postFractionAlong="0.52"/>
    </projection>
    <projection id="NCXLS_M2R_NSMR" presynapticPopulation="M2R" postsynapticPopulation="NSMR" synapse="Acetylcholine">
      <connection id="25" preCellId="../M2R/0/M2R" postCellId="../NSMR/1/NSMR" preSegmentId="6" postSegmentId="4" preFractionAlong="0.854" postFractionAlong="0.183"/>
    </projection>
    <electricalProjection id="NCXLS_M2R_M1_GJ" presynapticPopulation="M2R" postsynapticPopulation="M1">
      <electricalConnection id="26" preCell="0" postCell="2" synapse="Generic_GJ" preSegment="6" postSegment="10" preFractionAlong="0.854" postFractionAlong="0.654"/>
    </electricalProjection>
    <projection id="NCXLS_MI_NSML" presynapticPopulation="MI" postsynapticPopulation="NSML" synapse="Acetylcholine">
      <connection id="28" preCellId="../MI/1/MI" postCellId="../NSML/0/NSML" preSegmentId="6" postSegmentId="10" preFractionAlong="0.858" postFractionAlong="0.544"/>
      <connection id="35" preCellId="../MI/1/MI" postCellId="../NSML/1/NSML" preSegmentId="6" postSegmentId="5" preFractionAlong="0.858" postFractionAlong="0.554"/>
      <connection id="40" preCellId="../MI/1/MI" postCellId="../NSML/2/NSML" preSegmentId="6" postSegmentId="10" preFractionAlong="0.858" postFractionAlong="0.724"/>
    </projection>
    <projection id="NCXLS_MI_I1L" presynapticPopulation="MI" postsynapticPopulation="I1L" synapse="Acetylcholine">
      <connection id="31" preCellId="../MI/1/MI" postCellId="../I1L/0/I1L" preSegmentId="6" postSegmentId="2" preFractionAlong="0.858" postFractionAlong="0.217"/>
    </projection>
    <projection id="NCXLS_MI_I4" presynapticPopulation="MI" postsynapticPopulation="I4" synapse="Acetylcholine">
      <connection id="32" preCellId="../MI/1/MI" postCellId="../I4/0/I4" preSegmentId="6" postSegmentId="10" preFractionAlong="0.858" postFractionAlong="0.486"/>
      <connection id="41" preCellId="../MI/1/MI" postCellId="../I4/1/I4" preSegmentId="6" postSegmentId="7" preFractionAlong="0.858" postFractionAlong="0.364"/>
      <connection id="42" preCellId="../MI/1/MI" postCellId="../I4/2/I4" preSegmentId="6" postSegmentId="9" preFractionAlong="0.858" postFractionAlong="0.52"/>
    </projection>
    <projection id="NCXLS_MI_I1R" presynapticPopulation="MI" postsynapticPopulation="I1R" synapse="Acetylcholine">
      <connection id="33" preCellId="../MI/1/MI" postCellId="../I1R/0/I1R" preSegmentId="6" postSegmentId="6" preFractionAlong="0.858" postFractionAlong="0.459"/>
    </projection>
    <projection id="NCXLS_MI_M2L" presynapticPopulation="MI" postsynapticPopulation="M2L" synapse="Glutamate">
      <connection id="34" preCellId="../MI/1/MI" postCellId="../M2L/0/M2L" preSegmentId="6" postSegmentId="5" preFractionAlong="0.858" postFractionAlong="0.962"/>
    </projection>
    <projection id="NCXLS_MI_I2L" presynapticPopulation="MI" postsynapticPopulation="I2L" synapse="Acetylcholine">
      <connection id="36" preCellId="../MI/1/MI" postCellId="../I2L/0/I2L" preSegmentId="6" postSegmentId="8" preFractionAlong="0.858" postFractionAlong="0.031"/>
    </projection>
    <projection id="NCXLS_MI_M2R" presynapticPopulation="MI" postsynapticPopulation="M2R" synapse="Glutamate">
      <connection id="39" preCellId="../MI/1/MI" postCellId="../M2R/0/M2R" preSegmentId="6" postSegmentId="1" preFractionAlong="0.858" postFractionAlong="0.469"/>
    </projection>
    <projection id="NCXLS_MI_NSMR" presynapticPopulation="MI" postsynapticPopulation="NSMR" synapse="Acetylcholine">
      <connection id="43" preCellId="../MI/1/MI" postCellId="../NSMR/0/NSMR" preSegmentId="6" postSegmentId="1" preFractionAlong="0.858" postFractionAlong="0.995"/>
      <connection id="44" preCellId="../MI/1/MI" postCellId="../NSMR/1/NSMR" preSegmentId="6" postSegmentId="4" preFractionAlong="0.858" postFractionAlong="0.183"/>
    </projection>
    <projection id="NCXLS_NSMR_I4" presynapticPopulation="NSMR" postsynapticPopulation="I4" synapse="Serotonin_Glutamate">
      <connection id="46" preCellId="../NSMR/1/NSMR" postCellId="../I4/0/I4" preSegmentId="4" postSegmentId="10" preFractionAlong="0.385" postFractionAlong="0.486"/>
      <connection id="47" preCellId="../NSMR/1/NSMR" postCellId="../I4/2/I4" preSegmentId="4" postSegmentId="9" preFractionAlong="0.385" postFractionAlong="0.52"/>
    </projection>
    <projection id="NCXLS_NSMR_M1" presynapticPopulation="NSMR" postsynapticPopulation="M1" synapse="Serotonin_Glutamate">
      <connection id="48" preCellId="../NSMR/1/NSMR" postCellId="../M1/2/M1" preSegmentId="4" postSegmentId="10" preFractionAlong="0.385" postFractionAlong="0.654"/>
    </projection>
  </network>
</neuroml>
