<?xml version='1.0' encoding='UTF-8'?>
<neuroml xmlns="http://www.neuroml.org/schema/neuroml2" xmlns:xsi="http://www.w3.org/2001/XMLSchema-instance" xsi:schemaLocation="http://www.neuroml.org/schema/neuroml2 https://raw.githubusercontent.com/NeuroML/NeuroML2/development/Schemas/NeuroML2/NeuroML_v2beta4.xsd" id="gvft_network_bio_prior_lamW_0.367_DF_0.013_t70.net">
  <notes>NeuroML2 network generated from GVFT simulation on 2025-05-04 10:22:59
</notes>
  <include href="I1L.cell.nml"/>
  <include href="I1R.cell.nml"/>
  <include href="I2L.cell.nml"/>
  <include href="I2R.cell.nml"/>
  <include href="I3.cell.nml"/>
  <include href="I4.cell.nml"/>
  <include href="I5.cell.nml"/>
  <include href="I6.cell.nml"/>
  <include href="M1.cell.nml"/>
  <include href="MI.cell.nml"/>
  <include href="NSML.cell.nml"/>
  <include href="NSMR.cell.nml"/>
  <include href="Acetylcholine.synapse.nml"/>
  <include href="Generic_GJ.nml"/>
  <include href="Glutamate.synapse.nml"/>
  <include href="Serotonin_Glutamate.synapse.nml"/>
  <network id="gvft_network_bio_prior_lamW_0.367_DF_0.013_t70.net" type="networkWithTemperature" temperature="20.0 degC">
    <population id="I1L" component="I1L" type="populationList" size="1">
      <instance id="0">
        <location x="-0.7386934757232666" y="0.5477386713027954" z="0.0"/>
      </instance>
    </population>
    <population id="I1R" component="I1R" type="populationList" size="1">
      <instance id="0">
        <location x="-0.7386934757232666" y="-0.015075387433171272" z="0.0"/>
      </instance>
    </population>
    <population id="I2L" component="I2L" type="populationList" size="1">
      <instance id="0">
        <location x="-0.8693467378616333" y="-0.24623116850852966" z="0.0"/>
      </instance>
    </population>
    <population id="I2R" component="I2R" type="populationList" size="1">
      <instance id="0">
        <location x="-0.9597989916801453" y="-0.20603016018867493" z="0.0"/>
      </instance>
    </population>
    <population id="I3" component="I3" type="populationList" size="1">
      <instance id="0">
        <location x="0.38693466782569885" y="-0.7487437129020691" z="0.0"/>
      </instance>
    </population>
    <population id="I4" component="I4" type="populationList" size="1">
      <instance id="0">
        <location x="0.5778894424438477" y="-0.9396985173225403" z="0.0"/>
      </instance>
    </population>
    <population id="I5" component="I5" type="populationList" size="1">
      <instance id="0">
        <location x="0.25628140568733215" y="-0.8190954923629761" z="0.0"/>
      </instance>
    </population>
    <population id="I6" component="I6" type="populationList" size="1">
      <instance id="0">
        <location x="0.6683416962623596" y="-0.7286432385444641" z="0.0"/>
      </instance>
    </population>
    <population id="M1" component="M1" type="populationList" size="4">
      <instance id="0">
        <location x="0.18592965602874756" y="-0.12562814354896545" z="0.0"/>
      </instance>
      <instance id="1">
        <location x="0.5577889680862427" y="0.005025136284530163" z="0.0"/>
      </instance>
      <instance id="2">
        <location x="0.26633167266845703" y="0.12562814354896545" z="0.0"/>
      </instance>
      <instance id="3">
        <location x="-0.929648220539093" y="0.7788944840431213" z="0.0"/>
      </instance>
    </population>
    <population id="MI" component="MI" type="populationList" size="3">
      <instance id="0">
        <location x="0.7487437129020691" y="-0.025125637650489807" z="0.0"/>
      </instance>
      <instance id="1">
        <location x="-0.13567839562892914" y="0.10552764683961868" z="0.0"/>
      </instance>
      <instance id="2">
        <location x="0.839195966720581" y="0.17587940394878387" z="0.0"/>
      </instance>
    </population>
    <population id="NSML" component="NSML" type="populationList" size="4">
      <instance id="0">
        <location x="-0.43718594312667847" y="-0.8693467378616333" z="0.0"/>
      </instance>
      <instance id="1">
        <location x="-0.4773869514465332" y="0.39698493480682373" z="0.0"/>
      </instance>
      <instance id="2">
        <location x="0.3668341636657715" y="0.7587939500808716" z="0.0"/>
      </instance>
      <instance id="3">
        <location x="-0.1557788997888565" y="0.39698493480682373" z="0.0"/>
      </instance>
    </population>
    <population id="NSMR" component="NSMR" type="populationList" size="1">
      <instance id="0">
        <location x="0.7989949584007263" y="-0.43718594312667847" z="0.0"/>
      </instance>
    </population>
    <projection id="NCXLS_M1_NSML" presynapticPopulation="M1" postsynapticPopulation="NSML" synapse="Acetylcholine">
      <connection id="0" preCellId="../M1/0/M1" postCellId="../NSML/0/NSML" preSegmentId="1" postSegmentId="10" preFractionAlong="0.864" postFractionAlong="0.544"/>
      <connection id="70" preCellId="../M1/3/M1" postCellId="../NSML/1/NSML" preSegmentId="8" postSegmentId="5" preFractionAlong="0.283" postFractionAlong="0.554"/>
      <connection id="73" preCellId="../M1/3/M1" postCellId="../NSML/2/NSML" preSegmentId="8" postSegmentId="10" preFractionAlong="0.283" postFractionAlong="0.724"/>
      <connection id="74" preCellId="../M1/3/M1" postCellId="../NSML/3/NSML" preSegmentId="8" postSegmentId="7" preFractionAlong="0.283" postFractionAlong="0.399"/>
    </projection>
    <projection id="NCXLS_M1_I3" presynapticPopulation="M1" postsynapticPopulation="I3" synapse="Acetylcholine">
      <connection id="1" preCellId="../M1/0/M1" postCellId="../I3/0/I3" preSegmentId="1" postSegmentId="7" preFractionAlong="0.864" postFractionAlong="0.388"/>
      <connection id="9" preCellId="../M1/1/M1" postCellId="../I3/0/I3" preSegmentId="9" postSegmentId="7" preFractionAlong="0.979" postFractionAlong="0.388"/>
      <connection id="31" preCellId="../M1/2/M1" postCellId="../I3/0/I3" preSegmentId="1" postSegmentId="7" preFractionAlong="0.147" postFractionAlong="0.388"/>
      <connection id="61" preCellId="../M1/3/M1" postCellId="../I3/0/I3" preSegmentId="8" postSegmentId="7" preFractionAlong="0.283" postFractionAlong="0.388"/>
    </projection>
    <projection id="NCXLS_M1_I4" presynapticPopulation="M1" postsynapticPopulation="I4" synapse="Acetylcholine">
      <connection id="2" preCellId="../M1/0/M1" postCellId="../I4/0/I4" preSegmentId="1" postSegmentId="10" preFractionAlong="0.864" postFractionAlong="0.486"/>
      <connection id="10" preCellId="../M1/1/M1" postCellId="../I4/0/I4" preSegmentId="9" postSegmentId="10" preFractionAlong="0.979" postFractionAlong="0.486"/>
      <connection id="32" preCellId="../M1/2/M1" postCellId="../I4/0/I4" preSegmentId="1" postSegmentId="10" preFractionAlong="0.147" postFractionAlong="0.486"/>
      <connection id="62" preCellId="../M1/3/M1" postCellId="../I4/0/I4" preSegmentId="8" postSegmentId="10" preFractionAlong="0.283" postFractionAlong="0.486"/>
    </projection>
    <projection id="NCXLS_M1_MI" presynapticPopulation="M1" postsynapticPopulation="MI" synapse="Acetylcholine">
      <connection id="3" preCellId="../M1/0/M1" postCellId="../MI/0/MI" preSegmentId="1" postSegmentId="2" preFractionAlong="0.864" postFractionAlong="0.685"/>
      <connection id="11" preCellId="../M1/1/M1" postCellId="../MI/0/MI" preSegmentId="9" postSegmentId="2" preFractionAlong="0.979" postFractionAlong="0.685"/>
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    </projection>
    <projection id="NCXLS_M1_I5" presynapticPopulation="M1" postsynapticPopulation="I5" synapse="Acetylcholine">
      <connection id="4" preCellId="../M1/0/M1" postCellId="../I5/0/I5" preSegmentId="1" postSegmentId="9" preFractionAlong="0.864" postFractionAlong="0.972"/>
      <connection id="35" preCellId="../M1/2/M1" postCellId="../I5/0/I5" preSegmentId="1" postSegmentId="9" preFractionAlong="0.147" postFractionAlong="0.972"/>
      <connection id="68" preCellId="../M1/3/M1" postCellId="../I5/0/I5" preSegmentId="8" postSegmentId="9" preFractionAlong="0.283" postFractionAlong="0.972"/>
    </projection>
    <projection id="NCXLS_M1_I6" presynapticPopulation="M1" postsynapticPopulation="I6" synapse="Acetylcholine">
      <connection id="5" preCellId="../M1/0/M1" postCellId="../I6/0/I6" preSegmentId="1" postSegmentId="9" preFractionAlong="0.864" postFractionAlong="0.709"/>
      <connection id="12" preCellId="../M1/1/M1" postCellId="../I6/0/I6" preSegmentId="9" postSegmentId="9" preFractionAlong="0.979" postFractionAlong="0.709"/>
      <connection id="36" preCellId="../M1/2/M1" postCellId="../I6/0/I6" preSegmentId="1" postSegmentId="9" preFractionAlong="0.147" postFractionAlong="0.709"/>
      <connection id="69" preCellId="../M1/3/M1" postCellId="../I6/0/I6" preSegmentId="8" postSegmentId="9" preFractionAlong="0.283" postFractionAlong="0.709"/>
    </projection>
    <projection id="NCXLS_M1_NSMR" presynapticPopulation="M1" postsynapticPopulation="NSMR" synapse="Acetylcholine">
      <connection id="6" preCellId="../M1/0/M1" postCellId="../NSMR/0/NSMR" preSegmentId="1" postSegmentId="1" preFractionAlong="0.864" postFractionAlong="0.995"/>
      <connection id="13" preCellId="../M1/1/M1" postCellId="../NSMR/0/NSMR" preSegmentId="9" postSegmentId="1" preFractionAlong="0.979" postFractionAlong="0.995"/>
      <connection id="37" preCellId="../M1/2/M1" postCellId="../NSMR/0/NSMR" preSegmentId="1" postSegmentId="1" preFractionAlong="0.147" postFractionAlong="0.995"/>
      <connection id="71" preCellId="../M1/3/M1" postCellId="../NSMR/0/NSMR" preSegmentId="8" postSegmentId="1" preFractionAlong="0.283" postFractionAlong="0.995"/>
    </projection>
    <projection id="NCXLS_I3_I4" presynapticPopulation="I3" postsynapticPopulation="I4" synapse="Acetylcholine">
      <connection id="7" preCellId="../I3/0/I3" postCellId="../I4/0/I4" preSegmentId="2" postSegmentId="10" preFractionAlong="0.583" postFractionAlong="0.486"/>
    </projection>
    <electricalProjection id="NCXLS_I3_I5_GJ" presynapticPopulation="I3" postsynapticPopulation="I5">
      <electricalConnection id="8" preCell="0" postCell="0" synapse="Generic_GJ" preSegment="2" postSegment="9" preFractionAlong="0.583" postFractionAlong="0.972"/>
    </electricalProjection>
    <projection id="NCXLS_I1L_M1" presynapticPopulation="I1L" postsynapticPopulation="M1" synapse="Acetylcholine">
      <connection id="15" preCellId="../I1L/0/I1L" postCellId="../M1/3/M1" preSegmentId="6" postSegmentId="2" preFractionAlong="0.644" postFractionAlong="0.28"/>
    </projection>
    <projection id="NCXLS_MI_NSML" presynapticPopulation="MI" postsynapticPopulation="NSML" synapse="Acetylcholine">
      <connection id="16" preCellId="../MI/0/MI" postCellId="../NSML/0/NSML" preSegmentId="5" postSegmentId="10" preFractionAlong="0.5" postFractionAlong="0.544"/>
      <connection id="25" preCellId="../MI/0/MI" postCellId="../NSML/1/NSML" preSegmentId="5" postSegmentId="5" preFractionAlong="0.5" postFractionAlong="0.554"/>
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    </projection>
    <projection id="NCXLS_MI_M1" presynapticPopulation="MI" postsynapticPopulation="M1" synapse="Acetylcholine">
      <connection id="17" preCellId="../MI/0/MI" postCellId="../M1/0/M1" preSegmentId="5" postSegmentId="8" preFractionAlong="0.5" postFractionAlong="0.291"/>
      <connection id="21" preCellId="../MI/0/MI" postCellId="../M1/2/M1" preSegmentId="5" postSegmentId="10" preFractionAlong="0.5" postFractionAlong="0.654"/>
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    </projection>
    <projection id="NCXLS_MI_I3" presynapticPopulation="MI" postsynapticPopulation="I3" synapse="Acetylcholine">
      <connection id="18" preCellId="../MI/0/MI" postCellId="../I3/0/I3" preSegmentId="5" postSegmentId="7" preFractionAlong="0.5" postFractionAlong="0.388"/>
    </projection>
    <electricalProjection id="NCXLS_MI_M1_GJ" presynapticPopulation="MI" postsynapticPopulation="M1">
      <electricalConnection id="19" preCell="0" postCell="1" synapse="Generic_GJ" preSegment="5" postSegment="7" preFractionAlong="0.5" postFractionAlong="0.891"/>
      <electricalConnection id="83" preCell="2" postCell="3" synapse="Generic_GJ" preSegment="3" postSegment="2" preFractionAlong="0.207" postFractionAlong="0.28"/>
    </electricalProjection>
    <projection id="NCXLS_MI_I1L" presynapticPopulation="MI" postsynapticPopulation="I1L" synapse="Acetylcholine">
      <connection id="20" preCellId="../MI/0/MI" postCellId="../I1L/0/I1L" preSegmentId="5" postSegmentId="2" preFractionAlong="0.5" postFractionAlong="0.217"/>
      <connection id="40" preCellId="../MI/1/MI" postCellId="../I1L/0/I1L" preSegmentId="6" postSegmentId="2" preFractionAlong="0.858" postFractionAlong="0.217"/>
      <connection id="76" preCellId="../MI/2/MI" postCellId="../I1L/0/I1L" preSegmentId="3" postSegmentId="2" preFractionAlong="0.207" postFractionAlong="0.217"/>
    </projection>
    <electricalProjection id="NCXLS_MI_MI_GJ" presynapticPopulation="MI" postsynapticPopulation="MI">
      <electricalConnection id="22" preCell="0" postCell="1" synapse="Generic_GJ" preSegment="5" postSegment="3" preFractionAlong="0.5" postFractionAlong="0.384"/>
    </electricalProjection>
    <projection id="NCXLS_MI_I1R" presynapticPopulation="MI" postsynapticPopulation="I1R" synapse="Acetylcholine">
      <connection id="23" preCellId="../MI/0/MI" postCellId="../I1R/0/I1R" preSegmentId="5" postSegmentId="6" preFractionAlong="0.5" postFractionAlong="0.459"/>
      <connection id="41" preCellId="../MI/1/MI" postCellId="../I1R/0/I1R" preSegmentId="6" postSegmentId="6" preFractionAlong="0.858" postFractionAlong="0.459"/>
      <connection id="79" preCellId="../MI/2/MI" postCellId="../I1R/0/I1R" preSegmentId="3" postSegmentId="6" preFractionAlong="0.207" postFractionAlong="0.459"/>
    </projection>
    <projection id="NCXLS_MI_I5" presynapticPopulation="MI" postsynapticPopulation="I5" synapse="Acetylcholine">
      <connection id="24" preCellId="../MI/0/MI" postCellId="../I5/0/I5" preSegmentId="5" postSegmentId="9" preFractionAlong="0.5" postFractionAlong="0.972"/>
    </projection>
    <projection id="NCXLS_MI_I2L" presynapticPopulation="MI" postsynapticPopulation="I2L" synapse="Acetylcholine">
      <connection id="26" preCellId="../MI/0/MI" postCellId="../I2L/0/I2L" preSegmentId="5" postSegmentId="8" preFractionAlong="0.5" postFractionAlong="0.031"/>
      <connection id="43" preCellId="../MI/1/MI" postCellId="../I2L/0/I2L" preSegmentId="6" postSegmentId="8" preFractionAlong="0.858" postFractionAlong="0.031"/>
      <connection id="81" preCellId="../MI/2/MI" postCellId="../I2L/0/I2L" preSegmentId="3" postSegmentId="8" preFractionAlong="0.207" postFractionAlong="0.031"/>
    </projection>
    <projection id="NCXLS_MI_I2R" presynapticPopulation="MI" postsynapticPopulation="I2R" synapse="Acetylcholine">
      <connection id="27" preCellId="../MI/0/MI" postCellId="../I2R/0/I2R" preSegmentId="5" postSegmentId="9" preFractionAlong="0.5" postFractionAlong="0.207"/>
      <connection id="44" preCellId="../MI/1/MI" postCellId="../I2R/0/I2R" preSegmentId="6" postSegmentId="9" preFractionAlong="0.858" postFractionAlong="0.207"/>
      <connection id="82" preCellId="../MI/2/MI" postCellId="../I2R/0/I2R" preSegmentId="3" postSegmentId="9" preFractionAlong="0.207" postFractionAlong="0.207"/>
    </projection>
    <projection id="NCXLS_M1_M1" presynapticPopulation="M1" postsynapticPopulation="M1" synapse="Acetylcholine">
      <connection id="33" preCellId="../M1/2/M1" postCellId="../M1/1/M1" preSegmentId="1" postSegmentId="7" preFractionAlong="0.147" postFractionAlong="0.891"/>
      <connection id="66" preCellId="../M1/3/M1" postCellId="../M1/2/M1" preSegmentId="8" postSegmentId="10" preFractionAlong="0.283" postFractionAlong="0.654"/>
    </projection>
    <projection id="NCXLS_M1_MI" presynapticPopulation="M1" postsynapticPopulation="MI" synapse="Glutamate">
      <connection id="34" preCellId="../M1/2/M1" postCellId="../MI/0/MI" preSegmentId="1" postSegmentId="2" preFractionAlong="0.147" postFractionAlong="0.685"/>
      <connection id="38" preCellId="../M1/2/M1" postCellId="../MI/2/MI" preSegmentId="1" postSegmentId="9" preFractionAlong="0.147" postFractionAlong="0.846"/>
      <connection id="65" preCellId="../M1/3/M1" postCellId="../MI/0/MI" preSegmentId="8" postSegmentId="2" preFractionAlong="0.283" postFractionAlong="0.685"/>
    </projection>
    <projection id="NCXLS_I1R_I2L" presynapticPopulation="I1R" postsynapticPopulation="I2L" synapse="Glutamate">
      <connection id="46" preCellId="../I1R/0/I1R" postCellId="../I2L/0/I2L" preSegmentId="3" postSegmentId="8" preFractionAlong="0.075" postFractionAlong="0.031"/>
    </projection>
    <projection id="NCXLS_I1R_I2R" presynapticPopulation="I1R" postsynapticPopulation="I2R" synapse="Acetylcholine">
      <connection id="47" preCellId="../I1R/0/I1R" postCellId="../I2R/0/I2R" preSegmentId="3" postSegmentId="9" preFractionAlong="0.075" postFractionAlong="0.207"/>
    </projection>
    <projection id="NCXLS_I5_I4" presynapticPopulation="I5" postsynapticPopulation="I4" synapse="Acetylcholine">
      <connection id="48" preCellId="../I5/0/I5" postCellId="../I4/0/I4" preSegmentId="9" postSegmentId="10" preFractionAlong="0.954" postFractionAlong="0.486"/>
    </projection>
    <projection id="NCXLS_I6_I4" presynapticPopulation="I6" postsynapticPopulation="I4" synapse="Acetylcholine">
      <connection id="49" preCellId="../I6/0/I6" postCellId="../I4/0/I4" preSegmentId="8" postSegmentId="10" preFractionAlong="0.805" postFractionAlong="0.486"/>
    </projection>
    <electricalProjection id="NCXLS_I6_I5_GJ" presynapticPopulation="I6" postsynapticPopulation="I5">
      <electricalConnection id="50" preCell="0" postCell="0" synapse="Generic_GJ" preSegment="8" postSegment="9" preFractionAlong="0.805" postFractionAlong="0.972"/>
    </electricalProjection>
    <projection id="NCXLS_NSML_I1L" presynapticPopulation="NSML" postsynapticPopulation="I1L" synapse="Serotonin_Glutamate">
      <connection id="51" preCellId="../NSML/1/NSML" postCellId="../I1L/0/I1L" preSegmentId="5" postSegmentId="2" preFractionAlong="0.574" postFractionAlong="0.217"/>
      <connection id="86" preCellId="../NSML/3/NSML" postCellId="../I1L/0/I1L" preSegmentId="2" postSegmentId="2" preFractionAlong="0.181" postFractionAlong="0.217"/>
    </projection>
    <projection id="NCXLS_NSML_I1R" presynapticPopulation="NSML" postsynapticPopulation="I1R" synapse="Serotonin_Glutamate">
      <connection id="52" preCellId="../NSML/1/NSML" postCellId="../I1R/0/I1R" preSegmentId="5" postSegmentId="6" preFractionAlong="0.574" postFractionAlong="0.459"/>
      <connection id="87" preCellId="../NSML/3/NSML" postCellId="../I1R/0/I1R" preSegmentId="2" postSegmentId="6" preFractionAlong="0.181" postFractionAlong="0.459"/>
    </projection>
    <projection id="NCXLS_NSML_I2R" presynapticPopulation="NSML" postsynapticPopulation="I2R" synapse="Serotonin_Glutamate">
      <connection id="53" preCellId="../NSML/1/NSML" postCellId="../I2R/0/I2R" preSegmentId="5" postSegmentId="9" preFractionAlong="0.574" postFractionAlong="0.207"/>
      <connection id="90" preCellId="../NSML/3/NSML" postCellId="../I2R/0/I2R" preSegmentId="2" postSegmentId="9" preFractionAlong="0.181" postFractionAlong="0.207"/>
    </projection>
    <projection id="NCXLS_NSML_M1" presynapticPopulation="NSML" postsynapticPopulation="M1" synapse="Serotonin_Glutamate">
      <connection id="54" preCellId="../NSML/1/NSML" postCellId="../M1/3/M1" preSegmentId="5" postSegmentId="2" preFractionAlong="0.574" postFractionAlong="0.28"/>
      <connection id="91" preCellId="../NSML/3/NSML" postCellId="../M1/3/M1" preSegmentId="2" postSegmentId="2" preFractionAlong="0.181" postFractionAlong="0.28"/>
    </projection>
    <projection id="NCXLS_NSMR_NSML" presynapticPopulation="NSMR" postsynapticPopulation="NSML" synapse="Serotonin_Glutamate">
      <connection id="55" preCellId="../NSMR/0/NSMR" postCellId="../NSML/0/NSML" preSegmentId="10" postSegmentId="10" preFractionAlong="0.339" postFractionAlong="0.544"/>
    </projection>
    <projection id="NCXLS_NSMR_I3" presynapticPopulation="NSMR" postsynapticPopulation="I3" synapse="Serotonin_Glutamate">
      <connection id="56" preCellId="../NSMR/0/NSMR" postCellId="../I3/0/I3" preSegmentId="10" postSegmentId="7" preFractionAlong="0.339" postFractionAlong="0.388"/>
    </projection>
    <projection id="NCXLS_NSMR_I4" presynapticPopulation="NSMR" postsynapticPopulation="I4" synapse="Serotonin_Glutamate">
      <connection id="57" preCellId="../NSMR/0/NSMR" postCellId="../I4/0/I4" preSegmentId="10" postSegmentId="10" preFractionAlong="0.339" postFractionAlong="0.486"/>
    </projection>
    <projection id="NCXLS_NSMR_I5" presynapticPopulation="NSMR" postsynapticPopulation="I5" synapse="Serotonin_Glutamate">
      <connection id="58" preCellId="../NSMR/0/NSMR" postCellId="../I5/0/I5" preSegmentId="10" postSegmentId="9" preFractionAlong="0.339" postFractionAlong="0.972"/>
    </projection>
    <projection id="NCXLS_NSMR_I6" presynapticPopulation="NSMR" postsynapticPopulation="I6" synapse="Serotonin_Glutamate">
      <connection id="59" preCellId="../NSMR/0/NSMR" postCellId="../I6/0/I6" preSegmentId="10" postSegmentId="9" preFractionAlong="0.339" postFractionAlong="0.709"/>
    </projection>
    <electricalProjection id="NCXLS_M1_M1_GJ" presynapticPopulation="M1" postsynapticPopulation="M1">
      <electricalConnection id="60" preCell="3" postCell="0" synapse="Generic_GJ" preSegment="8" postSegment="8" preFractionAlong="0.283" postFractionAlong="0.291"/>
      <electricalConnection id="63" preCell="3" postCell="1" synapse="Generic_GJ" preSegment="8" postSegment="7" preFractionAlong="0.283" postFractionAlong="0.891"/>
    </electricalProjection>
    <projection id="NCXLS_M1_I1L" presynapticPopulation="M1" postsynapticPopulation="I1L" synapse="Acetylcholine">
      <connection id="64" preCellId="../M1/3/M1" postCellId="../I1L/0/I1L" preSegmentId="8" postSegmentId="2" preFractionAlong="0.283" postFractionAlong="0.217"/>
    </projection>
    <projection id="NCXLS_MI_M1" presynapticPopulation="MI" postsynapticPopulation="M1" synapse="Glutamate">
      <connection id="77" preCellId="../MI/2/MI" postCellId="../M1/2/M1" preSegmentId="3" postSegmentId="10" preFractionAlong="0.207" postFractionAlong="0.654"/>
    </projection>
    <projection id="NCXLS_MI_MI" presynapticPopulation="MI" postsynapticPopulation="MI" synapse="Glutamate">
      <connection id="78" preCellId="../MI/2/MI" postCellId="../MI/1/MI" preSegmentId="3" postSegmentId="3" preFractionAlong="0.207" postFractionAlong="0.384"/>
    </projection>
    <projection id="NCXLS_NSML_NSML" presynapticPopulation="NSML" postsynapticPopulation="NSML" synapse="Serotonin_Glutamate">
      <connection id="88" preCellId="../NSML/3/NSML" postCellId="../NSML/1/NSML" preSegmentId="2" postSegmentId="5" preFractionAlong="0.181" postFractionAlong="0.554"/>
    </projection>
    <projection id="NCXLS_NSML_I2L" presynapticPopulation="NSML" postsynapticPopulation="I2L" synapse="Serotonin_Glutamate">
      <connection id="89" preCellId="../NSML/3/NSML" postCellId="../I2L/0/I2L" preSegmentId="2" postSegmentId="8" preFractionAlong="0.181" postFractionAlong="0.031"/>
    </projection>
  </network>
</neuroml>
