<?xml version='1.0' encoding='UTF-8'?>
<neuroml xmlns="http://www.neuroml.org/schema/neuroml2" xmlns:xsi="http://www.w3.org/2001/XMLSchema-instance" xsi:schemaLocation="http://www.neuroml.org/schema/neuroml2 https://raw.githubusercontent.com/NeuroML/NeuroML2/development/Schemas/NeuroML2/NeuroML_v2beta4.xsd" id="gvft_network_bio_prior_lamW_0.367_DF_0.033_t40.net">
  <notes>NeuroML2 network generated from GVFT simulation on 2025-05-04 11:17:29
</notes>
  <include href="I1L.cell.nml"/>
  <include href="I1R.cell.nml"/>
  <include href="I2L.cell.nml"/>
  <include href="I2R.cell.nml"/>
  <include href="M1.cell.nml"/>
  <include href="M2L.cell.nml"/>
  <include href="M2R.cell.nml"/>
  <include href="M3L.cell.nml"/>
  <include href="NSML.cell.nml"/>
  <include href="NSMR.cell.nml"/>
  <include href="Acetylcholine.synapse.nml"/>
  <include href="Generic_GJ.nml"/>
  <include href="Glutamate.synapse.nml"/>
  <include href="Serotonin_Glutamate.synapse.nml"/>
  <network id="gvft_network_bio_prior_lamW_0.367_DF_0.033_t40.net" type="networkWithTemperature" temperature="20.0 degC">
    <population id="I1L" component="I1L" type="populationList" size="5">
      <instance id="0">
        <location x="0.6482412219047546" y="0.6180904507637024" z="0.0"/>
      </instance>
      <instance id="1">
        <location x="0.5376884341239929" y="0.7286432385444641" z="0.0"/>
      </instance>
      <instance id="2">
        <location x="-0.11557789891958237" y="0.9396985173225403" z="0.0"/>
      </instance>
      <instance id="3">
        <location x="0.37688443064689636" y="-0.5075377225875854" z="0.0"/>
      </instance>
      <instance id="4">
        <location x="0.24623116850852966" y="0.9396985173225403" z="0.0"/>
      </instance>
    </population>
    <population id="I1R" component="I1R" type="populationList" size="1">
      <instance id="0">
        <location x="-0.43718594312667847" y="-0.8592965006828308" z="0.0"/>
      </instance>
    </population>
    <population id="I2L" component="I2L" type="populationList" size="1">
      <instance id="0">
        <location x="-0.5477386713027954" y="-0.9195979833602905" z="0.0"/>
      </instance>
    </population>
    <population id="I2R" component="I2R" type="populationList" size="1">
      <instance id="0">
        <location x="-0.5276381969451904" y="0.8190954923629761" z="0.0"/>
      </instance>
    </population>
    <population id="M1" component="M1" type="populationList" size="1">
      <instance id="0">
        <location x="-0.13567839562892914" y="-0.5175879597663879" z="0.0"/>
      </instance>
    </population>
    <population id="M2L" component="M2L" type="populationList" size="1">
      <instance id="0">
        <location x="-0.9497487545013428" y="0.6783919334411621" z="0.0"/>
      </instance>
    </population>
    <population id="M2R" component="M2R" type="populationList" size="1">
      <instance id="0">
        <location x="-0.4271356761455536" y="0.31658291816711426" z="0.0"/>
      </instance>
    </population>
    <population id="M3L" component="M3L" type="populationList" size="4">
      <instance id="0">
        <location x="-0.25628140568733215" y="-0.5778894424438477" z="0.0"/>
      </instance>
      <instance id="1">
        <location x="0.8492462038993835" y="0.015075387433171272" z="0.0"/>
      </instance>
      <instance id="2">
        <location x="-0.9899497628211975" y="-0.6482412219047546" z="0.0"/>
      </instance>
      <instance id="3">
        <location x="-0.30653268098831177" y="-0.03517588973045349" z="0.0"/>
      </instance>
    </population>
    <population id="NSML" component="NSML" type="populationList" size="3">
      <instance id="0">
        <location x="-0.2964824140071869" y="0.8090452551841736" z="0.0"/>
      </instance>
      <instance id="1">
        <location x="0.7889447212219238" y="0.1557788997888565" z="0.0"/>
      </instance>
      <instance id="2">
        <location x="-0.356783926486969" y="0.7788944840431213" z="0.0"/>
      </instance>
    </population>
    <population id="NSMR" component="NSMR" type="populationList" size="2">
      <instance id="0">
        <location x="0.9698492288589478" y="0.39698493480682373" z="0.0"/>
      </instance>
      <instance id="1">
        <location x="-0.8492462038993835" y="-0.025125637650489807" z="0.0"/>
      </instance>
    </population>
    <projection id="NCXLS_NSMR_I1R" presynapticPopulation="NSMR" postsynapticPopulation="I1R" synapse="Serotonin_Glutamate">
      <connection id="0" preCellId="../NSMR/1/NSMR" postCellId="../I1R/0/I1R" preSegmentId="5" postSegmentId="4" preFractionAlong="0.883349701022104" postFractionAlong="0.4957170100782755"/>
    </projection>
    <projection id="NCXLS_NSMR_M3L" presynapticPopulation="NSMR" postsynapticPopulation="M3L" synapse="Serotonin_Glutamate">
      <connection id="1" preCellId="../NSMR/1/NSMR" postCellId="../M3L/2/M3L" preSegmentId="1" postSegmentId="8" preFractionAlong="0.7536661379095813" postFractionAlong="0.22006625478469177"/>
    </projection>
    <projection id="NCXLS_NSMR_I2L" presynapticPopulation="NSMR" postsynapticPopulation="I2L" synapse="Serotonin_Glutamate">
      <connection id="2" preCellId="../NSMR/1/NSMR" postCellId="../I2L/0/I2L" preSegmentId="1" postSegmentId="6" preFractionAlong="0.8657272371067937" postFractionAlong="0.7244223402693151"/>
    </projection>
    <projection id="NCXLS_M1_I1L" presynapticPopulation="M1" postsynapticPopulation="I1L" synapse="Acetylcholine">
      <connection id="3" preCellId="../M1/0/M1" postCellId="../I1L/0/I1L" preSegmentId="1" postSegmentId="1" preFractionAlong="0.2147445024083574" postFractionAlong="0.3559683908322365"/>
      <connection id="8" preCellId="../M1/0/M1" postCellId="../I1L/1/I1L" preSegmentId="7" postSegmentId="6" preFractionAlong="0.4318436923120297" postFractionAlong="0.05393258284087121"/>
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    </projection>
    <electricalProjection id="NCXLS_M1_NSMR_GJ" presynapticPopulation="M1" postsynapticPopulation="NSMR">
      <electricalConnection id="4" preCell="0" postCell="1" synapse="Generic_GJ" preSegment="4" postSegment="3" preFractionAlong="0.17608928794385392" postFractionAlong="0.7433329135656567"/>
      <electricalConnection id="10" preCell="0" postCell="0" synapse="Generic_GJ" preSegment="3" postSegment="5" preFractionAlong="0.12357249059949049" postFractionAlong="0.10102824649125852"/>
    </electricalProjection>
    <projection id="NCXLS_M1_NSML" presynapticPopulation="M1" postsynapticPopulation="NSML" synapse="Acetylcholine">
      <connection id="5" preCellId="../M1/0/M1" postCellId="../NSML/0/NSML" preSegmentId="8" postSegmentId="8" preFractionAlong="0.4541674701677638" postFractionAlong="0.38585944683610907"/>
      <connection id="7" preCellId="../M1/0/M1" postCellId="../NSML/2/NSML" preSegmentId="8" postSegmentId="5" preFractionAlong="0.5907537213530648" postFractionAlong="0.5993635517382656"/>
    </projection>
    <projection id="NCXLS_M1_M3L" presynapticPopulation="M1" postsynapticPopulation="M3L" synapse="Acetylcholine">
      <connection id="6" preCellId="../M1/0/M1" postCellId="../M3L/1/M3L" preSegmentId="7" postSegmentId="6" preFractionAlong="0.3910922441482205" postFractionAlong="0.0799824827967548"/>
      <connection id="17" preCellId="../M1/0/M1" postCellId="../M3L/3/M3L" preSegmentId="6" postSegmentId="1" preFractionAlong="0.1701526411445169" postFractionAlong="0.2547205004575489"/>
    </projection>
    <projection id="NCXLS_M1_M2L" presynapticPopulation="M1" postsynapticPopulation="M2L" synapse="Glutamate">
      <connection id="11" preCellId="../M1/0/M1" postCellId="../M2L/0/M2L" preSegmentId="2" postSegmentId="4" preFractionAlong="0.19648265240291862" postFractionAlong="0.25143015218746345"/>
    </projection>
    <electricalProjection id="NCXLS_M1_NSML_GJ" presynapticPopulation="M1" postsynapticPopulation="NSML">
      <electricalConnection id="14" preCell="0" postCell="1" synapse="Generic_GJ" preSegment="8" postSegment="7" preFractionAlong="0.019610532474253595" postFractionAlong="0.6713680088967957"/>
    </electricalProjection>
    <projection id="NCXLS_M1_M2R" presynapticPopulation="M1" postsynapticPopulation="M2R" synapse="Glutamate">
      <connection id="15" preCellId="../M1/0/M1" postCellId="../M2R/0/M2R" preSegmentId="4" postSegmentId="7" preFractionAlong="0.8986389283011033" postFractionAlong="0.16439268432841414"/>
    </projection>
    <projection id="NCXLS_M1_I2R" presynapticPopulation="M1" postsynapticPopulation="I2R" synapse="Acetylcholine">
      <connection id="16" preCellId="../M1/0/M1" postCellId="../I2R/0/I2R" preSegmentId="6" postSegmentId="5" preFractionAlong="0.7919610144667157" postFractionAlong="0.12718118921688693"/>
    </projection>
    <electricalProjection id="NCXLS_M3L_NSMR_GJ" presynapticPopulation="M3L" postsynapticPopulation="NSMR">
      <electricalConnection id="18" preCell="0" postCell="1" synapse="Generic_GJ" preSegment="7" postSegment="3" preFractionAlong="0.5562363940257727" postFractionAlong="0.4114109317604655"/>
      <electricalConnection id="26" preCell="1" postCell="1" synapse="Generic_GJ" preSegment="8" postSegment="8" preFractionAlong="0.13696663454423585" postFractionAlong="0.5067700407177881"/>
      <electricalConnection id="43" preCell="2" postCell="1" synapse="Generic_GJ" preSegment="3" postSegment="2" preFractionAlong="0.6571976616400622" postFractionAlong="0.43902924398044796"/>
    </electricalProjection>
    <projection id="NCXLS_M3L_I1R" presynapticPopulation="M3L" postsynapticPopulation="I1R" synapse="Acetylcholine">
      <connection id="19" preCellId="../M3L/0/M3L" postCellId="../I1R/0/I1R" preSegmentId="7" postSegmentId="6" preFractionAlong="0.12637014194700513" postFractionAlong="0.9736921348501988"/>
      <connection id="30" preCellId="../M3L/1/M3L" postCellId="../I1R/0/I1R" preSegmentId="5" postSegmentId="1" preFractionAlong="0.040509172941321836" postFractionAlong="0.12291118254224498"/>
      <connection id="89" preCellId="../M3L/3/M3L" postCellId="../I1R/0/I1R" preSegmentId="8" postSegmentId="4" preFractionAlong="0.6965071834768891" postFractionAlong="0.3760417911091565"/>
    </projection>
    <projection id="NCXLS_M3L_M3L" presynapticPopulation="M3L" postsynapticPopulation="M3L" synapse="Acetylcholine">
      <connection id="20" preCellId="../M3L/0/M3L" postCellId="../M3L/2/M3L" preSegmentId="1" postSegmentId="6" preFractionAlong="0.7728739363818531" postFractionAlong="0.3389699261728214"/>
      <connection id="31" preCellId="../M3L/1/M3L" postCellId="../M3L/2/M3L" preSegmentId="5" postSegmentId="7" preFractionAlong="0.40195192461521956" postFractionAlong="0.8457448783257632"/>
      <connection id="40" preCellId="../M3L/1/M3L" postCellId="../M3L/3/M3L" preSegmentId="5" postSegmentId="8" preFractionAlong="0.9201969860742739" postFractionAlong="0.049158523621427586"/>
      <connection id="87" preCellId="../M3L/3/M3L" postCellId="../M3L/0/M3L" preSegmentId="7" postSegmentId="8" preFractionAlong="0.33281836109167195" postFractionAlong="0.7548725289085606"/>
    </projection>
    <projection id="NCXLS_M3L_I2L" presynapticPopulation="M3L" postsynapticPopulation="I2L" synapse="Acetylcholine">
      <connection id="21" preCellId="../M3L/0/M3L" postCellId="../I2L/0/I2L" preSegmentId="2" postSegmentId="6" preFractionAlong="0.8578891852462399" postFractionAlong="0.3088608992364632"/>
      <connection id="33" preCellId="../M3L/1/M3L" postCellId="../I2L/0/I2L" preSegmentId="5" postSegmentId="7" preFractionAlong="0.3572419681701362" postFractionAlong="0.5770533417135443"/>
      <connection id="91" preCellId="../M3L/3/M3L" postCellId="../I2L/0/I2L" preSegmentId="1" postSegmentId="5" preFractionAlong="0.20371739327766658" postFractionAlong="0.3403848376775491"/>
    </projection>
    <projection id="NCXLS_NSML_I1L" presynapticPopulation="NSML" postsynapticPopulation="I1L" synapse="Serotonin_Glutamate">
      <connection id="22" preCellId="../NSML/0/NSML" postCellId="../I1L/0/I1L" preSegmentId="5" postSegmentId="5" preFractionAlong="0.5664436850866266" postFractionAlong="0.4717563093908743"/>
      <connection id="23" preCellId="../NSML/0/NSML" postCellId="../I1L/1/I1L" preSegmentId="5" postSegmentId="2" preFractionAlong="0.7322379140922876" postFractionAlong="0.08777291412344057"/>
      <connection id="24" preCellId="../NSML/0/NSML" postCellId="../I1L/2/I1L" preSegmentId="8" postSegmentId="2" preFractionAlong="0.8958121013985787" postFractionAlong="0.05778819701986415"/>
      <connection id="25" preCellId="../NSML/0/NSML" postCellId="../I1L/4/I1L" preSegmentId="6" postSegmentId="2" preFractionAlong="0.7166319367020314" postFractionAlong="0.43728164824461757"/>
    </projection>
    <electricalProjection id="NCXLS_M3L_M1_GJ" presynapticPopulation="M3L" postsynapticPopulation="M1">
      <electricalConnection id="27" preCell="1" postCell="0" synapse="Generic_GJ" preSegment="1" postSegment="2" preFractionAlong="0.4766204563105404" postFractionAlong="0.7636152989616567"/>
      <electricalConnection id="86" preCell="3" postCell="0" synapse="Generic_GJ" preSegment="1" postSegment="4" preFractionAlong="0.32874598834960655" postFractionAlong="0.720433702225778"/>
    </electricalProjection>
    <electricalProjection id="NCXLS_M3L_M3L_GJ" presynapticPopulation="M3L" postsynapticPopulation="M3L">
      <electricalConnection id="28" preCell="1" postCell="0" synapse="Generic_GJ" preSegment="8" postSegment="6" preFractionAlong="0.4807861681797273" postFractionAlong="0.9920159693968357"/>
      <electricalConnection id="88" preCell="3" postCell="1" synapse="Generic_GJ" preSegment="1" postSegment="8" preFractionAlong="0.6374453787179021" postFractionAlong="0.553427700787068"/>
      <electricalConnection id="90" preCell="3" postCell="2" synapse="Generic_GJ" preSegment="4" postSegment="8" preFractionAlong="0.8179847710772054" postFractionAlong="0.5876944695313122"/>
    </electricalProjection>
    <projection id="NCXLS_M3L_NSML" presynapticPopulation="M3L" postsynapticPopulation="NSML" synapse="Acetylcholine">
      <connection id="29" preCellId="../M3L/1/M3L" postCellId="../NSML/0/NSML" preSegmentId="6" postSegmentId="8" preFractionAlong="0.8413567713051986" postFractionAlong="0.41484760656054576"/>
      <connection id="32" preCellId="../M3L/1/M3L" postCellId="../NSML/2/NSML" preSegmentId="6" postSegmentId="4" preFractionAlong="0.6546211935154629" postFractionAlong="0.7093142948034834"/>
    </projection>
    <projection id="NCXLS_M3L_I1L" presynapticPopulation="M3L" postsynapticPopulation="I1L" synapse="Acetylcholine">
      <connection id="34" preCellId="../M3L/1/M3L" postCellId="../I1L/2/I1L" preSegmentId="3" postSegmentId="7" preFractionAlong="0.08387373855201208" postFractionAlong="0.9928039781860144"/>
      <connection id="36" preCellId="../M3L/1/M3L" postCellId="../I1L/3/I1L" preSegmentId="2" postSegmentId="8" preFractionAlong="0.6502969740735076" postFractionAlong="0.32900572966223285"/>
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    </projection>
    <electricalProjection id="NCXLS_M3L_M2L_GJ" presynapticPopulation="M3L" postsynapticPopulation="M2L">
      <electricalConnection id="35" preCell="1" postCell="0" synapse="Generic_GJ" preSegment="8" postSegment="8" preFractionAlong="0.07234838383605735" postFractionAlong="0.8785307492071559"/>
      <electricalConnection id="47" preCell="2" postCell="0" synapse="Generic_GJ" preSegment="4" postSegment="6" preFractionAlong="0.6220294792520092" postFractionAlong="0.5057422983554444"/>
    </electricalProjection>
    <electricalProjection id="NCXLS_M3L_M2R_GJ" presynapticPopulation="M3L" postsynapticPopulation="M2R">
      <electricalConnection id="38" preCell="1" postCell="0" synapse="Generic_GJ" preSegment="4" postSegment="8" preFractionAlong="0.7204160690923429" postFractionAlong="0.5115361942347918"/>
      <electricalConnection id="49" preCell="2" postCell="0" synapse="Generic_GJ" preSegment="6" postSegment="3" preFractionAlong="0.6952296557477357" postFractionAlong="0.4179992169203516"/>
    </electricalProjection>
    <projection id="NCXLS_M3L_I2R" presynapticPopulation="M3L" postsynapticPopulation="I2R" synapse="Acetylcholine">
      <connection id="39" preCellId="../M3L/1/M3L" postCellId="../I2R/0/I2R" preSegmentId="7" postSegmentId="5" preFractionAlong="0.04188039383877551" postFractionAlong="0.5030683226320282"/>
      <connection id="50" preCellId="../M3L/2/M3L" postCellId="../I2R/0/I2R" preSegmentId="3" postSegmentId="4" preFractionAlong="0.6490806020188844" postFractionAlong="0.35023661432707676"/>
    </projection>
    <projection id="NCXLS_I1R_M3L" presynapticPopulation="I1R" postsynapticPopulation="M3L" synapse="Acetylcholine">
      <connection id="41" preCellId="../I1R/0/I1R" postCellId="../M3L/2/M3L" preSegmentId="4" postSegmentId="5" preFractionAlong="0.853629928527957" postFractionAlong="0.24192772811923657"/>
    </projection>
    <electricalProjection id="NCXLS_I1R_I2L_GJ" presynapticPopulation="I1R" postsynapticPopulation="I2L">
      <electricalConnection id="42" preCell="0" postCell="0" synapse="Generic_GJ" preSegment="1" postSegment="2" preFractionAlong="0.019043409274291823" postFractionAlong="0.7324546291337297"/>
    </electricalProjection>
    <electricalProjection id="NCXLS_M3L_NSML_GJ" presynapticPopulation="M3L" postsynapticPopulation="NSML">
      <electricalConnection id="44" preCell="2" postCell="0" synapse="Generic_GJ" preSegment="5" postSegment="2" preFractionAlong="0.9201138133226288" postFractionAlong="0.4702962226915748"/>
      <electricalConnection id="45" preCell="2" postCell="2" synapse="Generic_GJ" preSegment="7" postSegment="1" preFractionAlong="0.6898210713287619" postFractionAlong="0.4818372535762582"/>
    </electricalProjection>
    <electricalProjection id="NCXLS_NSML_NSMR_GJ" presynapticPopulation="NSML" postsynapticPopulation="NSMR">
      <electricalConnection id="51" preCell="2" postCell="1" synapse="Generic_GJ" preSegment="3" postSegment="7" preFractionAlong="0.1339748667497812" postFractionAlong="0.6715118072810374"/>
    </electricalProjection>
    <electricalProjection id="NCXLS_NSML_M3L_GJ" presynapticPopulation="NSML" postsynapticPopulation="M3L">
      <electricalConnection id="52" preCell="2" postCell="2" synapse="Generic_GJ" preSegment="5" postSegment="7" preFractionAlong="0.9246511054051808" postFractionAlong="0.1125041332380915"/>
    </electricalProjection>
    <electricalProjection id="NCXLS_NSML_M2L_GJ" presynapticPopulation="NSML" postsynapticPopulation="M2L">
      <electricalConnection id="53" preCell="2" postCell="0" synapse="Generic_GJ" preSegment="3" postSegment="7" preFractionAlong="0.33300763305224423" postFractionAlong="0.3735662860390806"/>
    </electricalProjection>
    <projection id="NCXLS_NSML_I2R" presynapticPopulation="NSML" postsynapticPopulation="I2R" synapse="Serotonin_Glutamate">
      <connection id="54" preCellId="../NSML/2/NSML" postCellId="../I2R/0/I2R" preSegmentId="5" postSegmentId="6" preFractionAlong="0.5851216609271247" postFractionAlong="0.4429140980419636"/>
    </projection>
    <projection id="NCXLS_M2L_I1L" presynapticPopulation="M2L" postsynapticPopulation="I1L" synapse="Acetylcholine">
      <connection id="55" preCellId="../M2L/0/M2L" postCellId="../I1L/0/I1L" preSegmentId="1" postSegmentId="1" preFractionAlong="0.31965206225530063" postFractionAlong="0.8104329135731705"/>
      <connection id="64" preCellId="../M2L/0/M2L" postCellId="../I1L/1/I1L" preSegmentId="2" postSegmentId="2" preFractionAlong="0.7322905674256961" postFractionAlong="0.7769463883925212"/>
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    </projection>
    <electricalProjection id="NCXLS_M2L_NSMR_GJ" presynapticPopulation="M2L" postsynapticPopulation="NSMR">
      <electricalConnection id="56" preCell="0" postCell="1" synapse="Generic_GJ" preSegment="2" postSegment="8" preFractionAlong="0.7248708535798805" postFractionAlong="0.6981169240835235"/>
      <electricalConnection id="67" preCell="0" postCell="0" synapse="Generic_GJ" preSegment="1" postSegment="5" preFractionAlong="0.5708530255443127" postFractionAlong="0.5270709385134583"/>
    </electricalProjection>
    <electricalProjection id="NCXLS_M2L_M1_GJ" presynapticPopulation="M2L" postsynapticPopulation="M1">
      <electricalConnection id="57" preCell="0" postCell="0" synapse="Generic_GJ" preSegment="7" postSegment="4" preFractionAlong="0.09966392207677588" postFractionAlong="0.272467184033096"/>
    </electricalProjection>
    <electricalProjection id="NCXLS_M2L_M3L_GJ" presynapticPopulation="M2L" postsynapticPopulation="M3L">
      <electricalConnection id="58" preCell="0" postCell="0" synapse="Generic_GJ" preSegment="2" postSegment="3" preFractionAlong="0.9804707977830711" postFractionAlong="0.49384701474156134"/>
      <electricalConnection id="60" preCell="0" postCell="1" synapse="Generic_GJ" preSegment="6" postSegment="1" preFractionAlong="0.07509364580531397" postFractionAlong="0.9433572987098816"/>
      <electricalConnection id="62" preCell="0" postCell="2" synapse="Generic_GJ" preSegment="4" postSegment="2" preFractionAlong="0.606719579782232" postFractionAlong="0.6267838170518446"/>
      <electricalConnection id="73" preCell="0" postCell="3" synapse="Generic_GJ" preSegment="8" postSegment="8" preFractionAlong="0.893534583498437" postFractionAlong="0.3892663968090483"/>
    </electricalProjection>
    <electricalProjection id="NCXLS_M2L_NSML_GJ" presynapticPopulation="M2L" postsynapticPopulation="NSML">
      <electricalConnection id="59" preCell="0" postCell="0" synapse="Generic_GJ" preSegment="7" postSegment="4" preFractionAlong="0.14004481213422904" postFractionAlong="0.32208057531626577"/>
      <electricalConnection id="63" preCell="0" postCell="2" synapse="Generic_GJ" preSegment="6" postSegment="5" preFractionAlong="0.6287213870255821" postFractionAlong="0.5537282313983612"/>
    </electricalProjection>
    <projection id="NCXLS_M2L_I1R" presynapticPopulation="M2L" postsynapticPopulation="I1R" synapse="Acetylcholine">
      <connection id="61" preCellId="../M2L/0/M2L" postCellId="../I1R/0/I1R" preSegmentId="1" postSegmentId="2" preFractionAlong="0.912584217924823" postFractionAlong="0.7805218027570218"/>
    </projection>
    <projection id="NCXLS_M2L_I2L" presynapticPopulation="M2L" postsynapticPopulation="I2L" synapse="Acetylcholine">
      <connection id="65" preCellId="../M2L/0/M2L" postCellId="../I2L/0/I2L" preSegmentId="6" postSegmentId="6" preFractionAlong="0.21563976272584917" postFractionAlong="0.08380415909506078"/>
    </projection>
    <projection id="NCXLS_M2L_NSML" presynapticPopulation="M2L" postsynapticPopulation="NSML" synapse="Acetylcholine">
      <connection id="70" preCellId="../M2L/0/M2L" postCellId="../NSML/1/NSML" preSegmentId="6" postSegmentId="1" preFractionAlong="0.12346357373073602" postFractionAlong="0.9800519429764848"/>
    </projection>
    <electricalProjection id="NCXLS_M2L_M2R_GJ" presynapticPopulation="M2L" postsynapticPopulation="M2R">
      <electricalConnection id="71" preCell="0" postCell="0" synapse="Generic_GJ" preSegment="4" postSegment="5" preFractionAlong="0.22742172872352928" postFractionAlong="0.17132454445437495"/>
    </electricalProjection>
    <projection id="NCXLS_M2L_I2R" presynapticPopulation="M2L" postsynapticPopulation="I2R" synapse="Acetylcholine">
      <connection id="72" preCellId="../M2L/0/M2L" postCellId="../I2R/0/I2R" preSegmentId="7" postSegmentId="6" preFractionAlong="0.6094452973272788" postFractionAlong="0.6435521229874175"/>
    </projection>
    <projection id="NCXLS_M2R_I1L" presynapticPopulation="M2R" postsynapticPopulation="I1L" synapse="Acetylcholine">
      <connection id="74" preCellId="../M2R/0/M2R" postCellId="../I1L/0/I1L" preSegmentId="2" postSegmentId="4" preFractionAlong="0.4623614472477392" postFractionAlong="0.39006606574762825"/>
      <connection id="80" preCellId="../M2R/0/M2R" postCellId="../I1L/1/I1L" preSegmentId="5" postSegmentId="8" preFractionAlong="0.6091953913933262" postFractionAlong="0.8531729786467225"/>
      <connection id="83" preCellId="../M2R/0/M2R" postCellId="../I1L/3/I1L" preSegmentId="5" postSegmentId="1" preFractionAlong="0.7362798987834215" postFractionAlong="0.5713395284530771"/>
    </projection>
    <electricalProjection id="NCXLS_M2R_M1_GJ" presynapticPopulation="M2R" postsynapticPopulation="M1">
      <electricalConnection id="75" preCell="0" postCell="0" synapse="Generic_GJ" preSegment="3" postSegment="6" preFractionAlong="0.9292609751978921" postFractionAlong="0.3034532164496062"/>
    </electricalProjection>
    <electricalProjection id="NCXLS_M2R_M3L_GJ" presynapticPopulation="M2R" postsynapticPopulation="M3L">
      <electricalConnection id="76" preCell="0" postCell="0" synapse="Generic_GJ" preSegment="7" postSegment="3" preFractionAlong="0.7815231295330671" postFractionAlong="0.9308076723447618"/>
      <electricalConnection id="79" preCell="0" postCell="2" synapse="Generic_GJ" preSegment="5" postSegment="5" preFractionAlong="0.32268370707782024" postFractionAlong="0.644906323864917"/>
      <electricalConnection id="85" preCell="0" postCell="3" synapse="Generic_GJ" preSegment="1" postSegment="6" preFractionAlong="0.07964512903476584" postFractionAlong="0.42960274344854676"/>
    </electricalProjection>
    <projection id="NCXLS_M2R_M3L" presynapticPopulation="M2R" postsynapticPopulation="M3L" synapse="Acetylcholine">
      <connection id="77" preCellId="../M2R/0/M2R" postCellId="../M3L/1/M3L" preSegmentId="4" postSegmentId="2" preFractionAlong="0.5769591501209791" postFractionAlong="0.27454458474044463"/>
    </projection>
    <projection id="NCXLS_M2R_I1R" presynapticPopulation="M2R" postsynapticPopulation="I1R" synapse="Acetylcholine">
      <connection id="78" preCellId="../M2R/0/M2R" postCellId="../I1R/0/I1R" preSegmentId="5" postSegmentId="7" preFractionAlong="0.005324190571064258" postFractionAlong="0.5648191628863961"/>
    </projection>
    <projection id="NCXLS_M2R_I2L" presynapticPopulation="M2R" postsynapticPopulation="I2L" synapse="Acetylcholine">
      <connection id="81" preCellId="../M2R/0/M2R" postCellId="../I2L/0/I2L" preSegmentId="4" postSegmentId="7" preFractionAlong="0.5195018547649811" postFractionAlong="0.450536539067076"/>
    </projection>
    <projection id="NCXLS_M2R_NSMR" presynapticPopulation="M2R" postsynapticPopulation="NSMR" synapse="Acetylcholine">
      <connection id="82" preCellId="../M2R/0/M2R" postCellId="../NSMR/0/NSMR" preSegmentId="2" postSegmentId="5" preFractionAlong="0.5568121431407401" postFractionAlong="0.6615243241461749"/>
    </projection>
    <projection id="NCXLS_M2R_NSML" presynapticPopulation="M2R" postsynapticPopulation="NSML" synapse="Acetylcholine">
      <connection id="84" preCellId="../M2R/0/M2R" postCellId="../NSML/1/NSML" preSegmentId="3" postSegmentId="7" preFractionAlong="0.11644552408471143" postFractionAlong="0.5964745775439524"/>
    </projection>
  </network>
</neuroml>
