<?xml version='1.0' encoding='UTF-8'?>
<neuroml xmlns="http://www.neuroml.org/schema/neuroml2" xmlns:xsi="http://www.w3.org/2001/XMLSchema-instance" xsi:schemaLocation="http://www.neuroml.org/schema/neuroml2 https://raw.githubusercontent.com/NeuroML/NeuroML2/development/Schemas/NeuroML2/NeuroML_v2beta4.xsd" id="gvft_network_bio_prior_lamW_0.500_DF_0.037_t30.net">
  <notes>NeuroML2 network generated from GVFT simulation on 2025-05-04 00:15:43
</notes>
  <include href="M3R.cell.nml"/>
  <include href="M1.cell.nml"/>
  <include href="I2L.cell.nml"/>
  <include href="MCL.cell.nml"/>
  <include href="I6.cell.nml"/>
  <include href="I5.cell.nml"/>
  <include href="M4.cell.nml"/>
  <include href="I1R.cell.nml"/>
  <include href="MCR.cell.nml"/>
  <include href="I3.cell.nml"/>
  <include href="M3L.cell.nml"/>
  <include href="NSML.cell.nml"/>
  <include href="M2L.cell.nml"/>
  <include href="M5.cell.nml"/>
  <include href="I4.cell.nml"/>
  <include href="MI.cell.nml"/>
  <include href="NSMR.cell.nml"/>
  <include href="I2R.cell.nml"/>
  <include href="M2R.cell.nml"/>
  <include href="I1L.cell.nml"/>
  <include href="Serotonin_Glutamate.synapse.nml"/>
  <include href="Acetylcholine.synapse.nml"/>
  <include href="Generic_GJ.synapse.nml"/>
  <include href="Glutamate.synapse.nml"/>
  <network id="gvft_network_bio_prior_lamW_0.500_DF_0.037_t30.net" type="networkWithTemperature" temperature="20.0 degC">
    <population id="M1" component="M1" type="populationList" size="1">
      <instance id="0">
        <location x="-0.095477395" y="0.08542714" z="0.0"/>
      </instance>
    </population>
    <population id="M2L" component="M2L" type="populationList" size="1">
      <instance id="0">
        <location x="0.49748746" y="0.47738695" z="0.0"/>
      </instance>
    </population>
    <population id="M2R" component="M2R" type="populationList" size="1">
      <instance id="0">
        <location x="0.20603016" y="-0.72864324" z="0.0"/>
      </instance>
    </population>
    <population id="M3L" component="M3L" type="populationList" size="1">
      <instance id="0">
        <location x="0.55778897" y="-0.9798995" z="0.0"/>
      </instance>
    </population>
    <population id="M3R" component="M3R" type="populationList" size="1">
      <instance id="0">
        <location x="-0.16582915" y="-0.7889447" z="0.0"/>
      </instance>
    </population>
    <population id="M4" component="M4" type="populationList" size="1">
      <instance id="0">
        <location x="0.44723618" y="-0.2763819" z="0.0"/>
      </instance>
    </population>
    <population id="M5" component="M5" type="populationList" size="1">
      <instance id="0">
        <location x="-0.04522614" y="-0.6080402" z="0.0"/>
      </instance>
    </population>
    <population id="I1L" component="I1L" type="populationList" size="1">
      <instance id="0">
        <location x="-0.015075387" y="-0.9798995" z="0.0"/>
      </instance>
    </population>
    <population id="I1R" component="I1R" type="populationList" size="1">
      <instance id="0">
        <location x="0.14572865" y="-0.8592965" z="0.0"/>
      </instance>
    </population>
    <population id="I2L" component="I2L" type="populationList" size="1">
      <instance id="0">
        <location x="0.6281407" y="0.6080402" z="0.0"/>
      </instance>
    </population>
    <population id="I2R" component="I2R" type="populationList" size="1">
      <instance id="0">
        <location x="0.41708544" y="0.30653268" z="0.0"/>
      </instance>
    </population>
    <population id="I3" component="I3" type="populationList" size="1">
      <instance id="0">
        <location x="0.28643218" y="-0.879397" z="0.0"/>
      </instance>
    </population>
    <population id="I4" component="I4" type="populationList" size="1">
      <instance id="0">
        <location x="-0.8492462" y="0.7889447" z="0.0"/>
      </instance>
    </population>
    <population id="I5" component="I5" type="populationList" size="1">
      <instance id="0">
        <location x="0.79899496" y="0.879397" z="0.0"/>
      </instance>
    </population>
    <population id="I6" component="I6" type="populationList" size="1">
      <instance id="0">
        <location x="-0.5678392" y="0.43718594" z="0.0"/>
      </instance>
    </population>
    <population id="MCL" component="MCL" type="populationList" size="1">
      <instance id="0">
        <location x="0.8291457" y="0.03517589" z="0.0"/>
      </instance>
    </population>
    <population id="MCR" component="MCR" type="populationList" size="1">
      <instance id="0">
        <location x="-0.0753769" y="-0.22613066" z="0.0"/>
      </instance>
    </population>
    <population id="MI" component="MI" type="populationList" size="1">
      <instance id="0">
        <location x="0.8492462" y="-0.33668342" z="0.0"/>
      </instance>
    </population>
    <population id="NSML" component="NSML" type="populationList" size="1">
      <instance id="0">
        <location x="-0.57788944" y="0.095477395" z="0.0"/>
      </instance>
    </population>
    <population id="NSMR" component="NSMR" type="populationList" size="1">
      <instance id="0">
        <location x="-0.12562814" y="0.5276382" z="0.0"/>
      </instance>
    </population>
    <projection id="NCXLS_MI_I3" presynapticPopulation="MI" postsynapticPopulation="I3" synapse="Acetylcholine">
      <connection id="0" preCellId="../MI/0/MI" postCellId="../I3/0/I3" preSegmentId="5" postSegmentId="1" preFractionAlong="0.674796429601556" postFractionAlong="0.7534497102421055"/>
    </projection>
    <projection id="NCXLS_MI_M3L" presynapticPopulation="MI" postsynapticPopulation="M3L" synapse="Serotonin_Glutamate">
      <connection id="1" preCellId="../MI/0/MI" postCellId="../M3L/0/M3L" preSegmentId="4" postSegmentId="3" preFractionAlong="0.14972556414619032" postFractionAlong="0.7826629268961081"/>
    </projection>
    <electricalProjection id="NCXLS_I3_I1L_GJ" presynapticPopulation="I3" postsynapticPopulation="I1L">
      <electricalConnection id="2" preCell="0" postCell="0" synapse="Generic_GJ" preSegment="8" postSegment="5" preFractionAlong="0.38075829071818335" postFractionAlong="0.33290084618688"/>
    </electricalProjection>
    <projection id="NCXLS_I3_M3L" presynapticPopulation="I3" postsynapticPopulation="M3L" synapse="Acetylcholine">
      <connection id="3" preCellId="../I3/0/I3" postCellId="../M3L/0/M3L" preSegmentId="7" postSegmentId="8" preFractionAlong="0.4814936785493943" postFractionAlong="0.16928621027278945"/>
    </projection>
    <projection id="NCXLS_MCL_I5" presynapticPopulation="MCL" postsynapticPopulation="I5" synapse="Acetylcholine">
      <connection id="4" preCellId="../MCL/0/MCL" postCellId="../I5/0/I5" preSegmentId="3" postSegmentId="7" preFractionAlong="0.5674392512644729" postFractionAlong="0.2849682775773116"/>
    </projection>
    <projection id="NCXLS_MCL_M2L" presynapticPopulation="MCL" postsynapticPopulation="M2L" synapse="Acetylcholine">
      <connection id="5" preCellId="../MCL/0/MCL" postCellId="../M2L/0/M2L" preSegmentId="8" postSegmentId="6" preFractionAlong="0.8156217710403867" postFractionAlong="0.1792098495610257"/>
    </projection>
    <projection id="NCXLS_MCL_I2L" presynapticPopulation="MCL" postsynapticPopulation="I2L" synapse="Acetylcholine">
      <connection id="6" preCellId="../MCL/0/MCL" postCellId="../I2L/0/I2L" preSegmentId="3" postSegmentId="1" preFractionAlong="0.3283577851330193" postFractionAlong="0.42437676701387816"/>
    </projection>
    <electricalProjection id="NCXLS_I1R_I1L_GJ" presynapticPopulation="I1R" postsynapticPopulation="I1L">
      <electricalConnection id="7" preCell="0" postCell="0" synapse="Generic_GJ" preSegment="6" postSegment="3" preFractionAlong="0.7245220023342929" postFractionAlong="0.3009865092617835"/>
    </electricalProjection>
    <projection id="NCXLS_M2R_MCL" presynapticPopulation="M2R" postsynapticPopulation="MCL" synapse="Acetylcholine">
      <connection id="8" preCellId="../M2R/0/M2R" postCellId="../MCL/0/MCL" preSegmentId="4" postSegmentId="2" preFractionAlong="0.15002417944651392" postFractionAlong="0.504802033207393"/>
    </projection>
    <projection id="NCXLS_M2R_I4" presynapticPopulation="M2R" postsynapticPopulation="I4" synapse="Acetylcholine">
      <connection id="9" preCellId="../M2R/0/M2R" postCellId="../I4/0/I4" preSegmentId="4" postSegmentId="7" preFractionAlong="0.030868132542461013" postFractionAlong="0.16566316747641274"/>
    </projection>
    <projection id="NCXLS_M2R_I5" presynapticPopulation="M2R" postsynapticPopulation="I5" synapse="Acetylcholine">
      <connection id="10" preCellId="../M2R/0/M2R" postCellId="../I5/0/I5" preSegmentId="9" postSegmentId="8" preFractionAlong="0.3163339091885522" postFractionAlong="0.09705413098337767"/>
    </projection>
    <projection id="NCXLS_M2R_I6" presynapticPopulation="M2R" postsynapticPopulation="I6" synapse="Acetylcholine">
      <connection id="11" preCellId="../M2R/0/M2R" postCellId="../I6/0/I6" preSegmentId="3" postSegmentId="5" preFractionAlong="0.12261922045743845" postFractionAlong="0.2961171306119089"/>
    </projection>
    <projection id="NCXLS_M2R_M3R" presynapticPopulation="M2R" postsynapticPopulation="M3R" synapse="Acetylcholine">
      <connection id="12" preCellId="../M2R/0/M2R" postCellId="../M3R/0/M3R" preSegmentId="7" postSegmentId="2" preFractionAlong="0.47095685239103" postFractionAlong="0.8008265764418772"/>
    </projection>
    <projection id="NCXLS_M2R_M5" presynapticPopulation="M2R" postsynapticPopulation="M5" synapse="Glutamate">
      <connection id="13" preCellId="../M2R/0/M2R" postCellId="../M5/0/M5" preSegmentId="5" postSegmentId="5" preFractionAlong="0.23902563680366917" postFractionAlong="0.36901469934594544"/>
    </projection>
    <projection id="NCXLS_M2R_M4" presynapticPopulation="M2R" postsynapticPopulation="M4" synapse="Glutamate">
      <connection id="14" preCellId="../M2R/0/M2R" postCellId="../M4/0/M4" preSegmentId="4" postSegmentId="2" preFractionAlong="0.5723545120276244" postFractionAlong="0.06963631597506059"/>
    </projection>
    <projection id="NCXLS_M2R_M2L" presynapticPopulation="M2R" postsynapticPopulation="M2L" synapse="Glutamate">
      <connection id="15" preCellId="../M2R/0/M2R" postCellId="../M2L/0/M2L" preSegmentId="1" postSegmentId="6" preFractionAlong="0.44031297575190564" postFractionAlong="0.6252083217429301"/>
    </projection>
    <projection id="NCXLS_M2R_I2L" presynapticPopulation="M2R" postsynapticPopulation="I2L" synapse="Acetylcholine">
      <connection id="16" preCellId="../M2R/0/M2R" postCellId="../I2L/0/I2L" preSegmentId="3" postSegmentId="7" preFractionAlong="0.5469348524482108" postFractionAlong="0.48078141794911333"/>
    </projection>
    <projection id="NCXLS_M2R_I2R" presynapticPopulation="M2R" postsynapticPopulation="I2R" synapse="Acetylcholine">
      <connection id="17" preCellId="../M2R/0/M2R" postCellId="../I2R/0/I2R" preSegmentId="8" postSegmentId="8" preFractionAlong="0.7196895960453545" postFractionAlong="0.11154990734685732"/>
    </projection>
    <projection id="NCXLS_M2R_M1" presynapticPopulation="M2R" postsynapticPopulation="M1" synapse="Acetylcholine">
      <connection id="18" preCellId="../M2R/0/M2R" postCellId="../M1/0/M1" preSegmentId="7" postSegmentId="8" preFractionAlong="0.7871228629394419" postFractionAlong="0.8358513211799543"/>
    </projection>
    <projection id="NCXLS_M2R_NSML" presynapticPopulation="M2R" postsynapticPopulation="NSML" synapse="Acetylcholine">
      <connection id="19" preCellId="../M2R/0/M2R" postCellId="../NSML/0/NSML" preSegmentId="7" postSegmentId="6" preFractionAlong="0.4391157742826395" postFractionAlong="0.680199123483904"/>
    </projection>
    <projection id="NCXLS_M2R_MCR" presynapticPopulation="M2R" postsynapticPopulation="MCR" synapse="Acetylcholine">
      <connection id="20" preCellId="../M2R/0/M2R" postCellId="../MCR/0/MCR" preSegmentId="3" postSegmentId="4" preFractionAlong="0.6311742040090069" postFractionAlong="0.3163220570094807"/>
    </projection>
    <projection id="NCXLS_M2R_NSMR" presynapticPopulation="M2R" postsynapticPopulation="NSMR" synapse="Acetylcholine">
      <connection id="21" preCellId="../M2R/0/M2R" postCellId="../NSMR/0/NSMR" preSegmentId="6" postSegmentId="1" preFractionAlong="0.5779071425018961" postFractionAlong="0.017495547486169105"/>
    </projection>
    <projection id="NCXLS_M3R_I4" presynapticPopulation="M3R" postsynapticPopulation="I4" synapse="Acetylcholine">
      <connection id="22" preCellId="../M3R/0/M3R" postCellId="../I4/0/I4" preSegmentId="7" postSegmentId="7" preFractionAlong="0.4721967027581214" postFractionAlong="0.3935958952735982"/>
    </projection>
    <projection id="NCXLS_M3R_I5" presynapticPopulation="M3R" postsynapticPopulation="I5" synapse="Acetylcholine">
      <connection id="23" preCellId="../M3R/0/M3R" postCellId="../I5/0/I5" preSegmentId="6" postSegmentId="7" preFractionAlong="0.242180718172753" postFractionAlong="0.3273336257498298"/>
    </projection>
    <projection id="NCXLS_M3R_I6" presynapticPopulation="M3R" postsynapticPopulation="I6" synapse="Acetylcholine">
      <connection id="24" preCellId="../M3R/0/M3R" postCellId="../I6/0/I6" preSegmentId="4" postSegmentId="9" preFractionAlong="0.5274278111088635" postFractionAlong="0.3244534216181676"/>
    </projection>
    <projection id="NCXLS_M3R_M5" presynapticPopulation="M3R" postsynapticPopulation="M5" synapse="Glutamate">
      <connection id="25" preCellId="../M3R/0/M3R" postCellId="../M5/0/M5" preSegmentId="7" postSegmentId="9" preFractionAlong="0.13000695523276984" postFractionAlong="0.6941075322306689"/>
    </projection>
    <electricalProjection id="NCXLS_M3R_M2L_GJ" presynapticPopulation="M3R" postsynapticPopulation="M2L">
      <electricalConnection id="26" preCell="0" postCell="0" synapse="Generic_GJ" preSegment="7" postSegment="5" preFractionAlong="0.7256781334885183" postFractionAlong="0.0746132406573572"/>
    </electricalProjection>
    <projection id="NCXLS_M3R_I2L" presynapticPopulation="M3R" postsynapticPopulation="I2L" synapse="Acetylcholine">
      <connection id="27" preCellId="../M3R/0/M3R" postCellId="../I2L/0/I2L" preSegmentId="8" postSegmentId="9" preFractionAlong="0.0025535882680637334" postFractionAlong="0.5112067433256329"/>
    </projection>
    <projection id="NCXLS_M3R_I2R" presynapticPopulation="M3R" postsynapticPopulation="I2R" synapse="Acetylcholine">
      <connection id="28" preCellId="../M3R/0/M3R" postCellId="../I2R/0/I2R" preSegmentId="2" postSegmentId="3" preFractionAlong="0.8681466487286567" postFractionAlong="0.1043350528690824"/>
    </projection>
    <projection id="NCXLS_M3R_M1" presynapticPopulation="M3R" postsynapticPopulation="M1" synapse="Glutamate">
      <connection id="29" preCellId="../M3R/0/M3R" postCellId="../M1/0/M1" preSegmentId="6" postSegmentId="1" preFractionAlong="0.9084462056904016" postFractionAlong="0.5239116767043972"/>
    </projection>
    <projection id="NCXLS_M3R_NSML" presynapticPopulation="M3R" postsynapticPopulation="NSML" synapse="Acetylcholine">
      <connection id="30" preCellId="../M3R/0/M3R" postCellId="../NSML/0/NSML" preSegmentId="8" postSegmentId="6" preFractionAlong="0.9965220719246723" postFractionAlong="0.2988202348114175"/>
    </projection>
    <projection id="NCXLS_M3R_MCR" presynapticPopulation="M3R" postsynapticPopulation="MCR" synapse="Acetylcholine">
      <connection id="31" preCellId="../M3R/0/M3R" postCellId="../MCR/0/MCR" preSegmentId="6" postSegmentId="1" preFractionAlong="0.895866939157868" postFractionAlong="0.7444883899492662"/>
    </projection>
    <projection id="NCXLS_M3R_NSMR" presynapticPopulation="M3R" postsynapticPopulation="NSMR" synapse="Acetylcholine">
      <connection id="32" preCellId="../M3R/0/M3R" postCellId="../NSMR/0/NSMR" preSegmentId="7" postSegmentId="9" preFractionAlong="0.9817673511979657" postFractionAlong="0.730961708161116"/>
    </projection>
    <projection id="NCXLS_M5_I1L" presynapticPopulation="M5" postsynapticPopulation="I1L" synapse="Acetylcholine">
      <connection id="33" preCellId="../M5/0/M5" postCellId="../I1L/0/I1L" preSegmentId="9" postSegmentId="7" preFractionAlong="0.048150789173200925" postFractionAlong="0.5049609189421677"/>
    </projection>
    <projection id="NCXLS_M5_MI" presynapticPopulation="M5" postsynapticPopulation="MI" synapse="Acetylcholine">
      <connection id="34" preCellId="../M5/0/M5" postCellId="../MI/0/MI" preSegmentId="6" postSegmentId="7" preFractionAlong="0.6666474656992775" postFractionAlong="0.8178740635904725"/>
    </projection>
    <projection id="NCXLS_M5_I3" presynapticPopulation="M5" postsynapticPopulation="I3" synapse="Acetylcholine">
      <connection id="35" preCellId="../M5/0/M5" postCellId="../I3/0/I3" preSegmentId="1" postSegmentId="2" preFractionAlong="0.8486686756187097" postFractionAlong="0.16291610476529073"/>
    </projection>
    <projection id="NCXLS_M5_I1R" presynapticPopulation="M5" postsynapticPopulation="I1R" synapse="Acetylcholine">
      <connection id="36" preCellId="../M5/0/M5" postCellId="../I1R/0/I1R" preSegmentId="9" postSegmentId="7" preFractionAlong="0.043345619927325774" postFractionAlong="0.3644268113352511"/>
    </projection>
    <projection id="NCXLS_M5_M2R" presynapticPopulation="M5" postsynapticPopulation="M2R" synapse="Glutamate">
      <connection id="37" preCellId="../M5/0/M5" postCellId="../M2R/0/M2R" preSegmentId="4" postSegmentId="5" preFractionAlong="0.6533947321528386" postFractionAlong="0.5220014501520542"/>
    </projection>
    <projection id="NCXLS_M5_M4" presynapticPopulation="M5" postsynapticPopulation="M4" synapse="Acetylcholine">
      <connection id="38" preCellId="../M5/0/M5" postCellId="../M4/0/M4" preSegmentId="3" postSegmentId="4" preFractionAlong="0.38244370505416037" postFractionAlong="0.9874566169600774"/>
    </projection>
    <projection id="NCXLS_M5_M3L" presynapticPopulation="M5" postsynapticPopulation="M3L" synapse="Acetylcholine">
      <connection id="39" preCellId="../M5/0/M5" postCellId="../M3L/0/M3L" preSegmentId="9" postSegmentId="5" preFractionAlong="0.7741346587074271" postFractionAlong="0.4029997590536022"/>
    </projection>
    <projection id="NCXLS_M4_MI" presynapticPopulation="M4" postsynapticPopulation="MI" synapse="Acetylcholine">
      <connection id="40" preCellId="../M4/0/M4" postCellId="../MI/0/MI" preSegmentId="6" postSegmentId="6" preFractionAlong="0.9633933783698491" postFractionAlong="0.21513022642467916"/>
    </projection>
    <projection id="NCXLS_M4_MCL" presynapticPopulation="M4" postsynapticPopulation="MCL" synapse="Acetylcholine">
      <connection id="41" preCellId="../M4/0/M4" postCellId="../MCL/0/MCL" preSegmentId="9" postSegmentId="1" preFractionAlong="0.21125473081058177" postFractionAlong="0.18787653894114598"/>
    </projection>
    <projection id="NCXLS_M4_I5" presynapticPopulation="M4" postsynapticPopulation="I5" synapse="Acetylcholine">
      <connection id="42" preCellId="../M4/0/M4" postCellId="../I5/0/I5" preSegmentId="7" postSegmentId="8" preFractionAlong="0.34618530771363887" postFractionAlong="0.5258929685789998"/>
    </projection>
    <projection id="NCXLS_M4_M2L" presynapticPopulation="M4" postsynapticPopulation="M2L" synapse="Acetylcholine">
      <connection id="43" preCellId="../M4/0/M4" postCellId="../M2L/0/M2L" preSegmentId="9" postSegmentId="4" preFractionAlong="0.2572136787516285" postFractionAlong="0.35343655449043443"/>
    </projection>
    <projection id="NCXLS_M4_I2L" presynapticPopulation="M4" postsynapticPopulation="I2L" synapse="Acetylcholine">
      <connection id="44" preCellId="../M4/0/M4" postCellId="../I2L/0/I2L" preSegmentId="9" postSegmentId="4" preFractionAlong="0.2548178179647618" postFractionAlong="0.779648205747967"/>
    </projection>
    <projection id="NCXLS_M4_I2R" presynapticPopulation="M4" postsynapticPopulation="I2R" synapse="Acetylcholine">
      <connection id="45" preCellId="../M4/0/M4" postCellId="../I2R/0/I2R" preSegmentId="7" postSegmentId="3" preFractionAlong="0.15031155126776297" postFractionAlong="0.34980874868719436"/>
    </projection>
    <projection id="NCXLS_M2L_I1L" presynapticPopulation="M2L" postsynapticPopulation="I1L" synapse="Acetylcholine">
      <connection id="46" preCellId="../M2L/0/M2L" postCellId="../I1L/0/I1L" preSegmentId="6" postSegmentId="9" preFractionAlong="0.49179398006265684" postFractionAlong="0.7332782958676516"/>
    </projection>
    <projection id="NCXLS_M2L_I3" presynapticPopulation="M2L" postsynapticPopulation="I3" synapse="Acetylcholine">
      <connection id="47" preCellId="../M2L/0/M2L" postCellId="../I3/0/I3" preSegmentId="4" postSegmentId="4" preFractionAlong="0.2715989235803977" postFractionAlong="0.1455395313226463"/>
    </projection>
    <projection id="NCXLS_M2L_I4" presynapticPopulation="M2L" postsynapticPopulation="I4" synapse="Acetylcholine">
      <connection id="48" preCellId="../M2L/0/M2L" postCellId="../I4/0/I4" preSegmentId="1" postSegmentId="3" preFractionAlong="0.9537693962128271" postFractionAlong="0.4158902132121951"/>
    </projection>
    <projection id="NCXLS_M2L_I1R" presynapticPopulation="M2L" postsynapticPopulation="I1R" synapse="Acetylcholine">
      <connection id="49" preCellId="../M2L/0/M2L" postCellId="../I1R/0/I1R" preSegmentId="6" postSegmentId="1" preFractionAlong="0.14264343735650964" postFractionAlong="0.8123550441003988"/>
    </projection>
    <projection id="NCXLS_M2L_I6" presynapticPopulation="M2L" postsynapticPopulation="I6" synapse="Acetylcholine">
      <connection id="50" preCellId="../M2L/0/M2L" postCellId="../I6/0/I6" preSegmentId="6" postSegmentId="9" preFractionAlong="0.9032083249834054" postFractionAlong="0.16719712946813636"/>
    </projection>
    <projection id="NCXLS_M2L_M2R" presynapticPopulation="M2L" postsynapticPopulation="M2R" synapse="Acetylcholine">
      <connection id="51" preCellId="../M2L/0/M2L" postCellId="../M2R/0/M2R" preSegmentId="6" postSegmentId="9" preFractionAlong="0.49835189131046054" postFractionAlong="0.9765873392003843"/>
    </projection>
    <projection id="NCXLS_M2L_M3R" presynapticPopulation="M2L" postsynapticPopulation="M3R" synapse="Glutamate">
      <connection id="52" preCellId="../M2L/0/M2L" postCellId="../M3R/0/M3R" preSegmentId="4" postSegmentId="5" preFractionAlong="0.25337859485795144" postFractionAlong="0.8915500494128707"/>
    </projection>
    <electricalProjection id="NCXLS_M2L_M5_GJ" presynapticPopulation="M2L" postsynapticPopulation="M5">
      <electricalConnection id="53" preCell="0" postCell="0" synapse="Generic_GJ" preSegment="8" postSegment="5" preFractionAlong="0.8713573412322078" postFractionAlong="0.511442833917623"/>
    </electricalProjection>
    <projection id="NCXLS_M2L_M4" presynapticPopulation="M2L" postsynapticPopulation="M4" synapse="Acetylcholine">
      <connection id="54" preCellId="../M2L/0/M2L" postCellId="../M4/0/M4" preSegmentId="9" postSegmentId="4" preFractionAlong="0.45235110234842557" postFractionAlong="0.5173819588480452"/>
    </projection>
    <projection id="NCXLS_M2L_I2R" presynapticPopulation="M2L" postsynapticPopulation="I2R" synapse="Acetylcholine">
      <connection id="55" preCellId="../M2L/0/M2L" postCellId="../I2R/0/I2R" preSegmentId="3" postSegmentId="2" preFractionAlong="0.8690471024768169" postFractionAlong="0.6433243136757882"/>
    </projection>
    <projection id="NCXLS_M2L_M1" presynapticPopulation="M2L" postsynapticPopulation="M1" synapse="Acetylcholine">
      <connection id="56" preCellId="../M2L/0/M2L" postCellId="../M1/0/M1" preSegmentId="8" postSegmentId="2" preFractionAlong="0.6276247009230531" postFractionAlong="0.9008369802823235"/>
    </projection>
    <projection id="NCXLS_M2L_M3L" presynapticPopulation="M2L" postsynapticPopulation="M3L" synapse="Acetylcholine">
      <connection id="57" preCellId="../M2L/0/M2L" postCellId="../M3L/0/M3L" preSegmentId="7" postSegmentId="6" preFractionAlong="0.6802129044188826" postFractionAlong="0.6214293786195046"/>
    </projection>
    <projection id="NCXLS_M2L_NSML" presynapticPopulation="M2L" postsynapticPopulation="NSML" synapse="Acetylcholine">
      <connection id="58" preCellId="../M2L/0/M2L" postCellId="../NSML/0/NSML" preSegmentId="2" postSegmentId="1" preFractionAlong="0.7488391884618512" postFractionAlong="0.6143816397567536"/>
    </projection>
    <projection id="NCXLS_M2L_MCR" presynapticPopulation="M2L" postsynapticPopulation="MCR" synapse="Acetylcholine">
      <connection id="59" preCellId="../M2L/0/M2L" postCellId="../MCR/0/MCR" preSegmentId="7" postSegmentId="6" preFractionAlong="0.9566343228639368" postFractionAlong="0.7526717486147942"/>
    </projection>
    <projection id="NCXLS_M2L_NSMR" presynapticPopulation="M2L" postsynapticPopulation="NSMR" synapse="Acetylcholine">
      <connection id="60" preCellId="../M2L/0/M2L" postCellId="../NSMR/0/NSMR" preSegmentId="8" postSegmentId="7" preFractionAlong="0.930480819579867" postFractionAlong="0.6263010947738659"/>
    </projection>
    <projection id="NCXLS_M1_I1L" presynapticPopulation="M1" postsynapticPopulation="I1L" synapse="Acetylcholine">
      <connection id="61" preCellId="../M1/0/M1" postCellId="../I1L/0/I1L" preSegmentId="4" postSegmentId="7" preFractionAlong="0.8849936133950259" postFractionAlong="0.26887484934151484"/>
    </projection>
    <projection id="NCXLS_M1_MI" presynapticPopulation="M1" postsynapticPopulation="MI" synapse="Acetylcholine">
      <connection id="62" preCellId="../M1/0/M1" postCellId="../MI/0/MI" preSegmentId="4" postSegmentId="1" preFractionAlong="0.717536863512627" postFractionAlong="0.316537731334959"/>
    </projection>
    <projection id="NCXLS_M1_I3" presynapticPopulation="M1" postsynapticPopulation="I3" synapse="Acetylcholine">
      <connection id="63" preCellId="../M1/0/M1" postCellId="../I3/0/I3" preSegmentId="3" postSegmentId="8" preFractionAlong="0.19548340636350292" postFractionAlong="0.15013384583002554"/>
    </projection>
    <projection id="NCXLS_M1_MCL" presynapticPopulation="M1" postsynapticPopulation="MCL" synapse="Acetylcholine">
      <connection id="64" preCellId="../M1/0/M1" postCellId="../MCL/0/MCL" preSegmentId="8" postSegmentId="2" preFractionAlong="0.8731025656089301" postFractionAlong="0.2889434179648537"/>
    </projection>
    <projection id="NCXLS_M1_I1R" presynapticPopulation="M1" postsynapticPopulation="I1R" synapse="Acetylcholine">
      <connection id="65" preCellId="../M1/0/M1" postCellId="../I1R/0/I1R" preSegmentId="9" postSegmentId="4" preFractionAlong="0.475397371863883" postFractionAlong="0.5142419679223724"/>
    </projection>
    <projection id="NCXLS_M1_M2R" presynapticPopulation="M1" postsynapticPopulation="M2R" synapse="Acetylcholine">
      <connection id="66" preCellId="../M1/0/M1" postCellId="../M2R/0/M2R" preSegmentId="1" postSegmentId="6" preFractionAlong="0.6085703378636506" postFractionAlong="0.7229999595937491"/>
    </projection>
    <projection id="NCXLS_M1_M3R" presynapticPopulation="M1" postsynapticPopulation="M3R" synapse="Acetylcholine">
      <connection id="67" preCellId="../M1/0/M1" postCellId="../M3R/0/M3R" preSegmentId="2" postSegmentId="8" preFractionAlong="0.19554839835610216" postFractionAlong="0.7300109887745778"/>
    </projection>
    <electricalProjection id="NCXLS_M1_M5_GJ" presynapticPopulation="M1" postsynapticPopulation="M5">
      <electricalConnection id="68" preCell="0" postCell="0" synapse="Generic_GJ" preSegment="2" postSegment="4" preFractionAlong="0.3238960277710513" postFractionAlong="0.9267924944093012"/>
    </electricalProjection>
    <electricalProjection id="NCXLS_M1_M4_GJ" presynapticPopulation="M1" postsynapticPopulation="M4">
      <electricalConnection id="69" preCell="0" postCell="0" synapse="Generic_GJ" preSegment="3" postSegment="7" preFractionAlong="0.26587848538509784" postFractionAlong="0.4082346208219565"/>
    </electricalProjection>
    <projection id="NCXLS_M1_M2L" presynapticPopulation="M1" postsynapticPopulation="M2L" synapse="Acetylcholine">
      <connection id="70" preCellId="../M1/0/M1" postCellId="../M2L/0/M2L" preSegmentId="6" postSegmentId="4" preFractionAlong="0.37421279573905797" postFractionAlong="0.6206369521207595"/>
    </projection>
    <projection id="NCXLS_M1_I2L" presynapticPopulation="M1" postsynapticPopulation="I2L" synapse="Acetylcholine">
      <connection id="71" preCellId="../M1/0/M1" postCellId="../I2L/0/I2L" preSegmentId="5" postSegmentId="6" preFractionAlong="0.03218440321540217" postFractionAlong="0.04773378967875608"/>
    </projection>
    <projection id="NCXLS_M1_I2R" presynapticPopulation="M1" postsynapticPopulation="I2R" synapse="Acetylcholine">
      <connection id="72" preCellId="../M1/0/M1" postCellId="../I2R/0/I2R" preSegmentId="2" postSegmentId="6" preFractionAlong="0.3773277743022193" postFractionAlong="0.6967410002096508"/>
    </projection>
    <electricalProjection id="NCXLS_M1_M3L_GJ" presynapticPopulation="M1" postsynapticPopulation="M3L">
      <electricalConnection id="73" preCell="0" postCell="0" synapse="Generic_GJ" preSegment="6" postSegment="7" preFractionAlong="0.2294006266965225" postFractionAlong="0.18340946361735078"/>
    </electricalProjection>
    <projection id="NCXLS_M1_MCR" presynapticPopulation="M1" postsynapticPopulation="MCR" synapse="Acetylcholine">
      <connection id="74" preCellId="../M1/0/M1" postCellId="../MCR/0/MCR" preSegmentId="2" postSegmentId="2" preFractionAlong="0.5168585255373174" postFractionAlong="0.9050840377609537"/>
    </projection>
    <projection id="NCXLS_M3L_I1L" presynapticPopulation="M3L" postsynapticPopulation="I1L" synapse="Acetylcholine">
      <connection id="75" preCellId="../M3L/0/M3L" postCellId="../I1L/0/I1L" preSegmentId="4" postSegmentId="6" preFractionAlong="0.2182470547811538" postFractionAlong="0.5243754866553567"/>
    </projection>
    <projection id="NCXLS_M3L_I3" presynapticPopulation="M3L" postsynapticPopulation="I3" synapse="Acetylcholine">
      <connection id="76" preCellId="../M3L/0/M3L" postCellId="../I3/0/I3" preSegmentId="9" postSegmentId="5" preFractionAlong="0.8064166740187909" postFractionAlong="0.2483184830248425"/>
    </projection>
    <projection id="NCXLS_M3L_I4" presynapticPopulation="M3L" postsynapticPopulation="I4" synapse="Acetylcholine">
      <connection id="77" preCellId="../M3L/0/M3L" postCellId="../I4/0/I4" preSegmentId="3" postSegmentId="7" preFractionAlong="0.6819051664607716" postFractionAlong="0.6338529008835424"/>
    </projection>
    <projection id="NCXLS_M3L_I1R" presynapticPopulation="M3L" postsynapticPopulation="I1R" synapse="Acetylcholine">
      <connection id="78" preCellId="../M3L/0/M3L" postCellId="../I1R/0/I1R" preSegmentId="5" postSegmentId="2" preFractionAlong="0.8993665289209269" postFractionAlong="0.5192634144878443"/>
    </projection>
    <projection id="NCXLS_M3L_I6" presynapticPopulation="M3L" postsynapticPopulation="I6" synapse="Acetylcholine">
      <connection id="79" preCellId="../M3L/0/M3L" postCellId="../I6/0/I6" preSegmentId="9" postSegmentId="6" preFractionAlong="0.9221203897976371" postFractionAlong="0.177116568678373"/>
    </projection>
    <projection id="NCXLS_M3L_M2R" presynapticPopulation="M3L" postsynapticPopulation="M2R" synapse="Glutamate">
      <connection id="80" preCellId="../M3L/0/M3L" postCellId="../M2R/0/M2R" preSegmentId="1" postSegmentId="6" preFractionAlong="0.8035676014003101" postFractionAlong="0.2154532769556433"/>
    </projection>
    <projection id="NCXLS_M3L_M3R" presynapticPopulation="M3L" postsynapticPopulation="M3R" synapse="Glutamate">
      <connection id="81" preCellId="../M3L/0/M3L" postCellId="../M3R/0/M3R" preSegmentId="2" postSegmentId="1" preFractionAlong="0.5776691702331689" postFractionAlong="0.36880088490229734"/>
    </projection>
    <projection id="NCXLS_M3L_M5" presynapticPopulation="M3L" postsynapticPopulation="M5" synapse="Acetylcholine">
      <connection id="82" preCellId="../M3L/0/M3L" postCellId="../M5/0/M5" preSegmentId="4" postSegmentId="3" preFractionAlong="0.09134922717058092" postFractionAlong="0.9705422561557597"/>
    </projection>
    <projection id="NCXLS_M3L_M1" presynapticPopulation="M3L" postsynapticPopulation="M1" synapse="Acetylcholine">
      <connection id="83" preCellId="../M3L/0/M3L" postCellId="../M1/0/M1" preSegmentId="7" postSegmentId="3" preFractionAlong="0.9082886234873289" postFractionAlong="0.41668038043143796"/>
    </projection>
    <projection id="NCXLS_M3L_NSML" presynapticPopulation="M3L" postsynapticPopulation="NSML" synapse="Acetylcholine">
      <connection id="84" preCellId="../M3L/0/M3L" postCellId="../NSML/0/NSML" preSegmentId="4" postSegmentId="9" preFractionAlong="0.3884369385525741" postFractionAlong="0.4353976302115996"/>
    </projection>
    <projection id="NCXLS_M3L_MCR" presynapticPopulation="M3L" postsynapticPopulation="MCR" synapse="Acetylcholine">
      <connection id="85" preCellId="../M3L/0/M3L" postCellId="../MCR/0/MCR" preSegmentId="7" postSegmentId="2" preFractionAlong="0.49431424805005963" postFractionAlong="0.5884438276405232"/>
    </projection>
    <projection id="NCXLS_M3L_NSMR" presynapticPopulation="M3L" postsynapticPopulation="NSMR" synapse="Acetylcholine">
      <connection id="86" preCellId="../M3L/0/M3L" postCellId="../NSMR/0/NSMR" preSegmentId="9" postSegmentId="6" preFractionAlong="0.878216310274203" postFractionAlong="0.9554709904951643"/>
    </projection>
    <projection id="NCXLS_MCR_I1L" presynapticPopulation="MCR" postsynapticPopulation="I1L" synapse="Acetylcholine">
      <connection id="87" preCellId="../MCR/0/MCR" postCellId="../I1L/0/I1L" preSegmentId="4" postSegmentId="4" preFractionAlong="0.07524801767793288" postFractionAlong="0.449005579247043"/>
    </projection>
    <projection id="NCXLS_MCR_I3" presynapticPopulation="MCR" postsynapticPopulation="I3" synapse="Acetylcholine">
      <connection id="88" preCellId="../MCR/0/MCR" postCellId="../I3/0/I3" preSegmentId="7" postSegmentId="7" preFractionAlong="0.07676673714498072" postFractionAlong="0.3102378614407344"/>
    </projection>
    <projection id="NCXLS_MCR_I1R" presynapticPopulation="MCR" postsynapticPopulation="I1R" synapse="Acetylcholine">
      <connection id="89" preCellId="../MCR/0/MCR" postCellId="../I1R/0/I1R" preSegmentId="6" postSegmentId="2" preFractionAlong="0.5846601031717614" postFractionAlong="0.0666655512758233"/>
    </projection>
    <projection id="NCXLS_MCR_M2R" presynapticPopulation="MCR" postsynapticPopulation="M2R" synapse="Acetylcholine">
      <connection id="90" preCellId="../MCR/0/MCR" postCellId="../M2R/0/M2R" preSegmentId="4" postSegmentId="4" preFractionAlong="0.4888757607534946" postFractionAlong="0.5369080079142348"/>
    </projection>
    <projection id="NCXLS_MCR_M3R" presynapticPopulation="MCR" postsynapticPopulation="M3R" synapse="Acetylcholine">
      <connection id="91" preCellId="../MCR/0/MCR" postCellId="../M3R/0/M3R" preSegmentId="1" postSegmentId="3" preFractionAlong="0.7232899483428163" postFractionAlong="0.07066819030807847"/>
    </projection>
    <projection id="NCXLS_MCR_M5" presynapticPopulation="MCR" postsynapticPopulation="M5" synapse="Acetylcholine">
      <connection id="92" preCellId="../MCR/0/MCR" postCellId="../M5/0/M5" preSegmentId="4" postSegmentId="6" preFractionAlong="0.757032054461033" postFractionAlong="0.5183307870098315"/>
    </projection>
  </network>
</neuroml>
