<?xml version='1.0' encoding='UTF-8'?>
<neuroml xmlns="http://www.neuroml.org/schema/neuroml2" xmlns:xsi="http://www.w3.org/2001/XMLSchema-instance" xsi:schemaLocation="http://www.neuroml.org/schema/neuroml2 https://raw.githubusercontent.com/NeuroML/NeuroML2/development/Schemas/NeuroML2/NeuroML_v2beta4.xsd" id="gvft_network_bio_prior_lamW_0.500_DF_0.037_t40.net">
  <notes>NeuroML2 network generated from GVFT simulation on 2025-05-04 00:15:46
</notes>
  <include href="M3R.cell.nml"/>
  <include href="M1.cell.nml"/>
  <include href="I2L.cell.nml"/>
  <include href="MCL.cell.nml"/>
  <include href="I6.cell.nml"/>
  <include href="I5.cell.nml"/>
  <include href="M4.cell.nml"/>
  <include href="I1R.cell.nml"/>
  <include href="MCR.cell.nml"/>
  <include href="I3.cell.nml"/>
  <include href="M3L.cell.nml"/>
  <include href="NSML.cell.nml"/>
  <include href="M2L.cell.nml"/>
  <include href="M5.cell.nml"/>
  <include href="I4.cell.nml"/>
  <include href="MI.cell.nml"/>
  <include href="NSMR.cell.nml"/>
  <include href="I2R.cell.nml"/>
  <include href="M2R.cell.nml"/>
  <include href="I1L.cell.nml"/>
  <include href="Serotonin_Glutamate.synapse.nml"/>
  <include href="Acetylcholine.synapse.nml"/>
  <include href="Generic_GJ.synapse.nml"/>
  <include href="Glutamate.synapse.nml"/>
  <network id="gvft_network_bio_prior_lamW_0.500_DF_0.037_t40.net" type="networkWithTemperature" temperature="20.0 degC">
    <population id="M1" component="M1" type="populationList" size="1">
      <instance id="0">
        <location x="-0.53768843" y="-0.5678392" z="0.0"/>
      </instance>
    </population>
    <population id="M2L" component="M2L" type="populationList" size="1">
      <instance id="0">
        <location x="-0.18592966" y="-0.9296482" z="0.0"/>
      </instance>
    </population>
    <population id="M2R" component="M2R" type="populationList" size="1">
      <instance id="0">
        <location x="-0.44723618" y="0.2562814" z="0.0"/>
      </instance>
    </population>
    <population id="M3L" component="M3L" type="populationList" size="1">
      <instance id="0">
        <location x="0.959799" y="-0.28643218" z="0.0"/>
      </instance>
    </population>
    <population id="M3R" component="M3R" type="populationList" size="1">
      <instance id="0">
        <location x="-0.10552765" y="-0.49748746" z="0.0"/>
      </instance>
    </population>
    <population id="M4" component="M4" type="populationList" size="1">
      <instance id="0">
        <location x="0.3266332" y="-0.37688443" z="0.0"/>
      </instance>
    </population>
    <population id="M5" component="M5" type="populationList" size="1">
      <instance id="0">
        <location x="-0.065326646" y="-0.46733668" z="0.0"/>
      </instance>
    </population>
    <population id="I1L" component="I1L" type="populationList" size="1">
      <instance id="0">
        <location x="-0.36683416" y="0.69849247" z="0.0"/>
      </instance>
    </population>
    <population id="I1R" component="I1R" type="populationList" size="1">
      <instance id="0">
        <location x="-0.065326646" y="-0.015075387" z="0.0"/>
      </instance>
    </population>
    <population id="I2L" component="I2L" type="populationList" size="1">
      <instance id="0">
        <location x="0.638191" y="-0.04522614" z="0.0"/>
      </instance>
    </population>
    <population id="I2R" component="I2R" type="populationList" size="1">
      <instance id="0">
        <location x="-0.49748746" y="0.67839193" z="0.0"/>
      </instance>
    </population>
    <population id="I3" component="I3" type="populationList" size="1">
      <instance id="0">
        <location x="0.57788944" y="-0.86934674" z="0.0"/>
      </instance>
    </population>
    <population id="I4" component="I4" type="populationList" size="1">
      <instance id="0">
        <location x="0.61809045" y="0.41708544" z="0.0"/>
      </instance>
    </population>
    <population id="I5" component="I5" type="populationList" size="1">
      <instance id="0">
        <location x="0.08542714" y="-0.94974875" z="0.0"/>
      </instance>
    </population>
    <population id="I6" component="I6" type="populationList" size="1">
      <instance id="0">
        <location x="0.4874372" y="-0.33668342" z="0.0"/>
      </instance>
    </population>
    <population id="MCL" component="MCL" type="populationList" size="1">
      <instance id="0">
        <location x="0.80904526" y="0.6482412" z="0.0"/>
      </instance>
    </population>
    <population id="MCR" component="MCR" type="populationList" size="1">
      <instance id="0">
        <location x="-0.065326646" y="0.39698493" z="0.0"/>
      </instance>
    </population>
    <population id="MI" component="MI" type="populationList" size="1">
      <instance id="0">
        <location x="0.20603016" y="0.2763819" z="0.0"/>
      </instance>
    </population>
    <population id="NSML" component="NSML" type="populationList" size="1">
      <instance id="0">
        <location x="0.9798995" y="0.9798995" z="0.0"/>
      </instance>
    </population>
    <population id="NSMR" component="NSMR" type="populationList" size="1">
      <instance id="0">
        <location x="0.26633167" y="0.47738695" z="0.0"/>
      </instance>
    </population>
    <projection id="NCXLS_M1_I1L" presynapticPopulation="M1" postsynapticPopulation="I1L" synapse="Acetylcholine">
      <connection id="0" preCellId="../M1/0/M1" postCellId="../I1L/0/I1L" preSegmentId="7" postSegmentId="6" preFractionAlong="0.847058190871695" postFractionAlong="0.17008151326733034"/>
    </projection>
    <projection id="NCXLS_M1_NSML" presynapticPopulation="M1" postsynapticPopulation="NSML" synapse="Acetylcholine">
      <connection id="1" preCellId="../M1/0/M1" postCellId="../NSML/0/NSML" preSegmentId="8" postSegmentId="2" preFractionAlong="0.9781531220840393" postFractionAlong="0.2631502596023292"/>
    </projection>
    <projection id="NCXLS_M1_I4" presynapticPopulation="M1" postsynapticPopulation="I4" synapse="Acetylcholine">
      <connection id="2" preCellId="../M1/0/M1" postCellId="../I4/0/I4" preSegmentId="3" postSegmentId="5" preFractionAlong="0.8206880020942519" postFractionAlong="0.57100836897467"/>
    </projection>
    <projection id="NCXLS_M1_I1R" presynapticPopulation="M1" postsynapticPopulation="I1R" synapse="Acetylcholine">
      <connection id="3" preCellId="../M1/0/M1" postCellId="../I1R/0/I1R" preSegmentId="4" postSegmentId="8" preFractionAlong="0.9029128919667692" postFractionAlong="0.03919683545574304"/>
    </projection>
    <projection id="NCXLS_M1_NSMR" presynapticPopulation="M1" postsynapticPopulation="NSMR" synapse="Acetylcholine">
      <connection id="4" preCellId="../M1/0/M1" postCellId="../NSMR/0/NSMR" preSegmentId="2" postSegmentId="7" preFractionAlong="0.7658255469624435" postFractionAlong="0.19694117324489147"/>
    </projection>
    <projection id="NCXLS_M1_I6" presynapticPopulation="M1" postsynapticPopulation="I6" synapse="Acetylcholine">
      <connection id="5" preCellId="../M1/0/M1" postCellId="../I6/0/I6" preSegmentId="3" postSegmentId="7" preFractionAlong="0.7343234082185247" postFractionAlong="0.727012454699724"/>
    </projection>
    <projection id="NCXLS_M1_MCR" presynapticPopulation="M1" postsynapticPopulation="MCR" synapse="Acetylcholine">
      <connection id="6" preCellId="../M1/0/M1" postCellId="../MCR/0/MCR" preSegmentId="2" postSegmentId="8" preFractionAlong="0.16697788222901044" postFractionAlong="0.2673375624116643"/>
    </projection>
    <projection id="NCXLS_M1_MCL" presynapticPopulation="M1" postsynapticPopulation="MCL" synapse="Acetylcholine">
      <connection id="7" preCellId="../M1/0/M1" postCellId="../MCL/0/MCL" preSegmentId="4" postSegmentId="8" preFractionAlong="0.7954509581775875" postFractionAlong="0.6217593860953973"/>
    </projection>
    <projection id="NCXLS_M1_M2R" presynapticPopulation="M1" postsynapticPopulation="M2R" synapse="Acetylcholine">
      <connection id="8" preCellId="../M1/0/M1" postCellId="../M2R/0/M2R" preSegmentId="1" postSegmentId="9" preFractionAlong="0.16381366359431537" postFractionAlong="0.04014777002874037"/>
    </projection>
    <projection id="NCXLS_M1_I5" presynapticPopulation="M1" postsynapticPopulation="I5" synapse="Acetylcholine">
      <connection id="9" preCellId="../M1/0/M1" postCellId="../I5/0/I5" preSegmentId="2" postSegmentId="8" preFractionAlong="0.4532846463376582" postFractionAlong="0.24717696901060615"/>
    </projection>
    <projection id="NCXLS_M1_MI" presynapticPopulation="M1" postsynapticPopulation="MI" synapse="Acetylcholine">
      <connection id="10" preCellId="../M1/0/M1" postCellId="../MI/0/MI" preSegmentId="2" postSegmentId="5" preFractionAlong="0.6246355586881762" postFractionAlong="0.13915483451822375"/>
    </projection>
    <projection id="NCXLS_M1_M2L" presynapticPopulation="M1" postsynapticPopulation="M2L" synapse="Acetylcholine">
      <connection id="11" preCellId="../M1/0/M1" postCellId="../M2L/0/M2L" preSegmentId="6" postSegmentId="4" preFractionAlong="0.4432811764267336" postFractionAlong="0.9479609167513947"/>
    </projection>
    <projection id="NCXLS_M1_I3" presynapticPopulation="M1" postsynapticPopulation="I3" synapse="Acetylcholine">
      <connection id="12" preCellId="../M1/0/M1" postCellId="../I3/0/I3" preSegmentId="9" postSegmentId="1" preFractionAlong="0.12019154144553867" postFractionAlong="0.8703037784998425"/>
    </projection>
    <projection id="NCXLS_M1_I2L" presynapticPopulation="M1" postsynapticPopulation="I2L" synapse="Acetylcholine">
      <connection id="13" preCellId="../M1/0/M1" postCellId="../I2L/0/I2L" preSegmentId="9" postSegmentId="5" preFractionAlong="0.6269318309298576" postFractionAlong="0.7846041253444681"/>
    </projection>
    <projection id="NCXLS_M1_M3R" presynapticPopulation="M1" postsynapticPopulation="M3R" synapse="Acetylcholine">
      <connection id="14" preCellId="../M1/0/M1" postCellId="../M3R/0/M3R" preSegmentId="4" postSegmentId="5" preFractionAlong="0.7145834712104601" postFractionAlong="0.5242366565631603"/>
    </projection>
    <projection id="NCXLS_M1_M4" presynapticPopulation="M1" postsynapticPopulation="M4" synapse="Glutamate">
      <connection id="15" preCellId="../M1/0/M1" postCellId="../M4/0/M4" preSegmentId="1" postSegmentId="2" preFractionAlong="0.1627491077823806" postFractionAlong="0.20208431497743884"/>
    </projection>
    <projection id="NCXLS_M1_M5" presynapticPopulation="M1" postsynapticPopulation="M5" synapse="Acetylcholine">
      <connection id="16" preCellId="../M1/0/M1" postCellId="../M5/0/M5" preSegmentId="7" postSegmentId="5" preFractionAlong="0.6078796438735548" postFractionAlong="0.7661763994699113"/>
    </projection>
    <projection id="NCXLS_M1_I2R" presynapticPopulation="M1" postsynapticPopulation="I2R" synapse="Acetylcholine">
      <connection id="17" preCellId="../M1/0/M1" postCellId="../I2R/0/I2R" preSegmentId="7" postSegmentId="3" preFractionAlong="0.661821597989107" postFractionAlong="0.8272769548719391"/>
    </projection>
    <electricalProjection id="NCXLS_M1_M3L_GJ" presynapticPopulation="M1" postsynapticPopulation="M3L">
      <electricalConnection id="18" preCell="0" postCell="0" synapse="Generic_GJ" preSegment="8" postSegment="6" preFractionAlong="0.6217266153088818" postFractionAlong="0.5897376125562032"/>
    </electricalProjection>
    <projection id="NCXLS_NSML_I1L" presynapticPopulation="NSML" postsynapticPopulation="I1L" synapse="Serotonin_Glutamate">
      <connection id="19" preCellId="../NSML/0/NSML" postCellId="../I1L/0/I1L" preSegmentId="3" postSegmentId="5" preFractionAlong="0.06078184248466989" postFractionAlong="0.10812260729606149"/>
    </projection>
    <electricalProjection id="NCXLS_NSML_MCR_GJ" presynapticPopulation="NSML" postsynapticPopulation="MCR">
      <electricalConnection id="20" preCell="0" postCell="0" synapse="Generic_GJ" preSegment="2" postSegment="8" preFractionAlong="0.5271098253536346" postFractionAlong="0.03992765880517124"/>
    </electricalProjection>
    <projection id="NCXLS_NSML_M2R" presynapticPopulation="NSML" postsynapticPopulation="M2R" synapse="Serotonin_Glutamate">
      <connection id="21" preCellId="../NSML/0/NSML" postCellId="../M2R/0/M2R" preSegmentId="9" postSegmentId="7" preFractionAlong="0.34664374664052877" postFractionAlong="0.31885377061487585"/>
    </projection>
    <projection id="NCXLS_NSML_I2R" presynapticPopulation="NSML" postsynapticPopulation="I2R" synapse="Serotonin_Glutamate">
      <connection id="22" preCellId="../NSML/0/NSML" postCellId="../I2R/0/I2R" preSegmentId="4" postSegmentId="2" preFractionAlong="0.8507306845860373" postFractionAlong="0.2946182996849034"/>
    </projection>
    <projection id="NCXLS_I4_NSML" presynapticPopulation="I4" postsynapticPopulation="NSML" synapse="Acetylcholine">
      <connection id="23" preCellId="../I4/0/I4" postCellId="../NSML/0/NSML" preSegmentId="2" postSegmentId="6" preFractionAlong="0.28131047047074254" postFractionAlong="0.889964607500909"/>
    </projection>
    <projection id="NCXLS_I4_MCL" presynapticPopulation="I4" postsynapticPopulation="MCL" synapse="Acetylcholine">
      <connection id="24" preCellId="../I4/0/I4" postCellId="../MCL/0/MCL" preSegmentId="1" postSegmentId="7" preFractionAlong="0.8772802313513668" postFractionAlong="0.10389135441431396"/>
    </projection>
    <projection id="NCXLS_NSMR_NSML" presynapticPopulation="NSMR" postsynapticPopulation="NSML" synapse="Serotonin_Glutamate">
      <connection id="25" preCellId="../NSMR/0/NSMR" postCellId="../NSML/0/NSML" preSegmentId="7" postSegmentId="5" preFractionAlong="0.08837824596090393" postFractionAlong="0.8456431203863204"/>
    </projection>
    <projection id="NCXLS_NSMR_I4" presynapticPopulation="NSMR" postsynapticPopulation="I4" synapse="Serotonin_Glutamate">
      <connection id="26" preCellId="../NSMR/0/NSMR" postCellId="../I4/0/I4" preSegmentId="8" postSegmentId="7" preFractionAlong="0.3362965412697576" postFractionAlong="0.21267812800969943"/>
    </projection>
    <electricalProjection id="NCXLS_NSMR_MCL_GJ" presynapticPopulation="NSMR" postsynapticPopulation="MCL">
      <electricalConnection id="27" preCell="0" postCell="0" synapse="Generic_GJ" preSegment="7" postSegment="2" preFractionAlong="0.5910239881953218" postFractionAlong="0.3475338626603488"/>
    </electricalProjection>
    <electricalProjection id="NCXLS_I6_I3_GJ" presynapticPopulation="I6" postsynapticPopulation="I3">
      <electricalConnection id="28" preCell="0" postCell="0" synapse="Generic_GJ" preSegment="7" postSegment="7" preFractionAlong="0.03503165294061683" postFractionAlong="0.6638264614225129"/>
    </electricalProjection>
    <projection id="NCXLS_I6_M3L" presynapticPopulation="I6" postsynapticPopulation="M3L" synapse="Glutamate">
      <connection id="29" preCellId="../I6/0/I6" postCellId="../M3L/0/M3L" preSegmentId="5" postSegmentId="2" preFractionAlong="0.9328120149702568" postFractionAlong="0.7151647345384377"/>
    </projection>
    <projection id="NCXLS_MCR_NSML" presynapticPopulation="MCR" postsynapticPopulation="NSML" synapse="Acetylcholine">
      <connection id="30" preCellId="../MCR/0/MCR" postCellId="../NSML/0/NSML" preSegmentId="9" postSegmentId="3" preFractionAlong="0.09669838554633725" postFractionAlong="0.9779115625906942"/>
    </projection>
    <projection id="NCXLS_MCR_I4" presynapticPopulation="MCR" postsynapticPopulation="I4" synapse="Acetylcholine">
      <connection id="31" preCellId="../MCR/0/MCR" postCellId="../I4/0/I4" preSegmentId="7" postSegmentId="6" preFractionAlong="0.09325486978537079" postFractionAlong="0.7075533559193198"/>
    </projection>
    <projection id="NCXLS_MCR_NSMR" presynapticPopulation="MCR" postsynapticPopulation="NSMR" synapse="Acetylcholine">
      <connection id="32" preCellId="../MCR/0/MCR" postCellId="../NSMR/0/NSMR" preSegmentId="4" postSegmentId="6" preFractionAlong="0.6570008866315482" postFractionAlong="0.7571238239772095"/>
    </projection>
    <projection id="NCXLS_MCR_I6" presynapticPopulation="MCR" postsynapticPopulation="I6" synapse="Acetylcholine">
      <connection id="33" preCellId="../MCR/0/MCR" postCellId="../I6/0/I6" preSegmentId="4" postSegmentId="6" preFractionAlong="0.7893230103611636" postFractionAlong="0.3170887872741256"/>
    </projection>
    <electricalProjection id="NCXLS_MCR_MCL_GJ" presynapticPopulation="MCR" postsynapticPopulation="MCL">
      <electricalConnection id="34" preCell="0" postCell="0" synapse="Generic_GJ" preSegment="5" postSegment="4" preFractionAlong="0.6108386565849336" postFractionAlong="0.17978383097704398"/>
    </electricalProjection>
    <projection id="NCXLS_MCR_MI" presynapticPopulation="MCR" postsynapticPopulation="MI" synapse="Acetylcholine">
      <connection id="35" preCellId="../MCR/0/MCR" postCellId="../MI/0/MI" preSegmentId="8" postSegmentId="7" preFractionAlong="0.444829257597959" postFractionAlong="0.3388818862486742"/>
    </projection>
    <projection id="NCXLS_MCR_I3" presynapticPopulation="MCR" postsynapticPopulation="I3" synapse="Acetylcholine">
      <connection id="36" preCellId="../MCR/0/MCR" postCellId="../I3/0/I3" preSegmentId="1" postSegmentId="6" preFractionAlong="0.23945481408550195" postFractionAlong="0.5429424057977258"/>
    </projection>
    <projection id="NCXLS_MCR_I2L" presynapticPopulation="MCR" postsynapticPopulation="I2L" synapse="Acetylcholine">
      <connection id="37" preCellId="../MCR/0/MCR" postCellId="../I2L/0/I2L" preSegmentId="6" postSegmentId="9" preFractionAlong="0.509769673499049" postFractionAlong="0.5231560631441117"/>
    </projection>
    <projection id="NCXLS_MCR_M4" presynapticPopulation="MCR" postsynapticPopulation="M4" synapse="Acetylcholine">
      <connection id="38" preCellId="../MCR/0/MCR" postCellId="../M4/0/M4" preSegmentId="5" postSegmentId="6" preFractionAlong="0.08478062372975437" postFractionAlong="0.5733237131030232"/>
    </projection>
    <projection id="NCXLS_MCR_M3L" presynapticPopulation="MCR" postsynapticPopulation="M3L" synapse="Acetylcholine">
      <connection id="39" preCellId="../MCR/0/MCR" postCellId="../M3L/0/M3L" preSegmentId="1" postSegmentId="1" preFractionAlong="0.914188424133511" postFractionAlong="0.5261828101048603"/>
    </projection>
    <projection id="NCXLS_MCL_I6" presynapticPopulation="MCL" postsynapticPopulation="I6" synapse="Acetylcholine">
      <connection id="40" preCellId="../MCL/0/MCL" postCellId="../I6/0/I6" preSegmentId="2" postSegmentId="9" preFractionAlong="0.1608833677420589" postFractionAlong="0.9303069129868882"/>
    </projection>
    <projection id="NCXLS_MCL_I5" presynapticPopulation="MCL" postsynapticPopulation="I5" synapse="Acetylcholine">
      <connection id="41" preCellId="../MCL/0/MCL" postCellId="../I5/0/I5" preSegmentId="9" postSegmentId="4" preFractionAlong="0.5132935824594983" postFractionAlong="0.08453261529357237"/>
    </projection>
    <projection id="NCXLS_MCL_M2L" presynapticPopulation="MCL" postsynapticPopulation="M2L" synapse="Acetylcholine">
      <connection id="42" preCellId="../MCL/0/MCL" postCellId="../M2L/0/M2L" preSegmentId="1" postSegmentId="9" preFractionAlong="0.9900863745790824" postFractionAlong="0.557524376194266"/>
    </projection>
    <projection id="NCXLS_MCL_I3" presynapticPopulation="MCL" postsynapticPopulation="I3" synapse="Acetylcholine">
      <connection id="43" preCellId="../MCL/0/MCL" postCellId="../I3/0/I3" preSegmentId="8" postSegmentId="1" preFractionAlong="0.4370787582896788" postFractionAlong="0.02403769666640887"/>
    </projection>
    <projection id="NCXLS_MCL_I2L" presynapticPopulation="MCL" postsynapticPopulation="I2L" synapse="Acetylcholine">
      <connection id="44" preCellId="../MCL/0/MCL" postCellId="../I2L/0/I2L" preSegmentId="9" postSegmentId="9" preFractionAlong="0.9578131827533579" postFractionAlong="0.7476446125967731"/>
    </projection>
    <projection id="NCXLS_MCL_M3R" presynapticPopulation="MCL" postsynapticPopulation="M3R" synapse="Acetylcholine">
      <connection id="45" preCellId="../MCL/0/MCL" postCellId="../M3R/0/M3R" preSegmentId="4" postSegmentId="2" preFractionAlong="0.0663511719879809" postFractionAlong="0.044888411577088116"/>
    </projection>
    <projection id="NCXLS_MCL_M4" presynapticPopulation="MCL" postsynapticPopulation="M4" synapse="Acetylcholine">
      <connection id="46" preCellId="../MCL/0/MCL" postCellId="../M4/0/M4" preSegmentId="9" postSegmentId="3" preFractionAlong="0.5702481249473995" postFractionAlong="0.23665537947971382"/>
    </projection>
    <projection id="NCXLS_MCL_M5" presynapticPopulation="MCL" postsynapticPopulation="M5" synapse="Acetylcholine">
      <connection id="47" preCellId="../MCL/0/MCL" postCellId="../M5/0/M5" preSegmentId="5" postSegmentId="3" preFractionAlong="0.739289628746437" postFractionAlong="0.9161871480738876"/>
    </projection>
    <projection id="NCXLS_MCL_M3L" presynapticPopulation="MCL" postsynapticPopulation="M3L" synapse="Acetylcholine">
      <connection id="48" preCellId="../MCL/0/MCL" postCellId="../M3L/0/M3L" preSegmentId="9" postSegmentId="4" preFractionAlong="0.780338247625157" postFractionAlong="0.7944412009213938"/>
    </projection>
    <electricalProjection id="NCXLS_M2R_M1_GJ" presynapticPopulation="M2R" postsynapticPopulation="M1">
      <electricalConnection id="49" preCell="0" postCell="0" synapse="Generic_GJ" preSegment="1" postSegment="5" preFractionAlong="0.9604797515609774" postFractionAlong="0.08963454482082778"/>
    </electricalProjection>
    <projection id="NCXLS_M2R_NSML" presynapticPopulation="M2R" postsynapticPopulation="NSML" synapse="Acetylcholine">
      <connection id="50" preCellId="../M2R/0/M2R" postCellId="../NSML/0/NSML" preSegmentId="3" postSegmentId="3" preFractionAlong="0.30057710805402216" postFractionAlong="0.8614479214043481"/>
    </projection>
    <projection id="NCXLS_M2R_I4" presynapticPopulation="M2R" postsynapticPopulation="I4" synapse="Acetylcholine">
      <connection id="51" preCellId="../M2R/0/M2R" postCellId="../I4/0/I4" preSegmentId="7" postSegmentId="8" preFractionAlong="0.7470862093948251" postFractionAlong="0.23132831230695827"/>
    </projection>
    <projection id="NCXLS_M2R_I1R" presynapticPopulation="M2R" postsynapticPopulation="I1R" synapse="Acetylcholine">
      <connection id="52" preCellId="../M2R/0/M2R" postCellId="../I1R/0/I1R" preSegmentId="2" postSegmentId="1" preFractionAlong="0.038663386178099945" postFractionAlong="0.13690140569739273"/>
    </projection>
    <projection id="NCXLS_M2R_NSMR" presynapticPopulation="M2R" postsynapticPopulation="NSMR" synapse="Acetylcholine">
      <connection id="53" preCellId="../M2R/0/M2R" postCellId="../NSMR/0/NSMR" preSegmentId="4" postSegmentId="7" preFractionAlong="0.7530576099149094" postFractionAlong="0.7265261936099229"/>
    </projection>
    <projection id="NCXLS_M2R_I6" presynapticPopulation="M2R" postsynapticPopulation="I6" synapse="Acetylcholine">
      <connection id="54" preCellId="../M2R/0/M2R" postCellId="../I6/0/I6" preSegmentId="3" postSegmentId="4" preFractionAlong="0.7305320210053622" postFractionAlong="0.8286949422440019"/>
    </projection>
    <projection id="NCXLS_M2R_MCR" presynapticPopulation="M2R" postsynapticPopulation="MCR" synapse="Acetylcholine">
      <connection id="55" preCellId="../M2R/0/M2R" postCellId="../MCR/0/MCR" preSegmentId="4" postSegmentId="3" preFractionAlong="0.4939872654301404" postFractionAlong="0.3606696643093027"/>
    </projection>
    <projection id="NCXLS_M2R_MCL" presynapticPopulation="M2R" postsynapticPopulation="MCL" synapse="Acetylcholine">
      <connection id="56" preCellId="../M2R/0/M2R" postCellId="../MCL/0/MCL" preSegmentId="9" postSegmentId="3" preFractionAlong="0.39835532196590906" postFractionAlong="0.08346929518195723"/>
    </projection>
    <projection id="NCXLS_M2R_I5" presynapticPopulation="M2R" postsynapticPopulation="I5" synapse="Acetylcholine">
      <connection id="57" preCellId="../M2R/0/M2R" postCellId="../I5/0/I5" preSegmentId="3" postSegmentId="3" preFractionAlong="0.22123534791790211" postFractionAlong="0.5273935140878472"/>
    </projection>
    <projection id="NCXLS_M2R_MI" presynapticPopulation="M2R" postsynapticPopulation="MI" synapse="Acetylcholine">
      <connection id="58" preCellId="../M2R/0/M2R" postCellId="../MI/0/MI" preSegmentId="6" postSegmentId="4" preFractionAlong="0.8004100633251034" postFractionAlong="0.484368151342658"/>
    </projection>
    <projection id="NCXLS_M2R_M2L" presynapticPopulation="M2R" postsynapticPopulation="M2L" synapse="Glutamate">
      <connection id="59" preCellId="../M2R/0/M2R" postCellId="../M2L/0/M2L" preSegmentId="2" postSegmentId="3" preFractionAlong="0.14738326759734854" postFractionAlong="0.3245763356293674"/>
    </projection>
    <projection id="NCXLS_M2R_I3" presynapticPopulation="M2R" postsynapticPopulation="I3" synapse="Acetylcholine">
      <connection id="60" preCellId="../M2R/0/M2R" postCellId="../I3/0/I3" preSegmentId="4" postSegmentId="4" preFractionAlong="0.808212830516503" postFractionAlong="0.7701595230861525"/>
    </projection>
    <projection id="NCXLS_M2R_I2L" presynapticPopulation="M2R" postsynapticPopulation="I2L" synapse="Acetylcholine">
      <connection id="61" preCellId="../M2R/0/M2R" postCellId="../I2L/0/I2L" preSegmentId="8" postSegmentId="7" preFractionAlong="0.2434563577719976" postFractionAlong="0.9882471556902453"/>
    </projection>
    <projection id="NCXLS_M2R_M3R" presynapticPopulation="M2R" postsynapticPopulation="M3R" synapse="Glutamate">
      <connection id="62" preCellId="../M2R/0/M2R" postCellId="../M3R/0/M3R" preSegmentId="1" postSegmentId="4" preFractionAlong="0.5632647205206205" postFractionAlong="0.698902571894143"/>
    </projection>
    <projection id="NCXLS_M2R_M4" presynapticPopulation="M2R" postsynapticPopulation="M4" synapse="Glutamate">
      <connection id="63" preCellId="../M2R/0/M2R" postCellId="../M4/0/M4" preSegmentId="5" postSegmentId="5" preFractionAlong="0.830016670374786" postFractionAlong="0.9062964019071609"/>
    </projection>
    <projection id="NCXLS_M2R_M5" presynapticPopulation="M2R" postsynapticPopulation="M5" synapse="Glutamate">
      <connection id="64" preCellId="../M2R/0/M2R" postCellId="../M5/0/M5" preSegmentId="6" postSegmentId="8" preFractionAlong="0.44029004600869615" postFractionAlong="0.9318832818364259"/>
    </projection>
    <projection id="NCXLS_M2R_M3L" presynapticPopulation="M2R" postsynapticPopulation="M3L" synapse="Glutamate">
      <connection id="65" preCellId="../M2R/0/M2R" postCellId="../M3L/0/M3L" preSegmentId="5" postSegmentId="3" preFractionAlong="0.23416868619664244" postFractionAlong="0.3712669241150709"/>
    </projection>
    <projection id="NCXLS_MI_I1L" presynapticPopulation="MI" postsynapticPopulation="I1L" synapse="Glutamate">
      <connection id="66" preCellId="../MI/0/MI" postCellId="../I1L/0/I1L" preSegmentId="6" postSegmentId="6" preFractionAlong="0.571092608986254" postFractionAlong="0.30664832142861786"/>
    </projection>
    <projection id="NCXLS_MI_M1" presynapticPopulation="MI" postsynapticPopulation="M1" synapse="Serotonin_Glutamate">
      <connection id="67" preCellId="../MI/0/MI" postCellId="../M1/0/M1" preSegmentId="3" postSegmentId="2" preFractionAlong="0.7148429288450242" postFractionAlong="0.36651720355462036"/>
    </projection>
    <projection id="NCXLS_MI_I1R" presynapticPopulation="MI" postsynapticPopulation="I1R" synapse="Acetylcholine">
      <connection id="68" preCellId="../MI/0/MI" postCellId="../I1R/0/I1R" preSegmentId="6" postSegmentId="7" preFractionAlong="0.06964826992629758" postFractionAlong="0.426954445496477"/>
    </projection>
    <projection id="NCXLS_MI_MCR" presynapticPopulation="MI" postsynapticPopulation="MCR" synapse="Acetylcholine">
      <connection id="69" preCellId="../MI/0/MI" postCellId="../MCR/0/MCR" preSegmentId="3" postSegmentId="2" preFractionAlong="0.9151937114245665" postFractionAlong="0.8982726644925535"/>
    </projection>
    <projection id="NCXLS_MI_M2R" presynapticPopulation="MI" postsynapticPopulation="M2R" synapse="Serotonin_Glutamate">
      <connection id="70" preCellId="../MI/0/MI" postCellId="../M2R/0/M2R" preSegmentId="2" postSegmentId="6" preFractionAlong="0.9719141301256846" postFractionAlong="0.8324780000319089"/>
    </projection>
    <projection id="NCXLS_MI_I5" presynapticPopulation="MI" postsynapticPopulation="I5" synapse="Acetylcholine">
      <connection id="71" preCellId="../MI/0/MI" postCellId="../I5/0/I5" preSegmentId="7" postSegmentId="7" preFractionAlong="0.4274356695512971" postFractionAlong="0.2383924421890098"/>
    </projection>
    <projection id="NCXLS_MI_M2L" presynapticPopulation="MI" postsynapticPopulation="M2L" synapse="Serotonin_Glutamate">
      <connection id="72" preCellId="../MI/0/MI" postCellId="../M2L/0/M2L" preSegmentId="7" postSegmentId="7" preFractionAlong="0.1880487531469086" postFractionAlong="0.004060586286875667"/>
    </projection>
    <projection id="NCXLS_MI_M3R" presynapticPopulation="MI" postsynapticPopulation="M3R" synapse="Acetylcholine">
      <connection id="73" preCellId="../MI/0/MI" postCellId="../M3R/0/M3R" preSegmentId="2" postSegmentId="3" preFractionAlong="0.6262149908585453" postFractionAlong="0.6986102220544285"/>
    </projection>
    <projection id="NCXLS_MI_M5" presynapticPopulation="MI" postsynapticPopulation="M5" synapse="Glutamate">
      <connection id="74" preCellId="../MI/0/MI" postCellId="../M5/0/M5" preSegmentId="9" postSegmentId="6" preFractionAlong="0.97529953864988" postFractionAlong="0.6420135846752412"/>
    </projection>
    <projection id="NCXLS_MI_I2R" presynapticPopulation="MI" postsynapticPopulation="I2R" synapse="Acetylcholine">
      <connection id="75" preCellId="../MI/0/MI" postCellId="../I2R/0/I2R" preSegmentId="4" postSegmentId="7" preFractionAlong="0.3052643016074359" postFractionAlong="0.2223182092142263"/>
    </projection>
    <projection id="NCXLS_M2L_I1L" presynapticPopulation="M2L" postsynapticPopulation="I1L" synapse="Acetylcholine">
      <connection id="76" preCellId="../M2L/0/M2L" postCellId="../I1L/0/I1L" preSegmentId="3" postSegmentId="8" preFractionAlong="0.1966320424660023" postFractionAlong="0.2681467309657759"/>
    </projection>
    <projection id="NCXLS_M2L_NSML" presynapticPopulation="M2L" postsynapticPopulation="NSML" synapse="Acetylcholine">
      <connection id="77" preCellId="../M2L/0/M2L" postCellId="../NSML/0/NSML" preSegmentId="3" postSegmentId="3" preFractionAlong="0.4745464264481737" postFractionAlong="0.06935167101859663"/>
    </projection>
    <projection id="NCXLS_M2L_I4" presynapticPopulation="M2L" postsynapticPopulation="I4" synapse="Acetylcholine">
      <connection id="78" preCellId="../M2L/0/M2L" postCellId="../I4/0/I4" preSegmentId="1" postSegmentId="4" preFractionAlong="0.4572608045918206" postFractionAlong="0.14862413046990497"/>
    </projection>
    <projection id="NCXLS_M2L_I1R" presynapticPopulation="M2L" postsynapticPopulation="I1R" synapse="Acetylcholine">
      <connection id="79" preCellId="../M2L/0/M2L" postCellId="../I1R/0/I1R" preSegmentId="6" postSegmentId="4" preFractionAlong="0.09793836538285594" postFractionAlong="0.7905083811731562"/>
    </projection>
    <projection id="NCXLS_M2L_NSMR" presynapticPopulation="M2L" postsynapticPopulation="NSMR" synapse="Acetylcholine">
      <connection id="80" preCellId="../M2L/0/M2L" postCellId="../NSMR/0/NSMR" preSegmentId="2" postSegmentId="2" preFractionAlong="0.41851638665268387" postFractionAlong="0.3814912932422273"/>
    </projection>
    <projection id="NCXLS_M2L_I6" presynapticPopulation="M2L" postsynapticPopulation="I6" synapse="Acetylcholine">
      <connection id="81" preCellId="../M2L/0/M2L" postCellId="../I6/0/I6" preSegmentId="3" postSegmentId="6" preFractionAlong="0.5238556070428226" postFractionAlong="0.514502164857092"/>
    </projection>
    <projection id="NCXLS_M2L_MCR" presynapticPopulation="M2L" postsynapticPopulation="MCR" synapse="Acetylcholine">
      <connection id="82" preCellId="../M2L/0/M2L" postCellId="../MCR/0/MCR" preSegmentId="5" postSegmentId="1" preFractionAlong="0.7405183646824492" postFractionAlong="0.8325044000323545"/>
    </projection>
    <projection id="NCXLS_M2L_MCL" presynapticPopulation="M2L" postsynapticPopulation="MCL" synapse="Acetylcholine">
      <connection id="83" preCellId="../M2L/0/M2L" postCellId="../MCL/0/MCL" preSegmentId="1" postSegmentId="7" preFractionAlong="0.7515530563490262" postFractionAlong="0.23842370049535555"/>
    </projection>
    <projection id="NCXLS_M2L_I5" presynapticPopulation="M2L" postsynapticPopulation="I5" synapse="Acetylcholine">
      <connection id="84" preCellId="../M2L/0/M2L" postCellId="../I5/0/I5" preSegmentId="2" postSegmentId="4" preFractionAlong="0.4437888384909059" postFractionAlong="0.2388598796332252"/>
    </projection>
    <projection id="NCXLS_M2L_MI" presynapticPopulation="M2L" postsynapticPopulation="MI" synapse="Acetylcholine">
      <connection id="85" preCellId="../M2L/0/M2L" postCellId="../MI/0/MI" preSegmentId="7" postSegmentId="1" preFractionAlong="0.194556161189272" postFractionAlong="0.8412262245742964"/>
    </projection>
    <projection id="NCXLS_M2L_I3" presynapticPopulation="M2L" postsynapticPopulation="I3" synapse="Acetylcholine">
      <connection id="86" preCellId="../M2L/0/M2L" postCellId="../I3/0/I3" preSegmentId="8" postSegmentId="5" preFractionAlong="0.13645111827045853" postFractionAlong="0.5683051045948369"/>
    </projection>
    <projection id="NCXLS_M2L_I2L" presynapticPopulation="M2L" postsynapticPopulation="I2L" synapse="Acetylcholine">
      <connection id="87" preCellId="../M2L/0/M2L" postCellId="../I2L/0/I2L" preSegmentId="2" postSegmentId="5" preFractionAlong="0.3978777794754952" postFractionAlong="0.8106720567624114"/>
    </projection>
    <projection id="NCXLS_M2L_M3R" presynapticPopulation="M2L" postsynapticPopulation="M3R" synapse="Glutamate">
      <connection id="88" preCellId="../M2L/0/M2L" postCellId="../M3R/0/M3R" preSegmentId="1" postSegmentId="1" preFractionAlong="0.7707726882106072" postFractionAlong="0.663444393638966"/>
    </projection>
    <projection id="NCXLS_M2L_M4" presynapticPopulation="M2L" postsynapticPopulation="M4" synapse="Acetylcholine">
      <connection id="89" preCellId="../M2L/0/M2L" postCellId="../M4/0/M4" preSegmentId="7" postSegmentId="6" preFractionAlong="0.40423575583947935" postFractionAlong="0.7761299726143986"/>
    </projection>
    <projection id="NCXLS_M2L_M5" presynapticPopulation="M2L" postsynapticPopulation="M5" synapse="Glutamate">
      <connection id="90" preCellId="../M2L/0/M2L" postCellId="../M5/0/M5" preSegmentId="2" postSegmentId="1" preFractionAlong="0.25286730032814053" postFractionAlong="0.15460753673704164"/>
    </projection>
    <projection id="NCXLS_M2L_M3L" presynapticPopulation="M2L" postsynapticPopulation="M3L" synapse="Acetylcholine">
      <connection id="91" preCellId="../M2L/0/M2L" postCellId="../M3L/0/M3L" preSegmentId="7" postSegmentId="3" preFractionAlong="0.6060893405565367" postFractionAlong="0.009772231419481248"/>
    </projection>
    <projection id="NCXLS_M3R_I1L" presynapticPopulation="M3R" postsynapticPopulation="I1L" synapse="Acetylcholine">
      <connection id="92" preCellId="../M3R/0/M3R" postCellId="../I1L/0/I1L" preSegmentId="5" postSegmentId="3" preFractionAlong="0.885440848510793" postFractionAlong="0.2329145608890334"/>
    </projection>
    <projection id="NCXLS_M3R_NSML" presynapticPopulation="M3R" postsynapticPopulation="NSML" synapse="Acetylcholine">
      <connection id="93" preCellId="../M3R/0/M3R" postCellId="../NSML/0/NSML" preSegmentId="6" postSegmentId="6" preFractionAlong="0.4266253734763945" postFractionAlong="0.33482785155535066"/>
    </projection>
    <projection id="NCXLS_M3R_I4" presynapticPopulation="M3R" postsynapticPopulation="I4" synapse="Acetylcholine">
      <connection id="94" preCellId="../M3R/0/M3R" postCellId="../I4/0/I4" preSegmentId="2" postSegmentId="5" preFractionAlong="0.023052783445210112" postFractionAlong="0.9694001125661867"/>
    </projection>
    <projection id="NCXLS_M3R_I1R" presynapticPopulation="M3R" postsynapticPopulation="I1R" synapse="Acetylcholine">
      <connection id="95" preCellId="../M3R/0/M3R" postCellId="../I1R/0/I1R" preSegmentId="2" postSegmentId="1" preFractionAlong="0.8361348687787407" postFractionAlong="0.49908330106452514"/>
    </projection>
    <projection id="NCXLS_M3R_NSMR" presynapticPopulation="M3R" postsynapticPopulation="NSMR" synapse="Acetylcholine">
      <connection id="96" preCellId="../M3R/0/M3R" postCellId="../NSMR/0/NSMR" preSegmentId="2" postSegmentId="7" preFractionAlong="0.8036119429560182" postFractionAlong="0.6381394884910242"/>
    </projection>
    <projection id="NCXLS_M3R_I6" presynapticPopulation="M3R" postsynapticPopulation="I6" synapse="Acetylcholine">
      <connection id="97" preCellId="../M3R/0/M3R" postCellId="../I6/0/I6" preSegmentId="7" postSegmentId="1" preFractionAlong="0.34217298268684015" postFractionAlong="0.98931618350921"/>
    </projection>
    <projection id="NCXLS_M3R_MCR" presynapticPopulation="M3R" postsynapticPopulation="MCR" synapse="Acetylcholine">
      <connection id="98" preCellId="../M3R/0/M3R" postCellId="../MCR/0/MCR" preSegmentId="8" postSegmentId="3" preFractionAlong="0.8429406398772615" postFractionAlong="0.586558560747354"/>
    </projection>
    <projection id="NCXLS_M3R_MCL" presynapticPopulation="M3R" postsynapticPopulation="MCL" synapse="Acetylcholine">
      <connection id="99" preCellId="../M3R/0/M3R" postCellId="../MCL/0/MCL" preSegmentId="2" postSegmentId="7" preFractionAlong="0.08022856271770573" postFractionAlong="0.36166490253609496"/>
    </projection>
    <projection id="NCXLS_M3R_M2R" presynapticPopulation="M3R" postsynapticPopulation="M2R" synapse="Glutamate">
      <connection id="100" preCellId="../M3R/0/M3R" postCellId="../M2R/0/M2R" preSegmentId="7" postSegmentId="9" preFractionAlong="0.22160918823915088" postFractionAlong="0.3796540158686732"/>
    </projection>
    <projection id="NCXLS_M3R_MI" presynapticPopulation="M3R" postsynapticPopulation="MI" synapse="Acetylcholine">
      <connection id="101" preCellId="../M3R/0/M3R" postCellId="../MI/0/MI" preSegmentId="8" postSegmentId="9" preFractionAlong="0.39174808760521174" postFractionAlong="0.7935212646403246"/>
    </projection>
    <projection id="NCXLS_M3R_I2L" presynapticPopulation="M3R" postsynapticPopulation="I2L" synapse="Acetylcholine">
      <connection id="102" preCellId="../M3R/0/M3R" postCellId="../I2L/0/I2L" preSegmentId="4" postSegmentId="6" preFractionAlong="0.46097978669335715" postFractionAlong="0.4334082173718403"/>
    </projection>
    <electricalProjection id="NCXLS_M3R_M4_GJ" presynapticPopulation="M3R" postsynapticPopulation="M4">
      <electricalConnection id="103" preCell="0" postCell="0" synapse="Generic_GJ" preSegment="7" postSegment="8" preFractionAlong="0.987023081981475" postFractionAlong="0.29835363065288334"/>
    </electricalProjection>
    <projection id="NCXLS_M3R_M5" presynapticPopulation="M3R" postsynapticPopulation="M5" synapse="Acetylcholine">
      <connection id="104" preCellId="../M3R/0/M3R" postCellId="../M5/0/M5" preSegmentId="2" postSegmentId="2" preFractionAlong="0.46660626592618204" postFractionAlong="0.2000492331463749"/>
    </projection>
    <projection id="NCXLS_M3R_I2R" presynapticPopulation="M3R" postsynapticPopulation="I2R" synapse="Acetylcholine">
      <connection id="105" preCellId="../M3R/0/M3R" postCellId="../I2R/0/I2R" preSegmentId="4" postSegmentId="5" preFractionAlong="0.8750589641689428" postFractionAlong="0.817582687849336"/>
    </projection>
    <projection id="NCXLS_M3R_M3L" presynapticPopulation="M3R" postsynapticPopulation="M3L" synapse="Acetylcholine">
      <connection id="106" preCellId="../M3R/0/M3R" postCellId="../M3L/0/M3L" preSegmentId="1" postSegmentId="1" preFractionAlong="0.43331949023289684" postFractionAlong="0.5473777534997463"/>
    </projection>
    <projection id="NCXLS_M4_I1L" presynapticPopulation="M4" postsynapticPopulation="I1L" synapse="Acetylcholine">
      <connection id="107" preCellId="../M4/0/M4" postCellId="../I1L/0/I1L" preSegmentId="3" postSegmentId="6" preFractionAlong="0.7958326589504415" postFractionAlong="0.001145950628256287"/>
    </projection>
    <electricalProjection id="NCXLS_M4_M1_GJ" presynapticPopulation="M4" postsynapticPopulation="M1">
      <electricalConnection id="108" preCell="0" postCell="0" synapse="Generic_GJ" preSegment="1" postSegment="6" preFractionAlong="0.5840386578266218" postFractionAlong="0.5954499314692966"/>
    </electricalProjection>
    <projection id="NCXLS_M4_I1R" presynapticPopulation="M4" postsynapticPopulation="I1R" synapse="Acetylcholine">
      <connection id="109" preCellId="../M4/0/M4" postCellId="../I1R/0/I1R" preSegmentId="7" postSegmentId="2" preFractionAlong="0.5094018695309703" postFractionAlong="0.7253105755407004"/>
    </projection>
    <projection id="NCXLS_M4_NSMR" presynapticPopulation="M4" postsynapticPopulation="NSMR" synapse="Acetylcholine">
      <connection id="110" preCellId="../M4/0/M4" postCellId="../NSMR/0/NSMR" preSegmentId="9" postSegmentId="2" preFractionAlong="0.6084910865636168" postFractionAlong="0.897774068255051"/>
    </projection>
    <projection id="NCXLS_M4_MCR" presynapticPopulation="M4" postsynapticPopulation="MCR" synapse="Acetylcholine">
      <connection id="111" preCellId="../M4/0/M4" postCellId="../MCR/0/MCR" preSegmentId="3" postSegmentId="5" preFractionAlong="0.02977190740713198" postFractionAlong="0.5041484897283163"/>
    </projection>
    <projection id="NCXLS_M4_M2R" presynapticPopulation="M4" postsynapticPopulation="M2R" synapse="Glutamate">
      <connection id="112" preCellId="../M4/0/M4" postCellId="../M2R/0/M2R" preSegmentId="8" postSegmentId="7" preFractionAlong="0.5499210705196631" postFractionAlong="0.269636165216676"/>
    </projection>
    <projection id="NCXLS_M4_MI" presynapticPopulation="M4" postsynapticPopulation="MI" synapse="Acetylcholine">
      <connection id="113" preCellId="../M4/0/M4" postCellId="../MI/0/MI" preSegmentId="8" postSegmentId="2" preFractionAlong="0.4909250939863308" postFractionAlong="0.1903522283603135"/>
    </projection>
    <projection id="NCXLS_M4_M2L" presynapticPopulation="M4" postsynapticPopulation="M2L" synapse="Acetylcholine">
      <connection id="114" preCellId="../M4/0/M4" postCellId="../M2L/0/M2L" preSegmentId="7" postSegmentId="5" preFractionAlong="0.9051338748441857" postFractionAlong="0.2006436829571957"/>
    </projection>
    <projection id="NCXLS_M4_M3R" presynapticPopulation="M4" postsynapticPopulation="M3R" synapse="Acetylcholine">
      <connection id="115" preCellId="../M4/0/M4" postCellId="../M3R/0/M3R" preSegmentId="6" postSegmentId="5" preFractionAlong="0.26348337714290304" postFractionAlong="0.19986029727419885"/>
    </projection>
    <electricalProjection id="NCXLS_M4_M5_GJ" presynapticPopulation="M4" postsynapticPopulation="M5">
      <electricalConnection id="116" preCell="0" postCell="0" synapse="Generic_GJ" preSegment="9" postSegment="5" preFractionAlong="0.6934258020995963" postFractionAlong="0.7923509643549305"/>
    </electricalProjection>
    <projection id="NCXLS_M4_I2R" presynapticPopulation="M4" postsynapticPopulation="I2R" synapse="Acetylcholine">
      <connection id="117" preCellId="../M4/0/M4" postCellId="../I2R/0/I2R" preSegmentId="1" postSegmentId="2" preFractionAlong="0.44433516708296994" postFractionAlong="0.6591135216215475"/>
    </projection>
    <projection id="NCXLS_M5_I1L" presynapticPopulation="M5" postsynapticPopulation="I1L" synapse="Acetylcholine">
      <connection id="118" preCellId="../M5/0/M5" postCellId="../I1L/0/I1L" preSegmentId="4" postSegmentId="9" preFractionAlong="0.5679205032734082" postFractionAlong="0.4932921760875567"/>
    </projection>
    <projection id="NCXLS_M5_NSML" presynapticPopulation="M5" postsynapticPopulation="NSML" synapse="Acetylcholine">
      <connection id="119" preCellId="../M5/0/M5" postCellId="../NSML/0/NSML" preSegmentId="7" postSegmentId="4" preFractionAlong="0.5407099549161969" postFractionAlong="0.4502794828645408"/>
    </projection>
    <projection id="NCXLS_M5_I4" presynapticPopulation="M5" postsynapticPopulation="I4" synapse="Acetylcholine">
      <connection id="120" preCellId="../M5/0/M5" postCellId="../I4/0/I4" preSegmentId="3" postSegmentId="1" preFractionAlong="0.4693820505825953" postFractionAlong="0.8814719638223172"/>
    </projection>
    <projection id="NCXLS_M5_I1R" presynapticPopulation="M5" postsynapticPopulation="I1R" synapse="Acetylcholine">
      <connection id="121" preCellId="../M5/0/M5" postCellId="../I1R/0/I1R" preSegmentId="5" postSegmentId="1" preFractionAlong="0.042802636068106636" postFractionAlong="0.7439917193796687"/>
    </projection>
    <projection id="NCXLS_M5_NSMR" presynapticPopulation="M5" postsynapticPopulation="NSMR" synapse="Acetylcholine">
      <connection id="122" preCellId="../M5/0/M5" postCellId="../NSMR/0/NSMR" preSegmentId="1" postSegmentId="5" preFractionAlong="0.19118303909731627" postFractionAlong="0.7949509328246771"/>
    </projection>
    <projection id="NCXLS_M5_MCR" presynapticPopulation="M5" postsynapticPopulation="MCR" synapse="Acetylcholine">
      <connection id="123" preCellId="../M5/0/M5" postCellId="../MCR/0/MCR" preSegmentId="2" postSegmentId="1" preFractionAlong="0.030143794797741652" postFractionAlong="0.732642242442521"/>
    </projection>
    <projection id="NCXLS_M5_MCL" presynapticPopulation="M5" postsynapticPopulation="MCL" synapse="Acetylcholine">
      <connection id="124" preCellId="../M5/0/M5" postCellId="../MCL/0/MCL" preSegmentId="1" postSegmentId="1" preFractionAlong="0.8227162138158829" postFractionAlong="0.11465749652459067"/>
    </projection>
    <projection id="NCXLS_M5_M2R" presynapticPopulation="M5" postsynapticPopulation="M2R" synapse="Glutamate">
      <connection id="125" preCellId="../M5/0/M5" postCellId="../M2R/0/M2R" preSegmentId="2" postSegmentId="2" preFractionAlong="0.34202951460460307" postFractionAlong="0.11780721306768427"/>
    </projection>
    <projection id="NCXLS_M5_MI" presynapticPopulation="M5" postsynapticPopulation="MI" synapse="Acetylcholine">
      <connection id="126" preCellId="../M5/0/M5" postCellId="../MI/0/MI" preSegmentId="6" postSegmentId="2" preFractionAlong="0.2421721230472771" postFractionAlong="0.7212540974297396"/>
    </projection>
    <projection id="NCXLS_M5_I2R" presynapticPopulation="M5" postsynapticPopulation="I2R" synapse="Acetylcholine">
      <connection id="127" preCellId="../M5/0/M5" postCellId="../I2R/0/I2R" preSegmentId="6" postSegmentId="8" preFractionAlong="0.22099815752363516" postFractionAlong="0.5009968366121956"/>
    </projection>
    <projection id="NCXLS_M3L_I1L" presynapticPopulation="M3L" postsynapticPopulation="I1L" synapse="Acetylcholine">
      <connection id="128" preCellId="../M3L/0/M3L" postCellId="../I1L/0/I1L" preSegmentId="7" postSegmentId="5" preFractionAlong="0.7719062434000892" postFractionAlong="0.6224833190290374"/>
    </projection>
    <projection id="NCXLS_M3L_M1" presynapticPopulation="M3L" postsynapticPopulation="M1" synapse="Acetylcholine">
      <connection id="129" preCellId="../M3L/0/M3L" postCellId="../M1/0/M1" preSegmentId="2" postSegmentId="7" preFractionAlong="0.7793632650477182" postFractionAlong="0.23515557000841703"/>
    </projection>
    <projection id="NCXLS_M3L_NSML" presynapticPopulation="M3L" postsynapticPopulation="NSML" synapse="Acetylcholine">
      <connection id="130" preCellId="../M3L/0/M3L" postCellId="../NSML/0/NSML" preSegmentId="9" postSegmentId="2" preFractionAlong="0.8786215968075725" postFractionAlong="0.7836735930196038"/>
    </projection>
    <projection id="NCXLS_M3L_I4" presynapticPopulation="M3L" postsynapticPopulation="I4" synapse="Acetylcholine">
      <connection id="131" preCellId="../M3L/0/M3L" postCellId="../I4/0/I4" preSegmentId="5" postSegmentId="6" preFractionAlong="0.1413591308861497" postFractionAlong="0.43708912013937085"/>
    </projection>
    <projection id="NCXLS_M3L_I1R" presynapticPopulation="M3L" postsynapticPopulation="I1R" synapse="Acetylcholine">
      <connection id="132" preCellId="../M3L/0/M3L" postCellId="../I1R/0/I1R" preSegmentId="8" postSegmentId="8" preFractionAlong="0.21995151773429578" postFractionAlong="0.5950789355038547"/>
    </projection>
    <projection id="NCXLS_M3L_NSMR" presynapticPopulation="M3L" postsynapticPopulation="NSMR" synapse="Acetylcholine">
      <connection id="133" preCellId="../M3L/0/M3L" postCellId="../NSMR/0/NSMR" preSegmentId="7" postSegmentId="2" preFractionAlong="0.06577670341114461" postFractionAlong="0.7634178142206718"/>
    </projection>
    <projection id="NCXLS_M3L_I6" presynapticPopulation="M3L" postsynapticPopulation="I6" synapse="Acetylcholine">
      <connection id="134" preCellId="../M3L/0/M3L" postCellId="../I6/0/I6" preSegmentId="8" postSegmentId="9" preFractionAlong="0.29190961379034364" postFractionAlong="0.4896900421608815"/>
    </projection>
    <projection id="NCXLS_M3L_MCR" presynapticPopulation="M3L" postsynapticPopulation="MCR" synapse="Acetylcholine">
      <connection id="135" preCellId="../M3L/0/M3L" postCellId="../MCR/0/MCR" preSegmentId="8" postSegmentId="5" preFractionAlong="0.3788823795512348" postFractionAlong="0.3878165426109311"/>
    </projection>
    <projection id="NCXLS_M3L_MCL" presynapticPopulation="M3L" postsynapticPopulation="MCL" synapse="Acetylcholine">
      <connection id="136" preCellId="../M3L/0/M3L" postCellId="../MCL/0/MCL" preSegmentId="7" postSegmentId="9" preFractionAlong="0.14114180147574362" postFractionAlong="0.38725904025443403"/>
    </projection>
    <projection id="NCXLS_M3L_M2R" presynapticPopulation="M3L" postsynapticPopulation="M2R" synapse="Glutamate">
      <connection id="137" preCellId="../M3L/0/M3L" postCellId="../M2R/0/M2R" preSegmentId="5" postSegmentId="7" preFractionAlong="0.9851262236761242" postFractionAlong="0.3514547692857177"/>
    </projection>
    <projection id="NCXLS_M3L_MI" presynapticPopulation="M3L" postsynapticPopulation="MI" synapse="Acetylcholine">
      <connection id="138" preCellId="../M3L/0/M3L" postCellId="../MI/0/MI" preSegmentId="4" postSegmentId="2" preFractionAlong="0.17869295228631332" postFractionAlong="0.2955524986352176"/>
    </projection>
    <projection id="NCXLS_M3L_I2L" presynapticPopulation="M3L" postsynapticPopulation="I2L" synapse="Acetylcholine">
      <connection id="139" preCellId="../M3L/0/M3L" postCellId="../I2L/0/I2L" preSegmentId="3" postSegmentId="8" preFractionAlong="0.3711929866485244" postFractionAlong="0.022561650757327634"/>
    </projection>
    <projection id="NCXLS_M3L_M3R" presynapticPopulation="M3L" postsynapticPopulation="M3R" synapse="Acetylcholine">
      <connection id="140" preCellId="../M3L/0/M3L" postCellId="../M3R/0/M3R" preSegmentId="2" postSegmentId="9" preFractionAlong="0.7071602939808602" postFractionAlong="0.07033059208743897"/>
    </projection>
    <projection id="NCXLS_M3L_M4" presynapticPopulation="M3L" postsynapticPopulation="M4" synapse="Glutamate">
      <connection id="141" preCellId="../M3L/0/M3L" postCellId="../M4/0/M4" preSegmentId="3" postSegmentId="7" preFractionAlong="0.5468365102699866" postFractionAlong="0.27885053008676475"/>
    </projection>
    <projection id="NCXLS_M3L_M5" presynapticPopulation="M3L" postsynapticPopulation="M5" synapse="Acetylcholine">
      <connection id="142" preCellId="../M3L/0/M3L" postCellId="../M5/0/M5" preSegmentId="4" postSegmentId="6" preFractionAlong="0.40617201291148597" postFractionAlong="0.6061773057817677"/>
    </projection>
    <projection id="NCXLS_M3L_I2R" presynapticPopulation="M3L" postsynapticPopulation="I2R" synapse="Acetylcholine">
      <connection id="143" preCellId="../M3L/0/M3L" postCellId="../I2R/0/I2R" preSegmentId="3" postSegmentId="8" preFractionAlong="0.48661709230199235" postFractionAlong="0.6741680405566547"/>
    </projection>
  </network>
</neuroml>
